// SBML level 2 version 4

function flux_v_3(k_1, l_2, IPR_I1)
  (k_1 + l_2)*IPR_I1;
end

function flux_v_7(k_1, l_2, IPR_I2)
  (k_1 + l_2)*IPR_I2;
end

function flux_v_5(L1, k_4, l_6, Ca, IPR_A)
  L1*(k_4 + l_6)/(L1 + Ca)*IPR_A;
end

function flux_v_8(k3, L5, Ca, IPR_O)
  k3*L5/(L5 + Ca)*IPR_O;
end

function flux_v_2(k1, L1, l2, Ca, L3, IPR_R)
  (k1*L1 + l2)*Ca/(L1 + Ca*(1 + L1/L3))*IPR_R;
end

function flux_v_6(k1, L1, l2, Ca, IPR_A)
  (k1*L1 + l2)*Ca/(L1 + Ca)*IPR_A;
end

function flux_v_0(k_2, l_4, Ca, L5, IPR_O)
  (k_2 + l_4*Ca)/(1 + Ca/L5)*IPR_O;
end

function flux_v_4(k4, L5, l6, Ca, IPR_O)
  (k4*L5 + l6)*Ca/(L5 + Ca)*IPR_O;
end

function flux_v_1(k2, L3, l4, Ca, L1, IP3, IPR_R)
  (k2*L3 + l4*Ca)/(L3 + Ca*(1 + L3/L1))*IP3*IPR_R;
end

function flux_v_9(k_3, IPR_S)
  k_3*IPR_S;
end

model model_Sneyd_PNAS2002()
  // NoName

  // Compartments:
  compartment membrane = 1;

  // Species:
  species IPR_O in membrane = 0;
  species IPR_R in membrane = 1;
  species IPR_I1 in membrane = 0; IPR_I1 is "IPR_I_1";
  species IPR_S in membrane = 0;
  species IPR_A in membrane = 0;
  species IPR_I2 in membrane = 0; IPR_I2 is "IPR_I_2";
  species IPR_I1_0 in membrane = 1;
  species IPR_I2_0 in membrane = 1;

  // Parameters:
  k1 = 3.727211;
  k2 = 100000;
  k3 = 15.74534;
  k4 = 99938.26;
  k_1 = 0.9239247;
  k_2 = 0.001002495;
  k_3 = 1.91463;
  k_4 = 3079.207;
  l2 = 0.940077;
  l4 = 2.858377;
  l6 = 100000;
  l_2 = 0.3476645;
  l_4 = 0.0138802;
  l_6 = 0.001;
  sigma = 0.02266568;
  Ca = 10;
  IP3 = 0;
  ModelValue_0_0 = k1; ModelValue_0_0 is "Initial for k1";
  ModelValue_1_0 = k2; ModelValue_1_0 is "Initial for k2";
  ModelValue_3_0 = k4; ModelValue_3_0 is "Initial for k4";
  ModelValue_4_0 = k_1; ModelValue_4_0 is "Initial for k_1";
  ModelValue_5_0 = k_2; ModelValue_5_0 is "Initial for k_2";
  ModelValue_7_0 = k_4; ModelValue_7_0 is "Initial for k_4";
  ModelValue_8_0 = l2; ModelValue_8_0 is "Initial for l2";
  ModelValue_9_0 = l4; ModelValue_9_0 is "Initial for l4";
  ModelValue_10_0 = l6; ModelValue_10_0 is "Initial for l6";
  ModelValue_11_0 = l_2; ModelValue_11_0 is "Initial for l_2";
  ModelValue_12_0 = l_4; ModelValue_12_0 is "Initial for l_4";
  ModelValue_13_0 = l_6; ModelValue_13_0 is "Initial for l_6";

  // Assignment rules:
  L3 := ModelValue_5_0/ModelValue_1_0/(ModelValue_12_0/ModelValue_9_0);
  open_probability := (0.9*IPR_A + 0.1*IPR_O)^4;
  L1 := ModelValue_4_0/ModelValue_0_0/(ModelValue_11_0/ModelValue_8_0);
  L5 := ModelValue_7_0/ModelValue_3_0/(ModelValue_13_0/ModelValue_10_0);

  // Reactions:
  v1_v_0: IPR_O => IPR_R; membrane*flux_v_0(k_2, l_4, Ca, L5, IPR_O);
  v_1: IPR_R => IPR_O; membrane*flux_v_1(k2, L3, l4, Ca, L1, IP3, IPR_R);
  v_2: IPR_R => IPR_I1_0; membrane*flux_v_2(k1, L1, l2, Ca, L3, IPR_R);
  v_3: IPR_I1_0 => IPR_R; membrane*flux_v_3(k1, l_2, IPR_I1_0);
  v_4: IPR_O => IPR_A; membrane*flux_v_4(k4, L5, l6, Ca, IPR_O);
  v_5: IPR_A => IPR_O; membrane*flux_v_5(L1, k_4, l_6, Ca, IPR_A);
  v_6: IPR_A => IPR_I2_0; membrane*flux_v_6(k1, L1, l2, Ca, IPR_A);
  v_7: IPR_I2_0 => IPR_A; membrane*flux_v_7(k_1, l_2, IPR_I2_0);
  v_8: IPR_O => IPR_S; membrane*flux_v_8(k3, L5, Ca, IPR_O);
  v_9: IPR_S => IPR_O; membrane*flux_v_9(k3, IPR_S);

  // Unit definitions:
  unit time = second;
end
