// SBML level 2 version 4

model combined_model()
  // NoName
  // PEtab implementation of the model from Alkan et al. (2018), Science Signaling 24 Jul 2018: Vol. 11, Issue 540, eaat0229
  // isDescribedBy doi:10.1126/scisignal.aat0229

  // Compartments:
  compartment default = 1;

  // Species:
  species Space in default = init_Space;
  species Cells in default = init_Cells*(init_Cells_Cycle_G2_rel - 1)*(init_Cells_Cycle_S_rel - 1);
  species Cells_Cycle_S in default = init_Cells*init_Cells_Cycle_S_rel;
  species Cells_Cycle_G2 in default = -init_Cells*init_Cells_Cycle_G2_rel*(init_Cells_Cycle_S_rel - 1);
  species Cells_SSBDamage_S in default = 0;
  species Cells_DSBDamage_S in default = 0;
  species Cells_DSBDamage_G2 in default = 0;
  species Cells_Apo in default = 0;
  species Cells_Apo1 in default = 0;
  species Cells_Apo2 in default = 0;
  species Cells_Apo3 in default = 0;
  species Cells_Apo4 in default = 0;
  species Cells_Apo_ReOx in default = 0;
  species Cells_Dead in default = 0;
  species pATR_S in default = 0;
  species pATR_G2 in default = 0;
  species pChk1_S in default = 0;
  species pChk1_G2 in default = 0;
  species pATM_S in default = 0;
  species pATM_G2 in default = 0;
  species pChk2_S in default = 0;
  species pChk2_G2 in default = 0;
  species pDNAPK_S in default = 0;
  species pDNAPK_G2 in default = 0;
  species pp53_S in default = 0;
  species pp53_G2 in default = 0;
  species yH2AX_S in default = 0;
  species yH2AX_G2 in default = 0;
  species p21_mRNA_S in default = 0;
  species p21_S in default = 0;
  species p21_mRNA_G2 in default = 0;
  species p21_G2 in default = 0;
  species Wip1_mRNA_S in default = 0;
  species Wip1_S in default = 0;
  species Wip1_mRNA_G2 in default = 0;
  species Wip1_G2 in default = 0;

  // Parameters:
  Gem_level = 0.1;
  Dox_level = 0;
  SN38_level = 0;
  init_Cells = 1;
  init_Cells_Cycle_G2_rel = 0.4;
  init_Cells_Cycle_S_rel = 0.5;
  init_Space = 100;
  k_damage_sn38_ssb = 174.4347;
  k_ssb_to_dsb_sn38 = 999.9997;
  k_damage_dox_dsb = 214.7603;
  k_dox_apo = 0.048801;
  k_dox_kd = 0.3564511;
  k_apo_dsb_g2 = 1e-5;
  k_apo_dsb_s = 1e-5;
  k_apo_ssb = 1e-5;
  k_cyc_arr_chk1 = 1000;
  k_cyc_arr_chk2 = 1000;
  k_damage_gem_ssb = 49.87005;
  k_death = 0.1031778;
  k_death_delay = 0.1410416;
  k_death_reox = 0.03412462;
  k_lyse = 10;
  k_rep_hr = 1e-5;
  k_rep_nhej = 0.3241976;
  k_rep_nhej_sat = 0.006867003;
  k_rep_s = 1e-5;
  k_ssb_to_dsb = 0.03049963;
  kt = 0.1873921;
  kt_apo = 0.1235016;
  p_mrna_exp_inh_dox = 1000;
  p_mrna_exp_inh_dox_kd = 0.3564512;
  p_atm_act_dsb = 1;
  p_atr_act_atm = 0.09021826;
  p_atr_act_ssb = 0.07918342;
  p_chk1_act = 8.432499;
  p_chk1_dea_wip1 = 10;
  p_chk2_act = 6.893082;
  p_chk2_dea_wip1 = 10;
  p_dnapk_act = 9.999998;
  p_dnapk_dea_wip1 = 6.588069;
  p_h2ax_act_atm = 0.001354445;
  p_h2ax_act_atr = 0.005377642;
  p_h2ax_act_dnapk = 1e-5;
  p_h2ax_dea = 1.000035e-5;
  p_p21_mrna_turn = 0.1093544;
  p_p21_turn = 1;
  p_p53_act_atm = 0.1726675;
  p_p53_act_atr = 1e-5;
  p_p53_act_chk1 = 1e-5;
  p_p53_act_chk2 = 0.05123913;
  p_wip1_mrna_turn = 3.401016;
  p_wip1_turn = 3.411643;
  pATM_au = 0;
  observableParameter1_pATM_au = 0.9204522;
  noiseParameter1_pATM_au = 0.07943282;
  pChk1_au = 0;
  observableParameter1_pChk1_au = 1.050009;
  noiseParameter1_pChk1_au = 0.1;
  pChk2_au = 0;
  observableParameter1_pChk2_au = 1.525562;
  noiseParameter1_pChk2_au = 0.3162278;
  pDNAPK_au = 0;
  observableParameter1_pDNAPK_au = 0.4678133;
  noiseParameter1_pDNAPK_au = 0.1995262;
  pp53_au = 0;
  observableParameter1_pp53_au = 1.13576;
  noiseParameter1_pp53_au = 0.1995262;
  tp21_au = 0;
  observableParameter1_tp21_au = 3.917855;
  noiseParameter1_tp21_au = 0.3162278;
  tp53_au = 0;
  observableParameter1_tp53_au = 1.431336;
  noiseParameter1_tp53_au = 0.1995262;
  yH2AX_au = 0;
  observableParameter1_yH2AX_au = 60.50317;
  noiseParameter1_yH2AX_au = 0.1258925;
  p21_mRNA_fold = 0;
  observableParameter1_p21_mRNA_fold = 19.80629;
  noiseParameter1_p21_mRNA_fold = 1;
  Wip1_mRNA_fold = 0;
  observableParameter1_Wip1_mRNA_fold = 2.277;
  noiseParameter1_Wip1_mRNA_fold = 1;
  noiseParameter1_Cells_count = 1;
  noiseParameter1_CellsCasp_count = 1;

  // Assignment rules:
  observable_Cells_count := Cells + Cells_Cycle_S + Cells_Cycle_G2 + Cells_SSBDamage_S + Cells_DSBDamage_S + Cells_DSBDamage_G2 + Cells_Apo + Cells_Apo1 + Cells_Apo2 + Cells_Apo3 + Cells_Apo4 + Cells_Apo_ReOx;
  observable_CellsCasp_count := Cells_Apo4 + Cells_Apo_ReOx;
  observable_p21_mRNA_fold := observableParameter1_p21_mRNA_fold*(p21_mRNA_S + p21_mRNA_G2) + 1;
  observable_Wip1_mRNA_fold := observableParameter1_Wip1_mRNA_fold*(Wip1_mRNA_G2 + Wip1_mRNA_S) + 1;
  sigma_p21_mRNA_fold := noiseParameter1_p21_mRNA_fold;
  sigma_Wip1_mRNA_fold := noiseParameter1_Wip1_mRNA_fold;
  observable_pATM_au := observableParameter1_pATM_au*(pATM_G2 + pATM_S);
  observable_pDNAPK_au := observableParameter1_pDNAPK_au*(pDNAPK_G2 + pDNAPK_S);
  observable_pChk1_au := observableParameter1_pChk1_au*(pChk1_G2 + pChk1_S);
  observable_pChk2_au := observableParameter1_pChk2_au*(pChk2_S + pChk2_G2);
  observable_tp53_au := observableParameter1_tp53_au*(pp53_S + pp53_G2);
  observable_pp53_au := observableParameter1_pp53_au*(pp53_S + pp53_G2);
  observable_tp21_au := observableParameter1_tp21_au*(p21_S + p21_G2);
  observable_yH2AX_au := observableParameter1_yH2AX_au*(yH2AX_S + yH2AX_G2);
  sigma_CellsCasp_count := noiseParameter1_CellsCasp_count;
  sigma_Cells_count := noiseParameter1_Cells_count;
  sigma_pATM_au := noiseParameter1_pATM_au;
  sigma_pDNAPK_au := noiseParameter1_pDNAPK_au;
  sigma_pChk1_au := noiseParameter1_pChk1_au;
  sigma_pChk2_au := noiseParameter1_pChk2_au;
  sigma_tp53_au := noiseParameter1_tp53_au;
  sigma_pp53_au := noiseParameter1_pp53_au;
  sigma_tp21_au := noiseParameter1_tp21_au;
  sigma_yH2AX_au := noiseParameter1_yH2AX_au;

  // Reactions:
  v1_v_0: Space + Cells => Cells_Cycle_S; Cells*Space*kt/init_Space;
  v2_v_1: Cells_Cycle_S => Cells_Cycle_G2; Cells_Cycle_S*kt*(init_Cells_Cycle_G2_rel - 1)*(init_Cells_Cycle_S_rel - 1)*(init_Cells*init_Cells_Cycle_S_rel + init_Cells*(init_Cells_Cycle_G2_rel - 1)*(init_Cells_Cycle_S_rel - 1) - 2*init_Cells*init_Cells_Cycle_G2_rel*(init_Cells_Cycle_S_rel - 1))/(init_Cells_Cycle_S_rel*(2*init_Cells*init_Cells_Cycle_S_rel + init_Cells*(init_Cells_Cycle_G2_rel - 1)*(init_Cells_Cycle_S_rel - 1) - 2*init_Cells*init_Cells_Cycle_G2_rel*(init_Cells_Cycle_S_rel - 1)));
  v3_v_2: Cells_Cycle_G2 => 2 Cells; -(Cells_Cycle_G2*init_Cells*kt*(init_Cells_Cycle_G2_rel - 1)*(init_Cells_Cycle_S_rel - 1)*(init_Cells*init_Cells_Cycle_S_rel + init_Cells*(init_Cells_Cycle_G2_rel - 1)*(init_Cells_Cycle_S_rel - 1) - init_Cells*init_Cells_Cycle_G2_rel*(init_Cells_Cycle_S_rel - 1)))/(init_Cells^2*init_Cells_Cycle_G2_rel*(init_Cells_Cycle_G2_rel - 1)*(init_Cells_Cycle_S_rel - 1)^2 - 2*init_Cells^2*init_Cells_Cycle_G2_rel^2*(init_Cells_Cycle_S_rel - 1)^2 + 2*init_Cells^2*init_Cells_Cycle_G2_rel*init_Cells_Cycle_S_rel*(init_Cells_Cycle_S_rel - 1));
  v4_v_3: Cells_Apo => Cells_Apo1; Cells_Apo*k_death_delay;
  v5_v_4: Cells_Apo1 => Cells_Apo2; Cells_Apo1*k_death_delay;
  v6_v_5: Cells_Apo2 => Cells_Apo3; Cells_Apo2*k_death_delay;
  v7_v_6: Cells_Apo3 => Cells_Apo4; Cells_Apo3*k_death_delay;
  v8_v_7: Cells_Apo4 => Cells_Dead; Cells_Apo4*k_death;
  v9_v_8: Cells => Cells_Apo_ReOx; Cells*k_dox_apo*(Dox_level^6/(Dox_level^6 + k_dox_kd^6));
  v10_v_9: Cells_Cycle_S => Cells_Apo_ReOx; Cells_Cycle_S*k_dox_apo*(Dox_level^6/(Dox_level^6 + k_dox_kd^6));
  v11_v_10: Cells_Cycle_G2 => Cells_Apo_ReOx; Cells_Cycle_G2*k_dox_apo*(Dox_level^6/(Dox_level^6 + k_dox_kd^6));
  v12_v_11: Cells_SSBDamage_S => Cells_Apo_ReOx; Cells_SSBDamage_S*k_dox_apo*(Dox_level^6/(Dox_level^6 + k_dox_kd^6));
  v13_v_12: Cells_DSBDamage_S => Cells_Apo_ReOx; Cells_DSBDamage_S*k_dox_apo*(Dox_level^6/(Dox_level^6 + k_dox_kd^6));
  v14_v_13: Cells_DSBDamage_G2 => Cells_Apo_ReOx; Cells_DSBDamage_G2*k_dox_apo*(Dox_level^6/(Dox_level^6 + k_dox_kd^6));
  v15_v_14: Cells_Apo => Cells_Apo_ReOx; Cells_Apo*k_dox_apo*(Dox_level^6/(Dox_level^6 + k_dox_kd^6));
  v16_v_15: Cells_Apo1 => Cells_Apo_ReOx; Cells_Apo1*k_dox_apo*(Dox_level^6/(Dox_level^6 + k_dox_kd^6));
  v17_v_16: Cells_Apo2 => Cells_Apo_ReOx; Cells_Apo2*k_dox_apo*(Dox_level^6/(Dox_level^6 + k_dox_kd^6));
  v18_v_17: Cells_Apo3 => Cells_Apo_ReOx; Cells_Apo3*k_dox_apo*(Dox_level^6/(Dox_level^6 + k_dox_kd^6));
  v19_v_18: Cells_Apo4 => Cells_Apo_ReOx; Cells_Apo4*k_dox_apo*(Dox_level^6/(Dox_level^6 + k_dox_kd^6));
  v20_v_19: Cells_Apo_ReOx => Cells_Dead; Cells_Apo_ReOx*k_death_reox;
  v21_v_20: Cells_Dead => Space; Cells_Dead*k_lyse;
  v22_v_21: Cells_Cycle_S => Cells_SSBDamage_S; Gem_level*Cells_Cycle_S*k_damage_gem_ssb;
  v23_v_22: Cells_Cycle_G2 => Cells_DSBDamage_G2; Cells_Cycle_G2*k_damage_dox_dsb*Dox_level;
  v24_v_23: Cells_Cycle_S => Cells_SSBDamage_S; SN38_level*Cells_Cycle_S*k_damage_sn38_ssb;
  v25_v_24: Cells_SSBDamage_S => Cells_DSBDamage_S; Cells_SSBDamage_S*(k_ssb_to_dsb + k_ssb_to_dsb_sn38*piecewise(1, SN38_level > 0, 0, SN38_level <= 0));
  v26_v_25: Cells_SSBDamage_S => Cells_Cycle_S; Cells_SSBDamage_S*k_rep_s*pATR_S;  // modifiers: pATR_S
  v27_v_26: Cells_DSBDamage_S => Cells_Cycle_S; Cells_DSBDamage_S*k_rep_nhej*pDNAPK_S/(Cells_DSBDamage_S + k_rep_nhej_sat);  // modifiers: pDNAPK_S
  v28_v_27: Cells_DSBDamage_G2 => Cells_Cycle_G2; Cells_DSBDamage_G2*k_rep_nhej*pDNAPK_G2/(Cells_DSBDamage_G2 + k_rep_nhej_sat);  // modifiers: pDNAPK_G2
  v29_v_28: Cells_DSBDamage_G2 => Cells_Cycle_G2; Cells_DSBDamage_G2*k_rep_hr*pATM_G2*pATR_G2;  // modifiers: pATM_G2, pATR_G2
  v30_v_29: Cells_SSBDamage_S => Cells_Apo; Cells_SSBDamage_S*k_apo_ssb*pp53_S;  // modifiers: pp53_S
  v31_v_30: Cells_DSBDamage_S => Cells_Apo; Cells_DSBDamage_S*k_apo_dsb_s*pp53_S;  // modifiers: pp53_S
  v32_v_31: Cells_DSBDamage_G2 => Cells_Apo; Cells_DSBDamage_G2*k_apo_dsb_g2*pp53_G2;  // modifiers: pp53_G2
  v33_v_32: Cells_SSBDamage_S => 2 Cells_Apo; Cells_SSBDamage_S*kt_apo/(k_cyc_arr_chk1*pChk1_S + 1);  // modifiers: pChk1_S
  v34_v_33: Cells_DSBDamage_S => 2 Cells_Apo; Cells_DSBDamage_S*kt_apo/(k_cyc_arr_chk1*pChk1_S + 1);  // modifiers: pChk1_S
  v35_v_34: Cells_DSBDamage_G2 => 2 Cells_Apo; Cells_DSBDamage_G2*kt_apo/(k_cyc_arr_chk2*pChk2_G2 + 1);  // modifiers: pChk2_G2
  v42_v_41: => pATR_S; -(Cells_SSBDamage_S*p_atr_act_ssb*(pATR_S - 1))/(Cells + Cells_Apo + Cells_Apo1 + Cells_Apo2 + Cells_Apo3 + Cells_Apo4 + Cells_Cycle_G2 + Cells_Cycle_S + Cells_Apo_ReOx + Cells_DSBDamage_G2 + Cells_DSBDamage_S + Cells_SSBDamage_S);  // modifiers: Cells, Cells_Apo, Cells_Apo1, Cells_Apo2, Cells_Apo3, Cells_Apo4, Cells_Cycle_G2, Cells_Cycle_S, Cells_Apo_ReOx, Cells_DSBDamage_G2, Cells_DSBDamage_S, Cells_SSBDamage_S
  v43_v_42: => pATR_S; -pATM_S*p_atr_act_atm*(pATR_S - 1);  // modifiers: pATM_S
  v44_v_43: pATR_S => ; pATR_S/24;
  v45_v_44: => pChk1_S; -pATR_S*p_chk1_act*(pChk1_S - 1);  // modifiers: pATR_S
  v46_v_45: pChk1_S => ; pChk1_S/24;
  v47_v_46: pChk1_S => ; Wip1_S*pChk1_S*p_chk1_dea_wip1;  // modifiers: Wip1_S
  v48_v_47: => pATM_S; -(Cells_DSBDamage_S*p_atm_act_dsb*(pATM_S - 1))/(Cells + Cells_Apo + Cells_Apo1 + Cells_Apo2 + Cells_Apo3 + Cells_Apo4 + Cells_Cycle_G2 + Cells_Cycle_S + Cells_Apo_ReOx + Cells_DSBDamage_G2 + Cells_DSBDamage_S + Cells_SSBDamage_S);  // modifiers: Cells, Cells_Apo, Cells_Apo1, Cells_Apo2, Cells_Apo3, Cells_Apo4, Cells_Cycle_G2, Cells_Cycle_S, Cells_Apo_ReOx, Cells_DSBDamage_G2, Cells_DSBDamage_S, Cells_SSBDamage_S
  v49_v_48: pATM_S => ; pATM_S/24;
  v50_v_49: => pChk2_S; -pATM_S*p_chk2_act*(pChk2_S - 1);  // modifiers: pATM_S
  v51_v_50: pChk2_S => ; pChk2_S/24;
  v52_v_51: pChk2_S => ; Wip1_S*pChk2_S*p_chk2_dea_wip1;  // modifiers: Wip1_S
  v53_v_52: => pDNAPK_S; -(Cells_DSBDamage_S*p_dnapk_act*(pDNAPK_S - 1))/(Cells + Cells_Apo + Cells_Apo1 + Cells_Apo2 + Cells_Apo3 + Cells_Apo4 + Cells_Cycle_G2 + Cells_Cycle_S + Cells_Apo_ReOx + Cells_DSBDamage_G2 + Cells_DSBDamage_S + Cells_SSBDamage_S);  // modifiers: Cells, Cells_Apo, Cells_Apo1, Cells_Apo2, Cells_Apo3, Cells_Apo4, Cells_Cycle_G2, Cells_Cycle_S, Cells_Apo_ReOx, Cells_DSBDamage_G2, Cells_DSBDamage_S, Cells_SSBDamage_S
  v54_v_53: pDNAPK_S => ; pDNAPK_S/24;
  v55_v_54: pDNAPK_S => ; Wip1_S*pDNAPK_S*p_dnapk_dea_wip1;  // modifiers: Wip1_S
  v56_v_55: => pp53_S; -pATR_S*p_p53_act_atr*(pp53_S - 1);  // modifiers: pATR_S
  v57_v_56: => pp53_S; -pChk1_S*p_p53_act_chk1*(pp53_S - 1);  // modifiers: pChk1_S
  v58_v_57: => pp53_S; -pATM_S*p_p53_act_atm*(pp53_S - 1);  // modifiers: pATM_S
  v59_v_58: => pp53_S; -pChk2_S*p_p53_act_chk2*(pp53_S - 1);  // modifiers: pChk2_S
  v60_v_59: pp53_S => ; pp53_S/24;
  v61_v_60: => p21_mRNA_S; p_p21_mrna_turn*pp53_S/(p_mrna_exp_inh_dox*(Dox_level^6/(Dox_level^6 + p_mrna_exp_inh_dox_kd^6)) + 1);  // modifiers: pp53_S
  v62_v_61: p21_mRNA_S => ; p21_mRNA_S*p_p21_mrna_turn;
  v63_v_62: => p21_S; p21_mRNA_S*p_p21_turn;  // modifiers: p21_mRNA_S
  v64_v_63: p21_S => ; p21_S*p_p21_turn;
  v65_v_64: => Wip1_mRNA_S; p_wip1_mrna_turn*pp53_S/(p_mrna_exp_inh_dox*(Dox_level^6/(Dox_level^6 + p_mrna_exp_inh_dox_kd^6)) + 1);  // modifiers: pp53_S
  v66_v_65: Wip1_mRNA_S => ; Wip1_mRNA_S*p_wip1_mrna_turn;
  v67_v_66: => Wip1_S; Wip1_mRNA_S*p_wip1_turn;  // modifiers: Wip1_mRNA_S
  v68_v_67: Wip1_S => ; Wip1_S*p_wip1_turn;
  v69_v_68: => yH2AX_S; -pATM_S*p_h2ax_act_atm*(yH2AX_S - 1);  // modifiers: pATM_S
  v70_v_69: => yH2AX_S; -pATR_S*p_h2ax_act_atr*(yH2AX_S - 1);  // modifiers: pATR_S
  v71_v_70: => yH2AX_S; -pDNAPK_S*p_h2ax_act_dnapk*(yH2AX_S - 1);  // modifiers: pDNAPK_S
  v72_v_71: yH2AX_S => ; p_h2ax_dea*yH2AX_S;
  v73_v_72: => pATR_G2; -pATM_G2*p_atr_act_atm*(pATR_G2 - 1);  // modifiers: pATM_G2
  v74_v_73: pATR_G2 => ; pATR_G2/24;
  v75_v_74: => pChk1_G2; -pATR_G2*p_chk1_act*(pChk1_G2 - 1);  // modifiers: pATR_G2
  v76_v_75: pChk1_G2 => ; pChk1_G2/24;
  v77_v_76: pChk1_G2 => ; Wip1_G2*pChk1_G2*p_chk1_dea_wip1;  // modifiers: Wip1_G2
  v78_v_77: => pATM_G2; -(Cells_DSBDamage_G2*p_atm_act_dsb*(pATM_G2 - 1))/(Cells + Cells_Apo + Cells_Apo1 + Cells_Apo2 + Cells_Apo3 + Cells_Apo4 + 2*Cells_Cycle_G2 + Cells_Apo_ReOx + Cells_DSBDamage_G2 + Cells_DSBDamage_S + Cells_SSBDamage_S);  // modifiers: Cells, Cells_Apo, Cells_Apo1, Cells_Apo2, Cells_Apo3, Cells_Apo4, Cells_Cycle_G2, Cells_Apo_ReOx, Cells_DSBDamage_G2, Cells_DSBDamage_S, Cells_SSBDamage_S
  v79_v_78: pATM_G2 => ; pATM_G2/24;
  v80_v_79: => pChk2_G2; -pATM_G2*p_chk2_act*(pChk2_G2 - 1);  // modifiers: pATM_G2
  v81_v_80: pChk2_G2 => ; pChk2_G2/24;
  v82_v_81: pChk2_G2 => ; Wip1_G2*pChk2_G2*p_chk2_dea_wip1;  // modifiers: Wip1_G2
  v83_v_82: => pDNAPK_G2; -(Cells_DSBDamage_G2*p_dnapk_act*(pDNAPK_G2 - 1))/(Cells + Cells_Apo + Cells_Apo1 + Cells_Apo2 + Cells_Apo3 + Cells_Apo4 + 2*Cells_Cycle_G2 + Cells_Apo_ReOx + Cells_DSBDamage_G2 + Cells_DSBDamage_S + Cells_SSBDamage_S);  // modifiers: Cells, Cells_Apo, Cells_Apo1, Cells_Apo2, Cells_Apo3, Cells_Apo4, Cells_Cycle_G2, Cells_Apo_ReOx, Cells_DSBDamage_G2, Cells_DSBDamage_S, Cells_SSBDamage_S
  v84_v_83: pDNAPK_G2 => ; pDNAPK_G2/24;
  v85_v_84: pDNAPK_G2 => ; Wip1_G2*pDNAPK_G2*p_dnapk_dea_wip1;  // modifiers: Wip1_G2
  v86_v_85: => pp53_G2; -pATR_G2*p_p53_act_atr*(pp53_G2 - 1);  // modifiers: pATR_G2
  v87_v_86: => pp53_G2; -pChk1_G2*p_p53_act_chk1*(pp53_G2 - 1);  // modifiers: pChk1_G2
  v88_v_87: => pp53_G2; -pATM_G2*p_p53_act_atm*(pp53_G2 - 1);  // modifiers: pATM_G2
  v89_v_88: => pp53_G2; -pChk2_G2*p_p53_act_chk2*(pp53_G2 - 1);  // modifiers: pChk2_G2
  v90_v_89: pp53_G2 => ; pp53_G2/24;
  v91_v_90: => p21_mRNA_G2; p_p21_mrna_turn*pp53_G2/(p_mrna_exp_inh_dox*(Dox_level^6/(Dox_level^6 + p_mrna_exp_inh_dox_kd^6)) + 1);  // modifiers: pp53_G2
  v92_v_91: p21_mRNA_G2 => ; p21_mRNA_G2*p_p21_mrna_turn;
  v93_v_92: => p21_G2; p21_mRNA_G2*p_p21_turn;  // modifiers: p21_mRNA_G2
  v94_v_93: p21_G2 => ; p21_G2*p_p21_turn;
  v95_v_94: => Wip1_mRNA_G2; p_wip1_mrna_turn*pp53_G2/(p_mrna_exp_inh_dox*(Dox_level^6/(Dox_level^6 + p_mrna_exp_inh_dox_kd^6)) + 1);  // modifiers: pp53_G2
  v96_v_95: Wip1_mRNA_G2 => ; Wip1_mRNA_G2*p_wip1_mrna_turn;
  v97_v_96: => Wip1_G2; Wip1_mRNA_G2*p_wip1_turn;  // modifiers: Wip1_mRNA_G2
  v98_v_97: Wip1_G2 => ; Wip1_G2*p_wip1_turn;
  v99_v_98: => yH2AX_G2; -pATM_G2*p_h2ax_act_atm*(yH2AX_G2 - 1);  // modifiers: pATM_G2
  v100_v_99: => yH2AX_G2; -pATR_G2*p_h2ax_act_atr*(yH2AX_G2 - 1);  // modifiers: pATR_G2
  v101_v_100: => yH2AX_G2; -pDNAPK_G2*p_h2ax_act_dnapk*(yH2AX_G2 - 1);  // modifiers: pDNAPK_G2
  v102_v_101: yH2AX_G2 => ; p_h2ax_dea*yH2AX_G2;

  // Unit definitions:
  unit time = 3600 second;
end
