// SBML level 2 version 4

model Bachmann_MSB2011()
  // jak2_stat5_feedbacks
  // PEtab implementation of the model from Bachmann et al. (2011), Mol Syst Biol. ; 7: 516.
  // isDescribedBy doi:10.1038/msb.2011.50

  // Compartments:
  compartment cyt = 0.4;
  compartment nuc = 0.275;

  // Species:
  species EpoRJAK2 in cyt = init_EpoRJAK2;
  species EpoRpJAK2 in cyt = 0;
  species p1EpoRpJAK2 in cyt = 0;
  species p2EpoRpJAK2 in cyt = 0;
  species p12EpoRpJAK2 in cyt = 0;
  species EpoRJAK2_CIS in cyt = init_EpoRJAK2_CIS;
  species SHP1 in cyt = init_SHP1*(init_SHP1_multiplier*SHP1ProOE + 1);
  species SHP1Act in cyt = 0;
  species STAT5 in cyt = init_STAT5;
  species pSTAT5 in cyt = 0;
  species npSTAT5 in nuc = 0;
  species CISnRNA1 in nuc = 0;
  species CISnRNA2 in nuc = 0;
  species CISnRNA3 in nuc = 0;
  species CISnRNA4 in nuc = 0;
  species CISnRNA5 in nuc = 0;
  species CISRNA in cyt = 0;
  species CIS in cyt = init_CIS_multiplier*CISEqc*CISEqcOE;
  species SOCS3nRNA1 in nuc = 0;
  species SOCS3nRNA2 in nuc = 0;
  species SOCS3nRNA3 in nuc = 0;
  species SOCS3nRNA4 in nuc = 0;
  species SOCS3nRNA5 in nuc = 0;
  species SOCS3RNA in cyt = 0;
  species SOCS3 in cyt = init_SOCS3_multiplier*SOCS3EqcOE*SOCS3Eqc;

  // Parameters:
  CISEqc = 432.8604;
  CISInh = 7.8527e8;
  CISRNADelay = 0.1447778;
  CISRNAEqc = 1;
  CISRNATurn = 1000;
  CISTurn = 0.00839887;
  CISEqcOE = 0.5302644;
  EpoRActJAK2 = 0.2673048;
  EpoRCISInh = 1000000;
  EpoRCISRemove = 5.429807;
  JAK2ActEpo = 633167.4;
  JAK2EpoRDeaSHP1 = 142.7233;
  SHP1ActEpoR = 0.001;
  SHP1Dea = 0.008162205;
  SHP1ProOE = 2.825682;
  SOCS3EqcOE = 0.6791655;
  SOCS3Eqc = 173.6447;
  SOCS3Inh = 10.40786;
  SOCS3RNADelay = 1.064584;
  SOCS3RNAEqc = 1;
  SOCS3RNATurn = 0.008309176;
  SOCS3Turn = 10000;
  STAT5ActEpoR = 38.9958;
  STAT5ActJAK2 = 0.07810689;
  STAT5Exp = 0.07451508;
  STAT5Imp = 0.02688651;
  init_EpoRJAK2 = 3.976224;
  init_SHP1 = 26.72512;
  init_STAT5 = 79.75364;
  Epo = 1.25e-7;
  ActD = 1.25e-7;
  CISoe = 1.25e-7;
  SOCS3oe = 1.25e-7;
  init_SHP1_multiplier = 1;
  init_EpoRJAK2_CIS = 0;
  init_CIS_multiplier = 0;
  init_SOCS3_multiplier = 0;
  observableParameter1_pJAK2_au = 1;
  observableParameter2_pJAK2_au = 1;
  observableParameter1_pEpoR_au = 1;
  observableParameter2_pEpoR_au = 1;
  observableParameter1_CIS_au = 1;
  observableParameter2_CIS_au = 1;
  observableParameter1_SOCS3_au = 1;
  observableParameter2_SOCS3_au = 1;
  observableParameter1_tSTAT5_au = 1;
  observableParameter1_CIS_au1 = 1;
  observableParameter1_CIS_au2 = 1;
  observableParameter1_SOCS3RNA_foldA = 1;
  observableParameter1_SOCS3RNA_foldB = 1;
  observableParameter1_SOCS3RNA_foldC = 1;
  observableParameter1_CISRNA_foldA = 1;
  observableParameter1_CISRNA_foldB = 1;
  observableParameter1_CISRNA_foldC = 1;
  observableParameter1_pSTAT5B_rel = 1;
  observableParameter1_tSHP1_au = 1;
  observableParameter1_pSTAT5_au = 1;
  observableParameter2_pSTAT5_au = 1;
  noiseParameter1_STAT5_abs = 1;
  noiseParameter1_SHP1_abs = 1;
  noiseParameter1_pJAK2_au = 1;
  noiseParameter1_pEpoR_au = 1;
  noiseParameter1_CIS_au1 = 1;
  noiseParameter1_CIS_au2 = 1;
  noiseParameter1_tSHP1_au = 1;
  noiseParameter1_CIS_au = 1;
  noiseParameter1_CIS_abs = 1;
  noiseParameter1_SOCS3_au = 1;
  noiseParameter1_SOCS3_abs = 1;
  noiseParameter1_tSTAT5_au = 1;
  noiseParameter1_pSTAT5_au = 1;
  noiseParameter2_pSTAT5_au = 1;
  noiseParameter1_SOCS3RNA_foldA = 1;
  noiseParameter1_SOCS3RNA_foldB = 1;
  noiseParameter1_SOCS3RNA_foldC = 1;
  noiseParameter1_CISRNA_foldA = 1;
  noiseParameter1_CISRNA_foldB = 1;
  noiseParameter1_CISRNA_foldC = 1;
  noiseParameter1_pSTAT5B_rel = 1;

  // Assignment rules:
  observable_STAT5_abs := log10(STAT5);
  sigma_pJAK2_au := noiseParameter1_pJAK2_au;
  sigma_pSTAT5B_rel := noiseParameter1_pSTAT5B_rel;
  sigma_SOCS3RNA_foldA := noiseParameter1_SOCS3RNA_foldA;
  sigma_SOCS3RNA_foldB := noiseParameter1_SOCS3RNA_foldB;
  sigma_SOCS3RNA_foldC := noiseParameter1_SOCS3RNA_foldC;
  sigma_CISRNA_foldA := noiseParameter1_CISRNA_foldA;
  sigma_CISRNA_foldB := noiseParameter1_CISRNA_foldB;
  sigma_CISRNA_foldC := noiseParameter1_CISRNA_foldC;
  sigma_pEpoR_au := noiseParameter1_pEpoR_au;
  sigma_CIS_au := noiseParameter1_CIS_au;
  sigma_STAT5_abs := noiseParameter1_STAT5_abs;
  sigma_SOCS3_au := noiseParameter1_SOCS3_au;
  sigma_CIS_au1 := noiseParameter1_CIS_au1;
  sigma_CIS_au2 := noiseParameter1_CIS_au2;
  observable_pJAK2_au := log10(observableParameter1_pJAK2_au + observableParameter2_pJAK2_au*(2*EpoRpJAK2 + 2*p12EpoRpJAK2 + 2*p1EpoRpJAK2 + 2*p2EpoRpJAK2)/init_EpoRJAK2);
  observable_tSHP1_au := log10(observableParameter1_tSHP1_au*(SHP1 + SHP1Act)/init_SHP1);
  observable_CIS_au1 := log10(CIS*observableParameter1_CIS_au1/CISEqc);
  observable_CIS_au2 := log10(CIS*observableParameter1_CIS_au2/CISEqc);
  observable_pEpoR_au := log10(observableParameter1_pEpoR_au + observableParameter2_pEpoR_au*(16*p12EpoRpJAK2 + 16*p1EpoRpJAK2 + 16*p2EpoRpJAK2)/init_EpoRJAK2);
  observable_CIS_au := log10(observableParameter1_CIS_au + CIS*observableParameter2_CIS_au/CISEqc);
  observable_SOCS3_au := log10(observableParameter1_SOCS3_au + SOCS3*observableParameter2_SOCS3_au/SOCS3Eqc);
  observable_SHP1_abs := log10(SHP1 + SHP1Act);
  sigma_SHP1_abs := noiseParameter1_SHP1_abs;
  sigma_tSTAT5_au := noiseParameter1_tSTAT5_au;
  observable_CIS_abs := log10(CIS);
  sigma_CIS_abs := noiseParameter1_CIS_abs;
  sigma_tSHP1_au := noiseParameter1_tSHP1_au;
  observable_SOCS3_abs := log10(SOCS3);
  sigma_SOCS3_abs := noiseParameter1_SOCS3_abs;
  observable_pSTAT5B_rel := observableParameter1_pSTAT5B_rel + 100*pSTAT5/(STAT5 + pSTAT5);
  observable_tSTAT5_au := log10(observableParameter1_tSTAT5_au*(STAT5 + pSTAT5)/init_STAT5);
  observable_pSTAT5_au := log10(observableParameter1_pSTAT5_au + pSTAT5*observableParameter2_pSTAT5_au/init_STAT5);
  sigma_pSTAT5_au := noiseParameter1_pSTAT5_au + noiseParameter2_pSTAT5_au;
  observable_SOCS3RNA_foldA := log10(SOCS3RNA*observableParameter1_SOCS3RNA_foldA/SOCS3RNAEqc + 1);
  observable_SOCS3RNA_foldB := log10(SOCS3RNA*observableParameter1_SOCS3RNA_foldB/SOCS3RNAEqc + 1);
  observable_SOCS3RNA_foldC := log10(SOCS3RNA*observableParameter1_SOCS3RNA_foldC/SOCS3RNAEqc + 1);
  observable_CISRNA_foldA := log10(CISRNA*observableParameter1_CISRNA_foldA/CISRNAEqc + 1);
  observable_CISRNA_foldB := log10(CISRNA*observableParameter1_CISRNA_foldB/CISRNAEqc + 1);
  observable_CISRNA_foldC := log10(CISRNA*observableParameter1_CISRNA_foldC/CISRNAEqc + 1);

  // Reactions:
  v1_v_0: EpoRJAK2 => EpoRpJAK2; cyt*(Epo*EpoRJAK2*JAK2ActEpo/(SOCS3*SOCS3Inh/SOCS3Eqc + 1));  // modifiers: SOCS3
  v2_v_1: EpoRpJAK2 => EpoRJAK2; cyt*(EpoRpJAK2*JAK2EpoRDeaSHP1*SHP1Act/init_SHP1);  // modifiers: SHP1Act
  v3_v_2: EpoRpJAK2 => p1EpoRpJAK2; cyt*(EpoRpJAK2*EpoRActJAK2/(SOCS3*SOCS3Inh/SOCS3Eqc + 1));  // modifiers: SOCS3
  v4_v_3: EpoRpJAK2 => p2EpoRpJAK2; cyt*(3*EpoRpJAK2*EpoRActJAK2/((SOCS3*SOCS3Inh/SOCS3Eqc + 1)*(EpoRCISInh*EpoRJAK2_CIS + 1)));  // modifiers: EpoRJAK2_CIS, SOCS3
  v5_v_4: p1EpoRpJAK2 => p12EpoRpJAK2; cyt*(3*EpoRActJAK2*p1EpoRpJAK2/((SOCS3*SOCS3Inh/SOCS3Eqc + 1)*(EpoRCISInh*EpoRJAK2_CIS + 1)));  // modifiers: EpoRJAK2_CIS, SOCS3
  v6_v_5: p2EpoRpJAK2 => p12EpoRpJAK2; cyt*(EpoRActJAK2*p2EpoRpJAK2/(SOCS3*SOCS3Inh/SOCS3Eqc + 1));  // modifiers: SOCS3
  v7_v_6: p1EpoRpJAK2 => EpoRJAK2; cyt*(JAK2EpoRDeaSHP1*SHP1Act*p1EpoRpJAK2/init_SHP1);  // modifiers: SHP1Act
  v8_v_7: p2EpoRpJAK2 => EpoRJAK2; cyt*(JAK2EpoRDeaSHP1*SHP1Act*p2EpoRpJAK2/init_SHP1);  // modifiers: SHP1Act
  v9_v_8: p12EpoRpJAK2 => EpoRJAK2; cyt*(JAK2EpoRDeaSHP1*SHP1Act*p12EpoRpJAK2/init_SHP1);  // modifiers: SHP1Act
  v10_v_9: EpoRJAK2_CIS => ; cyt*(EpoRJAK2_CIS*EpoRCISRemove*(p12EpoRpJAK2 + p1EpoRpJAK2)/init_EpoRJAK2);  // modifiers: p12EpoRpJAK2, p1EpoRpJAK2
  v11_v_10: SHP1 => SHP1Act; cyt*(SHP1*SHP1ActEpoR*(EpoRpJAK2 + p12EpoRpJAK2 + p1EpoRpJAK2 + p2EpoRpJAK2)/init_EpoRJAK2);  // modifiers: EpoRpJAK2, p12EpoRpJAK2, p1EpoRpJAK2, p2EpoRpJAK2
  v12_v_11: SHP1Act => SHP1; cyt*SHP1Dea*SHP1Act;
  v13_v_12: STAT5 => pSTAT5; cyt*(STAT5*STAT5ActJAK2*(EpoRpJAK2 + p12EpoRpJAK2 + p1EpoRpJAK2 + p2EpoRpJAK2)/(init_EpoRJAK2*(SOCS3*SOCS3Inh/SOCS3Eqc + 1)));  // modifiers: EpoRpJAK2, SOCS3, p12EpoRpJAK2, p1EpoRpJAK2, p2EpoRpJAK2
  v14_v_13: STAT5 => pSTAT5; cyt*(STAT5*STAT5ActEpoR*(p12EpoRpJAK2 + p1EpoRpJAK2)^2/(init_EpoRJAK2^2*(SOCS3*SOCS3Inh/SOCS3Eqc + 1)*(CIS*CISInh/CISEqc + 1)));  // modifiers: CIS, SOCS3, p12EpoRpJAK2, p1EpoRpJAK2
  v15_v_14: pSTAT5 => npSTAT5; cyt*STAT5Imp*pSTAT5;
  v16_v_15: npSTAT5 => STAT5; nuc*STAT5Exp*npSTAT5;
  v17_v_16: => CISnRNA1; nuc*(CISRNAEqc*CISRNATurn*npSTAT5/init_STAT5);  // modifiers: npSTAT5
  v18_v_17: CISnRNA1 => CISnRNA2; nuc*CISnRNA1*CISRNADelay;
  v19_v_18: CISnRNA2 => CISnRNA3; nuc*CISnRNA2*CISRNADelay;
  v20_v_19: CISnRNA3 => CISnRNA4; nuc*CISnRNA3*CISRNADelay;
  v21_v_20: CISnRNA4 => CISnRNA5; nuc*CISnRNA4*CISRNADelay;
  v22_v_21: CISnRNA5 => CISRNA; nuc*CISnRNA5*CISRNADelay;
  v23_v_22: CISRNA => ; cyt*CISRNA*CISRNATurn;
  v24_v_23: => CIS; cyt*(CISRNA*CISEqc*CISTurn/CISRNAEqc);  // modifiers: CISRNA
  v25_v_24: CIS => ; cyt*CIS*CISTurn;
  v27_v_26: => SOCS3nRNA1; nuc*(SOCS3RNAEqc*SOCS3RNATurn*npSTAT5/init_STAT5);  // modifiers: npSTAT5
  v28_v_27: SOCS3nRNA1 => SOCS3nRNA2; nuc*SOCS3nRNA1*SOCS3RNADelay;
  v29_v_28: SOCS3nRNA2 => SOCS3nRNA3; nuc*SOCS3nRNA2*SOCS3RNADelay;
  v30_v_29: SOCS3nRNA3 => SOCS3nRNA4; nuc*SOCS3nRNA3*SOCS3RNADelay;
  v31_v_30: SOCS3nRNA4 => SOCS3nRNA5; nuc*SOCS3nRNA4*SOCS3RNADelay;
  v32_v_31: SOCS3nRNA5 => SOCS3RNA; nuc*SOCS3nRNA5*SOCS3RNADelay;
  v33_v_32: SOCS3RNA => ; cyt*SOCS3RNA*SOCS3RNATurn;
  v34_v_33: => SOCS3; cyt*(SOCS3RNA*SOCS3Eqc*SOCS3Turn/SOCS3RNAEqc);  // modifiers: SOCS3RNA
  v35_v_34: SOCS3 => ; cyt*SOCS3*SOCS3Turn;

  // Unit definitions:
  unit time = 60 second;
end
