// SBML level 2 version 4

model Beer_MolBioSystems2014()
  // TwoStepSynthesisWithGlu
  // PEtab implementation of the model from Beer et al. (2014), Mol Biosyst.;10(7):1709-18
  // isDescribedBy doi:10.1039/c3mb70594c

  // Compartments:
  compartment medium = 1;

  // Species:
  species Bac in medium = init_Bac;
  species Glu in medium = 10;
  species cGlu in medium = 0;
  species Ind in medium = 0;

  // Parameters:
  Bacmax_typeIDT1_ExpID1 = 1;
  Bacmax_typeIDT1_ExpID2 = 1;
  Bacmax_typeIDT1_ExpID3 = 1;
  Bacmax_typeIDT1_ExpID4 = 1;
  Bacmax_typeIDT1_ExpID5 = 1;
  Bacmax_typeIDT1_ExpID6 = 1;
  Bacmax_typeIDT3_ExpID1 = 1;
  Bacmax_typeIDT3_ExpID2 = 1;
  Bacmax_typeIDT3_ExpID3 = 1;
  Bacmax_typeIDT3_ExpID4 = 1;
  Bacmax_typeIDT3_ExpID5 = 1;
  Bacmax_typeIDT3_ExpID6 = 1;
  Bacmax_typeIDT5_ExpID1 = 1;
  Bacmax_typeIDT5_ExpID2 = 1;
  Bacmax_typeIDT5_ExpID3 = 1;
  Bacmax_typeIDT5_ExpID4 = 1;
  Bacmax_typeIDT5_ExpID5 = 1;
  Bacmax_typeIDT5_ExpID6 = 1;
  Bacmax_typeIDwt_ExpID4 = 1;
  beta_typeIDT1_ExpID1 = 1;
  beta_typeIDT1_ExpID2 = 1;
  beta_typeIDT1_ExpID3 = 1;
  beta_typeIDT1_ExpID4 = 1;
  beta_typeIDT1_ExpID5 = 1;
  beta_typeIDT1_ExpID6 = 1;
  beta_typeIDT3_ExpID1 = 1;
  beta_typeIDT3_ExpID2 = 1;
  beta_typeIDT3_ExpID3 = 1;
  beta_typeIDT3_ExpID4 = 1;
  beta_typeIDT3_ExpID5 = 1;
  beta_typeIDT3_ExpID6 = 1;
  beta_typeIDT5_ExpID1 = 1;
  beta_typeIDT5_ExpID2 = 1;
  beta_typeIDT5_ExpID3 = 1;
  beta_typeIDT5_ExpID4 = 1;
  beta_typeIDT5_ExpID5 = 1;
  beta_typeIDT5_ExpID6 = 1;
  beta_typeIDwt_ExpID4 = 1;
  kdegi_typeIDT1 = 1;
  kdegi_typeIDT3 = 1;
  kdegi_typeIDT5 = 1;
  kdegi_typeIDwt = 1;
  kdim_typeIDT1 = 1;
  kdim_typeIDT3 = 1;
  kdim_typeIDT5 = 1;
  kdim_typeIDwt = 1;
  ksyn_typeIDT1 = 1;
  ksyn_typeIDT3 = 1;
  ksyn_typeIDT5 = 1;
  ksyn_typeIDwt = 1;
  tau_typeIDT1_ExpID1 = 1;
  tau_typeIDT1_ExpID2 = 1;
  tau_typeIDT1_ExpID3 = 1;
  tau_typeIDT1_ExpID4 = 1;
  tau_typeIDT1_ExpID5 = 1;
  tau_typeIDT1_ExpID6 = 1;
  tau_typeIDT3_ExpID1 = 1;
  tau_typeIDT3_ExpID2 = 1;
  tau_typeIDT3_ExpID3 = 1;
  tau_typeIDT3_ExpID4 = 1;
  tau_typeIDT3_ExpID5 = 1;
  tau_typeIDT3_ExpID6 = 1;
  tau_typeIDT5_ExpID1 = 1;
  tau_typeIDT5_ExpID2 = 1;
  tau_typeIDT5_ExpID3 = 1;
  tau_typeIDT5_ExpID4 = 1;
  tau_typeIDT5_ExpID5 = 1;
  tau_typeIDT5_ExpID6 = 1;
  tau_typeIDwt_ExpID4 = 1;
  init_Bac = 0.01470079;
  noiseParameter1_Bacnorm = 0.03705789;
  noiseParameter1_IndconcNormRange = 0.0203937;
  switch_Bacmax_typeIDT1_ExpID1 = 1;
  switch_Bacmax_typeIDT1_ExpID2 = 1;
  switch_Bacmax_typeIDT1_ExpID3 = 1;
  switch_Bacmax_typeIDT1_ExpID4 = 1;
  switch_Bacmax_typeIDT1_ExpID5 = 1;
  switch_Bacmax_typeIDT1_ExpID6 = 1;
  switch_Bacmax_typeIDT3_ExpID1 = 1;
  switch_Bacmax_typeIDT3_ExpID2 = 1;
  switch_Bacmax_typeIDT3_ExpID3 = 1;
  switch_Bacmax_typeIDT3_ExpID4 = 1;
  switch_Bacmax_typeIDT3_ExpID5 = 1;
  switch_Bacmax_typeIDT3_ExpID6 = 1;
  switch_Bacmax_typeIDT5_ExpID1 = 1;
  switch_Bacmax_typeIDT5_ExpID2 = 1;
  switch_Bacmax_typeIDT5_ExpID3 = 1;
  switch_Bacmax_typeIDT5_ExpID4 = 1;
  switch_Bacmax_typeIDT5_ExpID5 = 1;
  switch_Bacmax_typeIDT5_ExpID6 = 1;
  switch_Bacmax_typeIDwt_ExpID4 = 1;
  switch_beta_typeIDT1_ExpID1 = 1;
  switch_beta_typeIDT1_ExpID2 = 1;
  switch_beta_typeIDT1_ExpID3 = 1;
  switch_beta_typeIDT1_ExpID4 = 1;
  switch_beta_typeIDT1_ExpID5 = 1;
  switch_beta_typeIDT1_ExpID6 = 1;
  switch_beta_typeIDT3_ExpID1 = 1;
  switch_beta_typeIDT3_ExpID2 = 1;
  switch_beta_typeIDT3_ExpID3 = 1;
  switch_beta_typeIDT3_ExpID4 = 1;
  switch_beta_typeIDT3_ExpID5 = 1;
  switch_beta_typeIDT3_ExpID6 = 1;
  switch_beta_typeIDT5_ExpID1 = 1;
  switch_beta_typeIDT5_ExpID2 = 1;
  switch_beta_typeIDT5_ExpID3 = 1;
  switch_beta_typeIDT5_ExpID4 = 1;
  switch_beta_typeIDT5_ExpID5 = 1;
  switch_beta_typeIDT5_ExpID6 = 1;
  switch_beta_typeIDwt_ExpID4 = 1;
  switch_kdegi_typeIDT1 = 1;
  switch_kdegi_typeIDT3 = 1;
  switch_kdegi_typeIDT5 = 1;
  switch_kdegi_typeIDwt = 1;
  switch_kdim_typeIDT1 = 1;
  switch_kdim_typeIDT3 = 1;
  switch_kdim_typeIDT5 = 1;
  switch_kdim_typeIDwt = 1;
  switch_ksyn_typeIDT1 = 1;
  switch_ksyn_typeIDT3 = 1;
  switch_ksyn_typeIDT5 = 1;
  switch_ksyn_typeIDwt = 1;
  switch_tau_typeIDT1_ExpID1 = 1;
  switch_tau_typeIDT1_ExpID2 = 1;
  switch_tau_typeIDT1_ExpID3 = 1;
  switch_tau_typeIDT1_ExpID4 = 1;
  switch_tau_typeIDT1_ExpID5 = 1;
  switch_tau_typeIDT1_ExpID6 = 1;
  switch_tau_typeIDT3_ExpID1 = 1;
  switch_tau_typeIDT3_ExpID2 = 1;
  switch_tau_typeIDT3_ExpID3 = 1;
  switch_tau_typeIDT3_ExpID4 = 1;
  switch_tau_typeIDT3_ExpID5 = 1;
  switch_tau_typeIDT3_ExpID6 = 1;
  switch_tau_typeIDT5_ExpID1 = 1;
  switch_tau_typeIDT5_ExpID2 = 1;
  switch_tau_typeIDT5_ExpID3 = 1;
  switch_tau_typeIDT5_ExpID4 = 1;
  switch_tau_typeIDT5_ExpID5 = 1;
  switch_tau_typeIDT5_ExpID6 = 1;
  switch_tau_typeIDwt_ExpID4 = 1;

  // Assignment rules:
  sigma_Bacnorm := noiseParameter1_Bacnorm;
  sigma_IndconcNormRange := noiseParameter1_IndconcNormRange;
  lag := piecewise(0, time - (tau_typeIDT1_ExpID1*switch_tau_typeIDT1_ExpID1 + tau_typeIDT1_ExpID2*switch_tau_typeIDT1_ExpID2 + tau_typeIDT1_ExpID3*switch_tau_typeIDT1_ExpID3 + tau_typeIDT1_ExpID4*switch_tau_typeIDT1_ExpID4 + tau_typeIDT1_ExpID5*switch_tau_typeIDT1_ExpID5 + tau_typeIDT1_ExpID6*switch_tau_typeIDT1_ExpID6 + tau_typeIDT3_ExpID1*switch_tau_typeIDT3_ExpID1 + tau_typeIDT3_ExpID2*switch_tau_typeIDT3_ExpID2 + tau_typeIDT3_ExpID3*switch_tau_typeIDT3_ExpID3 + tau_typeIDT3_ExpID4*switch_tau_typeIDT3_ExpID4 + tau_typeIDT3_ExpID5*switch_tau_typeIDT3_ExpID5 + tau_typeIDT3_ExpID6*switch_tau_typeIDT3_ExpID6 + tau_typeIDT5_ExpID1*switch_tau_typeIDT5_ExpID1 + tau_typeIDT5_ExpID2*switch_tau_typeIDT5_ExpID2 + tau_typeIDT5_ExpID3*switch_tau_typeIDT5_ExpID3 + tau_typeIDT5_ExpID4*switch_tau_typeIDT5_ExpID4 + tau_typeIDT5_ExpID5*switch_tau_typeIDT5_ExpID5 + tau_typeIDT5_ExpID6*switch_tau_typeIDT5_ExpID6 + tau_typeIDwt_ExpID4*switch_tau_typeIDwt_ExpID4) < 0, 1);
  observable_Bacnorm := Bac;
  observable_IndconcNormRange := Ind;

  // Reactions:
  reaction1: => Bac; medium*(-(Bac*(beta_typeIDT1_ExpID1*switch_beta_typeIDT1_ExpID1 + beta_typeIDT1_ExpID2*switch_beta_typeIDT1_ExpID2 + beta_typeIDT1_ExpID3*switch_beta_typeIDT1_ExpID3 + beta_typeIDT1_ExpID4*switch_beta_typeIDT1_ExpID4 + beta_typeIDT1_ExpID5*switch_beta_typeIDT1_ExpID5 + beta_typeIDT1_ExpID6*switch_beta_typeIDT1_ExpID6 + beta_typeIDT3_ExpID1*switch_beta_typeIDT3_ExpID1 + beta_typeIDT3_ExpID2*switch_beta_typeIDT3_ExpID2 + beta_typeIDT3_ExpID3*switch_beta_typeIDT3_ExpID3 + beta_typeIDT3_ExpID4*switch_beta_typeIDT3_ExpID4 + beta_typeIDT3_ExpID5*switch_beta_typeIDT3_ExpID5 + beta_typeIDT3_ExpID6*switch_beta_typeIDT3_ExpID6 + beta_typeIDT5_ExpID1*switch_beta_typeIDT5_ExpID1 + beta_typeIDT5_ExpID2*switch_beta_typeIDT5_ExpID2 + beta_typeIDT5_ExpID3*switch_beta_typeIDT5_ExpID3 + beta_typeIDT5_ExpID4*switch_beta_typeIDT5_ExpID4 + beta_typeIDT5_ExpID5*switch_beta_typeIDT5_ExpID5 + beta_typeIDT5_ExpID6*switch_beta_typeIDT5_ExpID6 + beta_typeIDwt_ExpID4*switch_beta_typeIDwt_ExpID4)*lag*(Bac - (Bacmax_typeIDT1_ExpID1*switch_Bacmax_typeIDT1_ExpID1 + Bacmax_typeIDT1_ExpID2*switch_Bacmax_typeIDT1_ExpID2 + Bacmax_typeIDT1_ExpID3*switch_Bacmax_typeIDT1_ExpID3 + Bacmax_typeIDT1_ExpID4*switch_Bacmax_typeIDT1_ExpID4 + Bacmax_typeIDT1_ExpID5*switch_Bacmax_typeIDT1_ExpID5 + Bacmax_typeIDT1_ExpID6*switch_Bacmax_typeIDT1_ExpID6 + Bacmax_typeIDT3_ExpID1*switch_Bacmax_typeIDT3_ExpID1 + Bacmax_typeIDT3_ExpID2*switch_Bacmax_typeIDT3_ExpID2 + Bacmax_typeIDT3_ExpID3*switch_Bacmax_typeIDT3_ExpID3 + Bacmax_typeIDT3_ExpID4*switch_Bacmax_typeIDT3_ExpID4 + Bacmax_typeIDT3_ExpID5*switch_Bacmax_typeIDT3_ExpID5 + Bacmax_typeIDT3_ExpID6*switch_Bacmax_typeIDT3_ExpID6 + Bacmax_typeIDT5_ExpID1*switch_Bacmax_typeIDT5_ExpID1 + Bacmax_typeIDT5_ExpID2*switch_Bacmax_typeIDT5_ExpID2 + Bacmax_typeIDT5_ExpID3*switch_Bacmax_typeIDT5_ExpID3 + Bacmax_typeIDT5_ExpID4*switch_Bacmax_typeIDT5_ExpID4 + Bacmax_typeIDT5_ExpID5*switch_Bacmax_typeIDT5_ExpID5 + Bacmax_typeIDT5_ExpID6*switch_Bacmax_typeIDT5_ExpID6 + Bacmax_typeIDwt_ExpID4*switch_Bacmax_typeIDwt_ExpID4)))/(Bacmax_typeIDT1_ExpID1*switch_Bacmax_typeIDT1_ExpID1 + Bacmax_typeIDT1_ExpID2*switch_Bacmax_typeIDT1_ExpID2 + Bacmax_typeIDT1_ExpID3*switch_Bacmax_typeIDT1_ExpID3 + Bacmax_typeIDT1_ExpID4*switch_Bacmax_typeIDT1_ExpID4 + Bacmax_typeIDT1_ExpID5*switch_Bacmax_typeIDT1_ExpID5 + Bacmax_typeIDT1_ExpID6*switch_Bacmax_typeIDT1_ExpID6 + Bacmax_typeIDT3_ExpID1*switch_Bacmax_typeIDT3_ExpID1 + Bacmax_typeIDT3_ExpID2*switch_Bacmax_typeIDT3_ExpID2 + Bacmax_typeIDT3_ExpID3*switch_Bacmax_typeIDT3_ExpID3 + Bacmax_typeIDT3_ExpID4*switch_Bacmax_typeIDT3_ExpID4 + Bacmax_typeIDT3_ExpID5*switch_Bacmax_typeIDT3_ExpID5 + Bacmax_typeIDT3_ExpID6*switch_Bacmax_typeIDT3_ExpID6 + Bacmax_typeIDT5_ExpID1*switch_Bacmax_typeIDT5_ExpID1 + Bacmax_typeIDT5_ExpID2*switch_Bacmax_typeIDT5_ExpID2 + Bacmax_typeIDT5_ExpID3*switch_Bacmax_typeIDT5_ExpID3 + Bacmax_typeIDT5_ExpID4*switch_Bacmax_typeIDT5_ExpID4 + Bacmax_typeIDT5_ExpID5*switch_Bacmax_typeIDT5_ExpID5 + Bacmax_typeIDT5_ExpID6*switch_Bacmax_typeIDT5_ExpID6 + Bacmax_typeIDwt_ExpID4*switch_Bacmax_typeIDwt_ExpID4));
  reaction2: => Glu; medium*(-Bac)*Glu*(ksyn_typeIDwt*switch_ksyn_typeIDwt + ksyn_typeIDT1*switch_ksyn_typeIDT1 + ksyn_typeIDT3*switch_ksyn_typeIDT3 + ksyn_typeIDT5*switch_ksyn_typeIDT5);  // modifiers: Bac
  reaction3: => cGlu; medium*(Bac*Glu*(ksyn_typeIDwt*switch_ksyn_typeIDwt + ksyn_typeIDT1*switch_ksyn_typeIDT1 + ksyn_typeIDT3*switch_ksyn_typeIDT3 + ksyn_typeIDT5*switch_ksyn_typeIDT5) - cGlu^2*(kdim_typeIDwt*switch_kdim_typeIDwt + kdim_typeIDT1*switch_kdim_typeIDT1 + kdim_typeIDT3*switch_kdim_typeIDT3 + kdim_typeIDT5*switch_kdim_typeIDT5));  // modifiers: Bac, Glu
  reaction4: => Ind; medium*(cGlu^2*(kdim_typeIDwt*switch_kdim_typeIDwt + kdim_typeIDT1*switch_kdim_typeIDT1 + kdim_typeIDT3*switch_kdim_typeIDT3 + kdim_typeIDT5*switch_kdim_typeIDT5) - Ind*(kdegi_typeIDwt*switch_kdegi_typeIDwt + kdegi_typeIDT1*switch_kdegi_typeIDT1 + kdegi_typeIDT3*switch_kdegi_typeIDT3 + kdegi_typeIDT5*switch_kdegi_typeIDT5));  // modifiers: cGlu

  // Unit definitions:
  unit time = 60 second;
end
