// SBML level 2 version 4

model Borghans_BiophysChem1997()
  // model_Borghans_BiophysChem_1997
  // PEtab implementation of the model from Borghans et al. (1997), Biophysical Chemistry 66(1) 25-41
  // isDescribedBy doi:10.1016/s0301-4622(97)00010-0

  // Compartments:
  compartment extracellular = 1;
  compartment cytosol = 1;
  compartment intravesicular = 1;

  // Species:
  species Z_state in cytosol = init_Z_state; Z_state is "Ca^{2+} in cytosol";
  species Y_state in intravesicular = init_Y_state; Y_state is "Ca^{2+} in Ca^{2+}-sensitive pool";
  species A_state in cytosol = init_A_state; A_state is "IP_3 concentration";

  // Parameters:
  K2 = 0.09994856;
  K_par = 11.41208;
  Ka = 0.1975939;
  Kd = 0.3924975;
  Kf = 1.13795;
  Kp = 0.9965675;
  Ky = 0.2003641;
  Kz = 0.3033535;
  Vd = 92.87393;
  Vm2 = 7.457124;
  Vm3 = 22.70252;
  Vp = 2.756858;
  beta_par = 1.123952;
  epsilon_par = 0.1632322;
  init_A_state = 1;
  init_Y_state = 0.9993481;
  init_Z_state = 0.08792052;
  n_par = 4.102514;
  observableParameter1_Ca = 0.3007637;
  observableParameter2_Ca = 0.6580731;
  noiseParameter1_Ca = 0.1049229;
  v0 = 2.317787;
  v1 = 1.004888;

  // Assignment rules:
  sigma_Ca := noiseParameter1_Ca;
  observable_Ca := observableParameter1_Ca + Z_state*observableParameter2_Ca;

  // Reactions:
  v1_v_0: => Z_state; cytosol*(v0 + beta_par*v1);
  v2_v_1: Z_state => Y_state; cytosol*(Vm2*Z_state^2/(K2^2 + Z_state^2));
  v3_v_2: Y_state => Z_state; intravesicular*(A_state^4*Vm3*Y_state^2*Z_state^4/((A_state^4 + Ka^4)*(Ky^2 + Y_state^2)*(Kz^4 + Z_state^4)));  // modifiers: A_state
  v4_v_3: Y_state => Z_state; intravesicular*Kf*Y_state;
  v5_v_4: Z_state => ; cytosol*K_par*Z_state;
  v6_v_5: => A_state; cytosol*Vp*beta_par;
  v7_v_6: A_state => ; cytosol*(A_state^2*Vd*Z_state^n_par/((Kd^n_par + Z_state^n_par)*(A_state^2 + Kp^2)));  // modifiers: Z_state
  v8_v_7: A_state => ; cytosol*A_state*epsilon_par;

  // Unit definitions:
  unit time = 60 second;
end
