// SBML level 2 version 4

model Brannmark_JBC2010()
  // model_Mif
  // PEtab implementation of the model from Brannmark et al. (2010), THE JOURNAL OF BIOLOGICAL CHEMISTRY VOL. 285, NO. 26, pp. 20171–20179,
  // isDescribedBy doi:10.1074/jbc.M110.106849

  // Compartments:
  compartment default = 1 volume;
  compartment cyt in default = 1 volume;

  // Species:
  species IR in cyt = 9.949576;
  species IRins in cyt = 0.01739722;
  species IRp in cyt = 1.762901e-9;
  species IRiP in cyt = 1.1159e-5;
  species IRi in cyt = 0.03301519;
  species IRS in cyt = 9.866993;
  species IRSiP in cyt = 0.1330065;
  species X in cyt = 9.999842;
  species Xp in cyt = 0.0001580051;

  // Parameters:
  k1a = 0.1772523;
  k1aBasic = 0.0003941057;
  k1b = 0.1745296;
  k1c = 0.05086185;
  k1d = 500000;
  k1e = 1e-6;
  k1f = 500000;
  k1g = 1931.134;
  k1r = 0.02669839;
  k21 = 2.130199;
  k22 = 658.7629;
  k3 = 4.943698e-5;
  k_IRSiP_DosR = 37.96368;
  km2 = 1.161681;
  km3 = 0.416147;
  observable_IRS1_P has dimensionless;
  observable_IR1_P has dimensionless;
  noiseParameter1_IRS1_P = 1 dimensionless;
  noiseParameter1_IR1_P = 1 dimensionless;
  observableParameter1_IR1_P = 0 dimensionless;
  observableParameter1_IRS1_P = 0 dimensionless;
  sigma_IRS1_P has dimensionless;
  sigma_IR1_P has dimensionless;
  insulin_time_1 = 0 time;
  insulin_time_2 = 1000 time;
  insulin_dose_1 = 0.3 substance;
  insulin_dose_2 = 0 substance;

  // Assignment rules:
  insulin := insulin_dose_1*piecewise(0, time - insulin_time_1 < 0, 1) + insulin_dose_2*piecewise(0, time - insulin_time_2 < 0, 1);
  observable_IRS1_P := observableParameter1_IRS1_P*IRSiP;
  observable_IR1_P := observableParameter1_IR1_P*(IRp + IRiP);
  sigma_IRS1_P := noiseParameter1_IRS1_P;
  sigma_IR1_P := noiseParameter1_IR1_P;

  // Reactions:
  v1_v_0: IR => IRins; cyt*(IR*k1aBasic + IR*insulin*k1a);
  v2_v_1: IRins => IR; cyt*IRins*k1b;
  v3_v_2: IRins => IRp; cyt*IRins*k1c;
  v4_v_3: IRp => IRiP; cyt*IRp*k1d;
  v5_v_4: IRiP => IRi; cyt*IRiP*(k1e + Xp*k1f/(Xp + 1));  // modifiers: Xp
  v6_v_5: IRp => IR; cyt*IRp*k1g;
  v7_v_6: IRi => IR; cyt*IRi*k1r;
  v8_v_7: IRS => IRSiP; cyt*IRS*k21*(IRp + IRiP*k22);  // modifiers: IRiP, IRp
  v9_v_8: IRSiP => IRS; cyt*IRSiP*km2;
  v10_v_9: X => Xp; cyt*IRSiP*X*k3;  // modifiers: IRSiP
  v11_v_10: Xp => X; cyt*Xp*km3;

  // Unit definitions:
  unit time = 60 second;
  unit substance = mole;
  unit volume = litre;
  unit area = metre^2;
  unit length = metre;
end
