// SBML level 2 version 4

model Bruno_JExpBio2016()
  // PEtab implementation of the model from Bruno et al. (2016), J Exp Bot.; 67(21): 5993–6005
  // isDescribedBy doi:10.1093/jxb/erw356

  // Compartments:
  compartment cyt = 1;

  // Species:
  species bcar in cyt = init_bcar; bcar is "beta-carotin";
  species bcry in cyt = init_bcry;
  species b10 in cyt = init_b10; b10 is "beta-10";
  species bio in cyt = 0; bio is "beta-io";
  species ohb10 in cyt = init_ohb10; ohb10 is "OH-beta-10";
  species ohbio in cyt = 0; ohbio is "OH-beta-io";
  species zea in cyt = init_zea;

  // Parameters:
  init_b10 = 3.256733;
  init_bcar = 3.256733;
  init_bcry = 3.256733;
  init_ohb10 = 3.256733;
  init_zea = 3.256733;
  k5 = 0.003050071;
  kb1 = 0.01641699;
  kb2 = 0.005371462;
  kc1 = 0.001627209;
  kc2 = 0.006730609;
  kc4 = 0.006179669;
  k5_multiplier = 0.5218171;
  kb1_multiplier = 0.5218171;
  kb2_multiplier = 0.5218171;
  kc1_multiplier = 0.5218171;
  kc2_multiplier = 0.5218171;
  kc4_multiplier = 0.5218171;
  noiseParameter1_obcar = 1;
  noiseParameter1_obcry = 1;
  noiseParameter1_obio = 1;
  noiseParameter1_ob10 = 1;
  noiseParameter1_oohb10 = 1;
  noiseParameter1_ozea = 1;

  // Assignment rules:
  sigma_obcar := noiseParameter1_obcar;
  sigma_obcry := noiseParameter1_obcry;
  sigma_obio := noiseParameter1_obio;
  sigma_ob10 := noiseParameter1_ob10;
  sigma_oohb10 := noiseParameter1_oohb10;
  sigma_ozea := noiseParameter1_ozea;
  observable_obcar := bcar;
  observable_obcry := bcry;
  observable_obio := bio;
  observable_ob10 := b10;
  observable_oohb10 := ohb10;
  observable_ozea := zea;

  // Reactions:
  v1_ReactionName: bcar => b10 + bio; cyt*bcar*kb1*kb1_multiplier;
  v2_ReactionName: b10 => bio; cyt*b10*kb2*kb2_multiplier;
  v3_ReactionName: bcry => b10 + ohbio; cyt*bcry*kc1*kc1_multiplier;
  v4_ReactionName: bcry => bio + ohb10; cyt*bcry*kc2*kc2_multiplier;
  v5_ReactionName: ohb10 => ohbio; cyt*kc4*kc4_multiplier*ohb10;
  v6_ReactionName: zea => ohb10 + ohbio; cyt*k5*k5_multiplier*zea;

  // Unit definitions:
  unit time = 60 second;
end
