// SBML level 2 version 4

model Crauste_CellSystems2017()
  // ModelImmuneCells
  // PEtab implementation of the model from Crauste et al. (2017), Cell Syst. 2017 Mar 22;4(3):306-317.e4
  // isDescribedBy doi:10.1016/j.cels.2017.01.014

  // Compartments:
  compartment default = 1;

  // Species:
  species Naive in default = 8090;
  species EarlyEffector in default = 0;
  species LateEffector in default = 0;
  species Memory in default = 0;
  species Pathogen in default = 1;

  // Parameters:
  delta_EL = 0.517946;
  delta_LM = 0.02258064;
  delta_NE = 0.01193079;
  mu_EE = 3.913593e-5;
  mu_LE = 1e-10;
  mu_LL = 8.115201e-6;
  mu_N = 0.7399073;
  mu_P = 1e-5;
  mu_PE = 1.365718e-10;
  mu_PL = 3.634031e-5;
  rho_E = 0.5074157;
  rho_P = 0.1263823;
  noiseParameter1_Naive = 0;
  noiseParameter1_EarlyEffector = 0;
  noiseParameter1_LateEffector = 0;
  noiseParameter1_Memory = 0;

  // Assignment rules:
  sigma_Naive := noiseParameter1_Naive;
  sigma_EarlyEffector := noiseParameter1_EarlyEffector;
  sigma_LateEffector := noiseParameter1_LateEffector;
  sigma_Memory := noiseParameter1_Memory;
  observable_Naive := Naive;
  observable_EarlyEffector := EarlyEffector;
  observable_LateEffector := LateEffector;
  observable_Memory := Memory;

  // Reactions:
  v1_v_0: Naive => ; Naive*mu_N;
  v2_v_1: Naive => EarlyEffector; Naive*Pathogen*delta_NE;  // modifiers: Pathogen
  v3_v_2: => EarlyEffector; EarlyEffector*Pathogen*rho_E;  // modifiers: Pathogen
  v4_v_3: EarlyEffector => ; EarlyEffector^2*mu_EE;
  v5_v_4: EarlyEffector => LateEffector; EarlyEffector*delta_EL;
  v6_v_5: LateEffector => ; LateEffector^2*mu_LL;
  v7_v_6: LateEffector => ; EarlyEffector*LateEffector*mu_LE;  // modifiers: EarlyEffector
  v8_v_7: LateEffector => Memory; LateEffector*delta_LM;
  v9_v_8: => Pathogen; Pathogen^2*rho_P;
  v10_v_9: Pathogen => ; EarlyEffector*Pathogen*mu_PE;  // modifiers: EarlyEffector
  v11_v_10: Pathogen => ; LateEffector*Pathogen*mu_PL;  // modifiers: LateEffector
  v12_v_11: Pathogen => ; Pathogen*mu_P;

  // Unit definitions:
  unit time = 3600 second;
end
