// SBML level 2 version 4

model Elowitz_Nature2000()
  // model_Elowitz_Nature2000
  // PEtab implementation of the model from Elowitz et al. (2000), Nature. 2000 Jan 20;403(6767):335-8
  // isDescribedBy doi:10.1038/35002125

  // Compartments:
  compartment cell = 1;

  // Species:
  species X_protein in cell = init_X_protein; X_protein is "LacI protein";
  species Y_protein in cell = init_Y_protein; Y_protein is "TetR protein";
  species Z_protein in cell = init_Z_protein; Z_protein is "cI protein";
  species GFP in cell = init_GFP;
  species X_mRNA in cell = init_X_mRNA; X_mRNA is "LacI mRNA";
  species Y_mRNA in cell = init_Y_mRNA; Y_mRNA is "TetR mRNA";
  species Z_mRNA in cell = init_Z_mRNA; Z_mRNA is "cI mRNA";
  species GFP_mRNA in cell = init_GFP_mRNA;

  // Parameters:
  KM = 1.000132e-5;
  eff = 0.03015928;
  eff_GFP = 0.001952122;
  init_GFP = 3.38717e-5;
  init_GFP_mRNA = 131.4357;
  init_X_mRNA = 2.556658;
  init_X_protein = 30.80877;
  init_Y_mRNA = 999.9999;
  init_Y_protein = 0.0008182681;
  init_Z_mRNA = 19.36703;
  init_Z_protein = 994.382;
  n_Hill = 1.522546;
  tau_mRNA = 12.62482;
  tau_mRNA_GFP = 0.0004040644;
  tau_prot = 5.359265;
  tau_prot_GFP = 71.93126;
  tps_active = 0.612279;
  tps_repr = 1e-5;
  observableParameter1_fluorescence = 1.044541e-5;
  observableParameter2_fluorescence = 0.5259966;
  noiseParameter1_fluorescence = 0.07184141;

  // Assignment rules:
  sigma_fluorescence := noiseParameter1_fluorescence;
  observable_fluorescence := observableParameter1_fluorescence + GFP*observableParameter2_fluorescence;

  // Reactions:
  v1_v_0: X_mRNA => ; cell*(X_mRNA*ln(2)/tau_mRNA);
  v2_v_1: Y_mRNA => ; cell*(Y_mRNA*ln(2)/tau_mRNA);
  v3_v_2: Z_mRNA => ; cell*(Z_mRNA*ln(2)/tau_mRNA);
  v4_v_3: GFP_mRNA => ; cell*(GFP_mRNA*ln(2)/tau_mRNA_GFP);
  v5_v_4: => X_protein; cell*(X_mRNA*eff/tau_mRNA);  // modifiers: X_mRNA
  v6_v_5: => Y_protein; cell*(Y_mRNA*eff/tau_mRNA);  // modifiers: Y_mRNA
  v7_v_6: => Z_protein; cell*(Z_mRNA*eff/tau_mRNA);  // modifiers: Z_mRNA
  v8_v_7: => GFP; cell*(GFP_mRNA*eff_GFP/tau_mRNA_GFP);  // modifiers: GFP_mRNA
  v9_v_8: X_protein => ; cell*(X_protein*ln(2)/tau_prot);
  v10_v_9: Y_protein => ; cell*(Y_protein*ln(2)/tau_prot);
  v11_v_10: Z_protein => ; cell*(Z_protein*ln(2)/tau_prot);
  v12_v_11: GFP => ; cell*(GFP*ln(2)/tau_prot_GFP);
  v13_v_12: => X_mRNA; cell*(60*tps_repr - KM^n_Hill*(60*tps_repr - 60*tps_active)/(KM^n_Hill + Z_protein^n_Hill));  // modifiers: Z_protein
  v14_v_13: => Y_mRNA; cell*(60*tps_repr - KM^n_Hill*(60*tps_repr - 60*tps_active)/(KM^n_Hill + X_protein^n_Hill));  // modifiers: X_protein
  v15_v_14: => Z_mRNA; cell*(60*tps_repr - KM^n_Hill*(60*tps_repr - 60*tps_active)/(KM^n_Hill + Y_protein^n_Hill));  // modifiers: Y_protein
  v16_v_15: => GFP; cell*(60*tps_repr - KM^n_Hill*(60*tps_repr - 60*tps_active)/(KM^n_Hill + X_protein^n_Hill));  // modifiers: X_protein

  // Unit definitions:
  unit time = 60 second;
end
