// SBML level 2 version 4

model Fujita_SciSignal2010()
  // model_AktPathwayFujita
  // PEtab implementation of the model from Fujita et al. (2010), Science Signaling Vol. 3, Issue 132, pp. ra56
  // isDescribedBy doi:10.1126/scisignal.2000810

  // Compartments:
  compartment Cell = 1;

  // Species:
  species EGFR in Cell = init_EGFR;
  species pEGFR in Cell = 0;
  species pEGFR_Akt in Cell = 0;
  species Akt in Cell = init_AKT;
  species pAkt in Cell = 0;
  species S6 in Cell = init_S6;
  species pAkt_S6 in Cell = 0;
  species pS6 in Cell = 0;
  species EGF_EGFR in Cell = 0;

  // Parameters:
  EGFR_turnover = 0.001449799;
  init_AKT = 0.003326832;
  init_EGFR = 2.265081e7;
  init_S6 = 205.863;
  reaction_1_k1 = 0.003723455;
  reaction_1_k2 = 0.002627099;
  reaction_2_k1 = 0.001032361;
  reaction_2_k2 = 41469.69;
  reaction_3_k1 = 0.4548406;
  reaction_4_k1 = 0.0308147;
  reaction_5_k1 = 2.964371e-6;
  reaction_5_k2 = 0.0004040558;
  reaction_6_k1 = 9.205855e-6;
  reaction_7_k1 = 0.01193297;
  reaction_8_k1 = 0.0009411615;
  reaction_9_k1 = 0.02732816;
  observableParameter1_pAkt_tot = 334.9793;
  observableParameter1_pEGFR_tot = 9.609083e-8;
  observableParameter1_pS6_tot = 380222.8;
  noiseParameter1_pAkt_tot = 0.1;
  noiseParameter1_pEGFR_tot = 0.1;
  noiseParameter1_pS6_tot = 0.1;
  EGF_step = 0.1;
  EGF_impulse = 0.1;
  EGF_ramp = 0.1;

  // Assignment rules:
  EGF := EGF_step + piecewise(EGF_impulse, time <= 60, 0) + EGF_ramp*time/3600;
  sigma_pAkt_tot := noiseParameter1_pAkt_tot;
  sigma_pEGFR_tot := noiseParameter1_pEGFR_tot;
  sigma_pS6_tot := noiseParameter1_pS6_tot;
  observable_pEGFR_tot := observableParameter1_pEGFR_tot*(pEGFR + pEGFR_Akt);
  observable_pAkt_tot := observableParameter1_pAkt_tot*(pAkt + pAkt_S6);
  observable_pS6_tot := pS6*observableParameter1_pS6_tot;

  // Reactions:
  v1_reaction_1: EGFR -> EGF_EGFR; Cell*(EGF*EGFR*reaction_1_k1 - EGF_EGFR*reaction_1_k2);
  v2_reaction_2: pEGFR + Akt -> pEGFR_Akt; Cell*(Akt*pEGFR*reaction_2_k1 - pEGFR_Akt*reaction_2_k2);
  v3_reaction_3: pEGFR_Akt => pEGFR + pAkt; Cell*pEGFR_Akt*reaction_3_k1;
  v4_reaction_4: pEGFR => ; Cell*pEGFR*reaction_4_k1;
  v5_reaction_5: pAkt + S6 -> pAkt_S6; Cell*(S6*pAkt*reaction_5_k1 - pAkt_S6*reaction_5_k2);
  v6_reaction_6: pAkt_S6 => pAkt + pS6; Cell*pAkt_S6*reaction_6_k1;
  v7_reaction_7: pAkt => Akt; Cell*pAkt*reaction_7_k1;
  v8_reaction_8: pS6 => S6; Cell*pS6*reaction_8_k1;
  v9_reaction_9: EGF_EGFR => pEGFR; Cell*EGF_EGFR*reaction_9_k1;
  v10_reaction_10: EGFR => ; Cell*EGFR*EGFR_turnover;
  v11_reaction_11: => EGFR; Cell*68190*EGFR_turnover;

  // Unit definitions:
  unit time = 60 second;
end
