// SBML level 2 version 4

model Hass_PONE2017()
  // model_Reelin_FINAL
  // PEtab implementation of the model from Hass et al. (2017), PLOS ONE 12(10): e0186927
  // isDescribedBy doi:10.1371/journal.pone.0186927

  // Compartments:
  compartment DefaultCompartment = 1;

  // Species:
  species ApoER2_Dab1 in DefaultCompartment = init_ApoER2_Dab1;
  species ApoER2_Dab1SFK in DefaultCompartment = init_ApoER2_Dab1SFK;
  species ApoER2_Dab1SFKInh in DefaultCompartment = 0;
  species pApoER2_re_Dab1 in DefaultCompartment = 0;
  species ApoER2_re_Dab1 in DefaultCompartment = 0;
  species ApoER2_re_Dab1SFK in DefaultCompartment = 0;
  species ApoER2_re_Dab1SFKInh in DefaultCompartment = 0;
  species ApoER2_Dab1_released in DefaultCompartment = ApoER2_Dab1_SFK_release*init_ApoER2_Dab1SFK/(ApoER2_Dab1_SFK_degrad + ApoER2_Dab1_SFK_recycle);
  species SFK in DefaultCompartment = ApoER2_Dab1_SFK_release*init_ApoER2_Dab1SFK/(ApoER2_Dab1_bind_SFK*init_ApoER2_Dab1);

  // Parameters:
  ApoER2_Dab1_SFK_degrad = 0.01233016;
  ApoER2_Dab1_SFK_recycle = 2.497015;
  ApoER2_Dab1_SFK_release = 1957.941;
  ApoER2_Dab1_act = 10000;
  ApoER2_Dab1_bind_SFK = 110.9458;
  ApoER2_Dab1_bind_SFK_Reelin = 158602;
  Dab1_bind_Reelin = 0.01383532;
  Dab1_release = 0.05954179;
  SFK_inhibition_ratio = 0.4707186;
  init_ApoER2_Dab1 = 1;
  init_ApoER2_Dab1SFK = 8.750975e-5;
  observableParameter2_Dab1 = 1e-8;
  observableParameter2_pAkt = 1.076528;
  observableParameter2_pDab1 = 0.139887;
  observableParameter2_pSFK = 1.6797;
  observableParameter2_tApoER2 = 2.142897;
  observableParameter2_tSFK = 0.2857021;
  perc_mes = 0.05190993;
  observableParameter1_Dab1 = 3.756393;
  observableParameter1_pAkt = 247.543;
  observableParameter1_pDab1 = 331.2767;
  observableParameter1_pSFK = 935.4346;
  observableParameter1_tApoER2 = 0.9433434;
  observableParameter1_tSFK = 399.0108;
  noiseParameter1_Dab1 = 0;
  noiseParameter1_pDab1 = 0;
  noiseParameter1_pAkt = 0;
  noiseParameter1_pSFK = 0;
  noiseParameter1_tSFK = 0;
  noiseParameter1_tApoER2 = 0;
  Reelin_input = 0;
  Inh = 0;

  // Assignment rules:
  sigma_Dab1 := noiseParameter1_Dab1;
  sigma_pDab1 := noiseParameter1_pDab1;
  sigma_pAkt := noiseParameter1_pAkt;
  sigma_pSFK := noiseParameter1_pSFK;
  sigma_tSFK := noiseParameter1_tSFK;
  sigma_tApoER2 := noiseParameter1_tApoER2;
  Reelin_step := piecewise(0, time < 0, Reelin_input)*exp(-10e-5*time);
  observable_Dab1 := observableParameter2_Dab1 + observableParameter1_Dab1*(ApoER2_Dab1 + ApoER2_Dab1SFK + ApoER2_re_Dab1 + ApoER2_Dab1SFKInh + ApoER2_re_Dab1SFK + ApoER2_re_Dab1SFKInh + ApoER2_Dab1_released + pApoER2_re_Dab1);
  observable_pDab1 := observableParameter2_pDab1 + observableParameter1_pDab1*(ApoER2_Dab1SFK + ApoER2_re_Dab1SFK + pApoER2_re_Dab1);
  observable_pAkt := observableParameter2_pAkt + observableParameter1_pAkt*(ApoER2_Dab1SFK + ApoER2_re_Dab1SFK + pApoER2_re_Dab1);
  observable_pSFK := observableParameter2_pSFK + observableParameter1_pSFK*(ApoER2_Dab1SFK + ApoER2_re_Dab1SFK + ApoER2_re_Dab1SFKInh*perc_mes);
  observable_tSFK := observableParameter2_tSFK + observableParameter1_tSFK*(ApoER2_Dab1SFK + ApoER2_Dab1SFKInh + ApoER2_re_Dab1SFK + ApoER2_re_Dab1SFKInh + SFK);
  observable_tApoER2 := observableParameter2_tApoER2 + observableParameter1_tApoER2*(ApoER2_Dab1 + ApoER2_Dab1SFK + ApoER2_re_Dab1 + ApoER2_Dab1SFKInh + ApoER2_re_Dab1SFK + ApoER2_re_Dab1SFKInh + ApoER2_Dab1_released + pApoER2_re_Dab1);

  // Reactions:
  v1_v_ApoER2_Dab1_prod: => ApoER2_Dab1; ApoER2_Dab1_SFK_degrad*ApoER2_Dab1_SFK_release*init_ApoER2_Dab1SFK/(ApoER2_Dab1_SFK_degrad + ApoER2_Dab1_SFK_recycle);
  v2_v_ApoER2_Dab1_bind_SFK: ApoER2_Dab1 + SFK => ApoER2_Dab1SFK; ApoER2_Dab1*ApoER2_Dab1_bind_SFK*SFK*(1 + Inh*SFK_inhibition_ratio - Inh);
  v3_v_ApoER2_Dab1_SFKInh_bind: ApoER2_Dab1 + SFK => ApoER2_Dab1SFKInh; -ApoER2_Dab1*ApoER2_Dab1_bind_SFK*SFK*Inh*(SFK_inhibition_ratio - 1);
  v4_v_ApoER2_Dab1_SFK_release: ApoER2_Dab1SFK => ApoER2_Dab1_released + SFK; ApoER2_Dab1SFK*ApoER2_Dab1_SFK_release;
  v5_v_ApoER2_Dab1_SFKInh_unbind: ApoER2_Dab1SFKInh => ApoER2_Dab1 + SFK; ApoER2_Dab1SFKInh*SFK_inhibition_ratio/ApoER2_Dab1_act;
  v6_v_ApoER2_Dab1SFK_bind_Reelin: ApoER2_Dab1SFK => ApoER2_re_Dab1SFK; ApoER2_Dab1SFK*Dab1_bind_Reelin*Reelin_step;
  v7_v_ApoER2_Dab1SFKInh_bind_Reelin: ApoER2_Dab1SFKInh => ApoER2_re_Dab1SFKInh; ApoER2_Dab1SFKInh*Dab1_bind_Reelin*Reelin_step;
  v8_v_ApoER2_re_Dab1_activation: ApoER2_re_Dab1 => pApoER2_re_Dab1; ApoER2_re_Dab1*ApoER2_Dab1_act*ApoER2_re_Dab1SFK/SFK_inhibition_ratio;  // modifiers: ApoER2_re_Dab1SFK
  v9_v_ApoER2_Dab1_bind_Reelin: ApoER2_Dab1 => ApoER2_re_Dab1; ApoER2_Dab1*Dab1_bind_Reelin*Reelin_step;
  v10_v_ApoER2_Dab1_bind_SFK_Reelin: ApoER2_Dab1 + SFK => ApoER2_re_Dab1SFK; ApoER2_Dab1*ApoER2_Dab1_bind_SFK_Reelin*Reelin_step*SFK*(1 + Inh*SFK_inhibition_ratio - Inh);
  v11_v_ApoER2_Dab1_bind_SFKInh_Reelin: ApoER2_Dab1 + SFK => ApoER2_re_Dab1SFKInh; -ApoER2_Dab1*ApoER2_Dab1_bind_SFK_Reelin*Reelin_step*Inh*SFK*(SFK_inhibition_ratio - 1);
  v12_v_ApoER2_re_Dab1SFKInh_unbind: ApoER2_re_Dab1SFKInh => ApoER2_Dab1 + SFK; ApoER2_re_Dab1SFKInh*SFK_inhibition_ratio/ApoER2_Dab1_act;
  v13_v_pApoER2_re_Dab1_release: pApoER2_re_Dab1 => ApoER2_Dab1_released; Dab1_release*pApoER2_re_Dab1;
  v14_v_ApoER2_re_Dab1SFK_release: ApoER2_re_Dab1SFK => ApoER2_Dab1_released + SFK; ApoER2_re_Dab1SFK*ApoER2_Dab1_SFK_release;
  v15_v_Dab1_released_degrad: ApoER2_Dab1_released => ; ApoER2_Dab1_released*ApoER2_Dab1_SFK_degrad;
  v16_v_Dab1_released_recycle: ApoER2_Dab1_released => ApoER2_Dab1; ApoER2_Dab1_released*ApoER2_Dab1_SFK_recycle;

  // Unit definitions:
  unit time = 60 second;
end
