// SBML level 2 version 4

model Isensee_JCB2018()
  // PKA_cycle
  // PEtab implementation of the model from Isensee et al. (2018), The Journal of Cell Biology Jun 2018, 217 (6) 2167-2184
  // isDescribedBy doi:10.1083/jcb.201708053

  // Compartments:
  compartment default = 1 volume;
  compartment cyt in default = 1 volume;
  compartment nuc in default = 1 volume;

  // Species:
  species AC in cyt = 1;
  species pAC in cyt = 0;
  species AC_Fsk in cyt = 0; AC_Fsk is "AC:Fsk";
  species pAC_Fsk in cyt = 0; pAC_Fsk is "pAC:Fsk";
  species cAMP in cyt = 0.05752188;
  species Csub in cyt = 0.1920514;
  species Csub_H89 in cyt = 0; Csub_H89 is "C:H89";
  species RII_C_2 in cyt = 0.5145622; RII_C_2 is "RII_2:C_2";
  species RIIp_C_2 in cyt = 0.2879744; RIIp_C_2 is "pRII_2:C_2";
  species RIIp_cAMP_C_2 in cyt = 0.005412029; RIIp_cAMP_C_2 is "pRII_2:C_2:cAMP_4";
  species RIIp_cAMP_2 in cyt = 0.0004004166; RIIp_cAMP_2 is "pRII_2:cAMP_4";
  species Sp8_Br_cAMPS in cyt = 0; Sp8_Br_cAMPS is "Sp8-Br-cAMPS";
  species Rp8_Br_cAMPS in cyt = 0; Rp8_Br_cAMPS is "Rp-8-Br-cAMPS";
  species Rp8_pCPT_cAMPS in cyt = 0; Rp8_pCPT_cAMPS is "Rp-8-pCPT-cAMPS";
  species Rp_cAMPS in cyt = 0; Rp_cAMPS is "Rp-cAMPS";
  species RIIp_Rp8_Br_cAMPS_C_2 in cyt = 0; RIIp_Rp8_Br_cAMPS_C_2 is "pRII_2:C_2:Rp-8-Br-cAMPS_4";
  species RIIp_Rp8_pCPT_cAMPS_C_2 in cyt = 0; RIIp_Rp8_pCPT_cAMPS_C_2 is "pRII_2:C_2:Rp-8-pCPT-cAMPS_4";
  species RIIp_Rp_cAMPS_C_2 in cyt = 0; RIIp_Rp_cAMPS_C_2 is "pRII_2:C_2:Rp-cAMPS_4";
  species RIIp_Sp8_Br_cAMPS_C_2 in cyt = 0; RIIp_Sp8_Br_cAMPS_C_2 is "pRII_2:C_2:Sp-8-Br-cAMPS_4";
  species RIIp_Sp8_Br_cAMPS_2 in cyt = 0; RIIp_Sp8_Br_cAMPS_2 is "pRII_2:Sp-8-Br-cAMPS_4";
  species RIIp_2 in cyt = 0.1339795; RIIp_2 is "pRII_2";
  species RII_2 in cyt = 0.05767148;
  species IBMX in cyt = 0;
  species PDE in cyt = 1;
  species pPDE in cyt = 0;

  // Parameters:
  AC_total = 1;
  KD_Fsk = 14.26567;
  KD_H89 = 0.0480736;
  KD_IBMX = 11.9769;
  KD_PDE_Csub = 0;
  KD_cAMP = 2.849869;
  PDE_total = 1;
  RII2_total = 1;
  observableParameter3_pRII_Microscopy = 99.72178 time;
  kdeg_cAMP = 1.00033e-5;
  kdeg_cAMP_free = 7.358923;
  kdp_AC = 0;
  kf_Fsk = 999.992;
  kf_H89 = 0.0007414934;
  kf_PDE_Csub = 0;
  kf_RII_2__RII_C_2 = 1.260779;
  kf_RII_C_2__RII_2 = 0.01872625;
  kf_RII_C_2__RIIp_C_2 = 0.02278415;
  kf_RIIp_2__RII_2 = 0.03230666;
  kf_RIIp_C_2__RII_C_2 = 0.02568087;
  kf_RIIp_cAMP_C_2__RIIp_2 = 0.1049248;
  kf_cAMP = 0.4976203;
  ki_IBMX = 1000;
  ki_Rp8_Br_cAMPS_pAB = 6.399916;
  ki_Rp8_pCPT_cAMPS_pAB = 9.242949;
  ki_Rp_cAMPS_pAB = 0.01634728;
  ki_Sp8_Br_cAMPS_AM = 0.131083;
  kp_AC = 0;
  ks_AC_cAMP = 0.423299;
  observableParameter4_pRII_Microscopy = 0.2327641 time;
  observableParameter1_pRII_Microscopy = 1.103137 time;
  observableParameter2_pRII_Microscopy = 2205.155 time;
  sigma_pRII_Microscopy has substance;
  xi_AC_cAMP_Fsk = 640.5517;
  xi_KD_Rp8_Br_cAMPS = 0.04015061;
  xi_KD_Rp8_pCPT_cAMPS = 0.1946304;
  xi_KD_Rp_cAMPS = 0.1633696;
  xi_KD_Sp8_Br_cAMPS = 0.2222765;
  xi_b_Rp8_Br_cAMPS = 0.04086955;
  xi_b_Rp8_pCPT_cAMPS = 0.02688978;
  xi_b_Rp_cAMPS = 0.6079603;
  xi_b_Sp8_Br_cAMPS = 21.7552;
  xi_i_Rp8_Br_cAMPS_pAB = 1;
  xi_i_Rp8_pCPT_cAMPS_pAB = 1;
  xi_i_Rp_cAMPS_pAB = 1;
  xi_i_Sp8_Br_cAMPS_AM = 1;
  xi_kf_RII_2__RII_C_2 = 0.0189295;
  xi_kf_RII_C_2__RII_2 = 0.8112232;
  xi_pAC = 1;
  xi_pPDE = 1;
  observableParameter5_pRII_Microscopy = 0.7496605 time;
  Fsk has time;
  Fsk_level = 0 substance;
  Fsk_time = 0 time;
  H89_level = 0 substance;
  IBMX_level = 0 substance;
  Rp8_Br_cAMPS_pAB_level = 0 substance;
  Rp8_Br_cAMPS_pAB_incubation_time = 0 time;
  H89_time = 0 time;
  IBMX_time = 0 time;
  Rp8_pCPT_cAMPS_pAB_level = 0 substance;
  Rp8_pCPT_cAMPS_pAB_incubation_time = 0 time;
  Rp_cAMPS_pAB_level = 0 substance;
  Rp_cAMPS_pAB_incubation_time = 0 time;
  Sp8_Br_cAMPS_AM_level = 0 substance;
  Sp8_Br_cAMPS_AM_time = 0 time;
  fourABnOH_level = 0 substance;
  fourABnOH_incubation_time = 0 time;
  observable_pRII_Microscopy has substance;
  noiseParameter1_pRII_Microscopy = 1.103137 substance;
  noiseParameter2_pRII_Microscopy = 2205.155 substance;
  noiseParameter3_pRII_Microscopy = 0.04204363 substance;
  observable_pRII_Western has substance;
  sigma_pRII_Western has substance;
  observableParameter1_pRII_Western = 1.147708 substance;
  noiseParameter1_pRII_Western = 1.147708 substance;
  noiseParameter2_pRII_Western = 0.1026211 substance;
  observable_Calpha_Microscopy has substance;
  sigma_Calpha_Microscopy has substance;
  observableParameter1_Calpha_Microscopy = 1756.868 substance;
  observableParameter2_Calpha_Microscopy = 101.653 substance;
  observableParameter3_Calpha_Microscopy = 0.2327641 substance;
  observableParameter4_Calpha_Microscopy = 0.7496605 substance;
  noiseParameter1_Calpha_Microscopy = 1756.868 substance;
  noiseParameter2_Calpha_Microscopy = 0.05139578 substance;

  // Assignment rules:
  Fsk := Fsk_level*piecewise(0, time - Fsk_time < 0, 1);
  H89 := H89_level*piecewise(0, time - H89_time < 0, 1);
  IBMXex := IBMX_level*piecewise(0, time - IBMX_time < 0, 1);
  Rp8_Br_cAMPS_pAB := Rp8_Br_cAMPS_pAB_level*piecewise(0, time - (60 - Rp8_Br_cAMPS_pAB_incubation_time) < 0, 1);
  Rp8_pCPT_cAMPS_pAB := Rp8_pCPT_cAMPS_pAB_level*piecewise(0, time - (60 - Rp8_pCPT_cAMPS_pAB_incubation_time) < 0, 1);
  Rp_cAMPS_pAB := Rp_cAMPS_pAB_level*piecewise(0, time - (60 - Rp_cAMPS_pAB_incubation_time) < 0, 1);
  Sp8_Br_cAMPS_AM := Sp8_Br_cAMPS_AM_level*piecewise(0, time - Sp8_Br_cAMPS_AM_time < 0, 1);
  fourABnOH := fourABnOH_level*piecewise(0, time - (60 - fourABnOH_incubation_time) < 0, 1);
  observable_Calpha_Microscopy := observableParameter2_Calpha_Microscopy + observableParameter1_Calpha_Microscopy*(2*Csub + 2*Csub_H89 + 2*observableParameter3_Calpha_Microscopy*(RIIp_C_2 + RIIp_Rp_cAMPS_C_2 + RIIp_Rp8_Br_cAMPS_C_2 + RIIp_Rp8_pCPT_cAMPS_C_2) + 2*(RIIp_cAMP_C_2 + RIIp_Sp8_Br_cAMPS_C_2)*(observableParameter3_Calpha_Microscopy - observableParameter4_Calpha_Microscopy*(observableParameter3_Calpha_Microscopy - 1)));
  observable_pRII_Microscopy := observableParameter1_pRII_Microscopy*(observableParameter3_pRII_Microscopy + observableParameter2_pRII_Microscopy*(2*RIIp_2 + 2*RIIp_cAMP_2 + 2*RIIp_Sp8_Br_cAMPS_2 + 2*observableParameter4_pRII_Microscopy*(RIIp_C_2 + RIIp_Rp_cAMPS_C_2 + RIIp_Rp8_Br_cAMPS_C_2 + RIIp_Rp8_pCPT_cAMPS_C_2) + 2*(RIIp_cAMP_C_2 + RIIp_Sp8_Br_cAMPS_C_2)*(observableParameter4_pRII_Microscopy - observableParameter5_pRII_Microscopy*(observableParameter4_pRII_Microscopy - 1))));
  observable_pRII_Western := observableParameter1_pRII_Western*(2*RIIp_2 + 2*RIIp_C_2 + 2*RIIp_cAMP_2 + 2*RIIp_cAMP_C_2 + 2*RIIp_Rp_cAMPS_C_2 + 2*RIIp_Sp8_Br_cAMPS_2 + 2*RIIp_Rp8_Br_cAMPS_C_2 + 2*RIIp_Sp8_Br_cAMPS_C_2 + 2*RIIp_Rp8_pCPT_cAMPS_C_2);
  sigma_Calpha_Microscopy := noiseParameter1_Calpha_Microscopy*noiseParameter2_Calpha_Microscopy;
  sigma_pRII_Microscopy := noiseParameter1_pRII_Microscopy*noiseParameter2_pRII_Microscopy*noiseParameter3_pRII_Microscopy;
  sigma_pRII_Western := noiseParameter1_pRII_Western*noiseParameter2_pRII_Western;

  // Reactions:
  v1_v_0: => Sp8_Br_cAMPS; cyt*(-ki_Sp8_Br_cAMPS_AM)*(Sp8_Br_cAMPS - Sp8_Br_cAMPS_AM*xi_i_Sp8_Br_cAMPS_AM);
  v2_v_1: => Rp8_Br_cAMPS; cyt*(-ki_Rp8_Br_cAMPS_pAB)*(Rp8_Br_cAMPS - Rp8_Br_cAMPS_pAB*xi_i_Rp8_Br_cAMPS_pAB);
  v3_v_2: => Rp8_pCPT_cAMPS; cyt*(-ki_Rp8_pCPT_cAMPS_pAB)*(Rp8_pCPT_cAMPS - Rp8_pCPT_cAMPS_pAB*xi_i_Rp8_pCPT_cAMPS_pAB);
  v4_v_3: => Rp_cAMPS; cyt*(-ki_Rp_cAMPS_pAB)*(Rp_cAMPS - Rp_cAMPS_pAB*xi_i_Rp_cAMPS_pAB);
  v5_v_4: => IBMX; cyt*(-ki_IBMX)*(IBMX - IBMXex);
  v6_v_5: AC => AC_Fsk; cyt*AC*Fsk*kf_Fsk;
  v7_v_6: AC_Fsk => AC; cyt*AC_Fsk*KD_Fsk*kf_Fsk;
  v8_v_7: pAC => pAC_Fsk; cyt*Fsk*kf_Fsk*pAC;
  v9_v_8: pAC_Fsk => pAC; cyt*KD_Fsk*kf_Fsk*pAC_Fsk;
  v10_v_9: AC => pAC; cyt*AC*Csub*kp_AC;  // modifiers: Csub
  v11_v_10: AC_Fsk => pAC_Fsk; cyt*AC_Fsk*Csub*kp_AC;  // modifiers: Csub
  v12_v_11: pAC => AC; cyt*kdp_AC*pAC;
  v13_v_12: pAC_Fsk => AC_Fsk; cyt*kdp_AC*pAC_Fsk;
  v14_v_13: => cAMP; cyt*ks_AC_cAMP*(AC + pAC*xi_pAC);  // modifiers: AC, pAC
  v15_v_14: => cAMP; cyt*ks_AC_cAMP*xi_AC_cAMP_Fsk*(AC_Fsk + pAC_Fsk*xi_pAC);  // modifiers: AC_Fsk, pAC_Fsk
  v16_v_15: cAMP => ; cyt*(KD_IBMX*cAMP*kdeg_cAMP_free*(PDE + pPDE*xi_pPDE)/(IBMX + KD_IBMX));  // modifiers: IBMX, PDE, pPDE
  v17_v_16: RII_C_2 => Csub + RII_2; cyt*RII_C_2*kf_RII_C_2__RII_2;
  v18_v_17: Csub + RII_2 => RII_C_2; cyt*Csub*RII_2*kf_RII_2__RII_C_2;
  v19_v_18: RIIp_C_2 => Csub + RIIp_2; cyt*RIIp_C_2*kf_RII_C_2__RII_2*xi_kf_RII_C_2__RII_2;
  v20_v_19: Csub + RIIp_2 => RIIp_C_2; cyt*Csub*RIIp_2*kf_RII_2__RII_C_2*xi_kf_RII_2__RII_C_2;
  v21_v_20: RIIp_2 => RII_2; cyt*RIIp_2*kf_RIIp_2__RII_2;
  v22_v_21: RII_C_2 => RIIp_C_2; cyt*RII_C_2*kf_RII_C_2__RIIp_C_2;
  v23_v_22: RIIp_C_2 => RII_C_2; cyt*RIIp_C_2*kf_RIIp_C_2__RII_C_2;
  v24_v_23: RIIp_C_2 => RIIp_cAMP_C_2; cyt*RIIp_C_2*cAMP*kf_cAMP;  // modifiers: cAMP
  v25_v_24: RIIp_cAMP_C_2 => RIIp_C_2; cyt*KD_cAMP*RIIp_cAMP_C_2*kf_cAMP;
  v26_v_25: RIIp_cAMP_C_2 => RIIp_C_2; cyt*(KD_IBMX*RIIp_cAMP_C_2*kdeg_cAMP*(PDE + pPDE*xi_pPDE)/(IBMX + KD_IBMX));  // modifiers: IBMX, PDE, pPDE
  v27_v_26: RIIp_cAMP_C_2 => Csub + RIIp_cAMP_2; cyt*RIIp_cAMP_C_2*kf_RIIp_cAMP_C_2__RIIp_2;
  v28_v_27: RIIp_cAMP_2 => RIIp_2; cyt*KD_cAMP*RIIp_cAMP_2*kf_cAMP;
  v29_v_28: RIIp_cAMP_2 => RIIp_2; cyt*(KD_IBMX*RIIp_cAMP_2*kdeg_cAMP*(PDE + pPDE*xi_pPDE)/(IBMX + KD_IBMX));  // modifiers: IBMX, PDE, pPDE
  v30_v_29: RIIp_C_2 => RIIp_Rp8_Br_cAMPS_C_2; cyt*RIIp_C_2*Rp8_Br_cAMPS*kf_cAMP*xi_b_Rp8_Br_cAMPS;  // modifiers: Rp8_Br_cAMPS
  v31_v_30: RIIp_Rp8_Br_cAMPS_C_2 => RIIp_C_2; cyt*KD_cAMP*RIIp_Rp8_Br_cAMPS_C_2*kf_cAMP*xi_b_Rp8_Br_cAMPS*xi_KD_Rp8_Br_cAMPS;
  v32_v_31: RIIp_C_2 => RIIp_Rp8_pCPT_cAMPS_C_2; cyt*RIIp_C_2*Rp8_pCPT_cAMPS*kf_cAMP*xi_b_Rp8_pCPT_cAMPS;  // modifiers: Rp8_pCPT_cAMPS
  v33_v_32: RIIp_Rp8_pCPT_cAMPS_C_2 => RIIp_C_2; cyt*KD_cAMP*RIIp_Rp8_pCPT_cAMPS_C_2*kf_cAMP*xi_b_Rp8_pCPT_cAMPS*xi_KD_Rp8_pCPT_cAMPS;
  v34_v_33: RIIp_C_2 => RIIp_Rp_cAMPS_C_2; cyt*RIIp_C_2*Rp_cAMPS*kf_cAMP*xi_b_Rp_cAMPS;  // modifiers: Rp_cAMPS
  v35_v_34: RIIp_Rp_cAMPS_C_2 => RIIp_C_2; cyt*KD_cAMP*RIIp_Rp_cAMPS_C_2*kf_cAMP*xi_b_Rp_cAMPS*xi_KD_Rp_cAMPS;
  v36_v_35: RIIp_C_2 => RIIp_Sp8_Br_cAMPS_C_2; cyt*RIIp_C_2*Sp8_Br_cAMPS*kf_cAMP*xi_b_Sp8_Br_cAMPS;  // modifiers: Sp8_Br_cAMPS
  v37_v_36: RIIp_Sp8_Br_cAMPS_C_2 => RIIp_C_2; cyt*KD_cAMP*RIIp_Sp8_Br_cAMPS_C_2*kf_cAMP*xi_b_Sp8_Br_cAMPS*xi_KD_Sp8_Br_cAMPS;
  v38_v_37: RIIp_Sp8_Br_cAMPS_C_2 => Csub + RIIp_Sp8_Br_cAMPS_2; cyt*RIIp_Sp8_Br_cAMPS_C_2*kf_RIIp_cAMP_C_2__RIIp_2;
  v39_v_38: RIIp_Sp8_Br_cAMPS_2 => RIIp_2; cyt*KD_cAMP*RIIp_Sp8_Br_cAMPS_2*kf_cAMP*xi_b_Sp8_Br_cAMPS*xi_KD_Sp8_Br_cAMPS;
  v40_v_39: Csub => Csub_H89; cyt*Csub*H89*kf_H89;
  v41_v_40: Csub_H89 => Csub; cyt*Csub_H89*KD_H89*kf_H89;
  v42_v_41: PDE => pPDE; cyt*Csub*PDE*kf_PDE_Csub;  // modifiers: Csub
  v43_v_42: pPDE => PDE; cyt*KD_PDE_Csub*kf_PDE_Csub*pPDE;

  // Unit definitions:
  unit time = 60 second;
  unit substance = mole;
  unit volume = litre;
  unit area = metre^2;
  unit length = metre;
end
