// SBML level 2 version 4

model Lucarelli_CellSystems2018()
  // Complex_ModelSelectionProfile
  // PEtab implementation of the model from Lucarelli et al. (2018), Cell Syst. 2018 Jan 24;6(1):75-89.e11
  // isDescribedBy doi:10.1016/j.cels.2017.11.010

  // Compartments:
  compartment cell = 13.17;

  // Species:
  species TGFb in cell = init_TGFb;
  species Rec in cell = init_Rec;
  species TGFb_pRec in cell = 0;
  species S2 in cell = S2tot*(1 + (-1*fix_init_S2)) + fix_init_S2*init_S2;
  species S3 in cell = S3tot*(1 + (-1*fix_init_S3)) + fix_init_S3*init_S3;
  species S4 in cell = S4tot*(1 + (-1*fix_init_S4)) + fix_init_S4*init_S4;
  species S2_S4_S4 in cell = 0;
  species ppS2_ppS2_ppS2 in cell = 0;
  species ppS3_ppS3_ppS3 in cell = 0;
  species S4_S4_S4 in cell = 0;
  species pS2 in cell = 0;
  species pS3 in cell = 0;
  species ppS2 in cell = 0;
  species ppS3 in cell = 0;
  species ppS2_ppS2_S4 in cell = 0;
  species ppS2_ppS2_ppS3 in cell = 0;
  species ppS2_ppS3_ppS3 in cell = 0;
  species ppS3_ppS3_S4 in cell = 0;
  species ppS2_ppS3_S4 in cell = 0;
  species ppS3_S4_S4 in cell = 0;
  species ppS2_S4_S4 in cell = 0;
  species geneA in cell = 1;
  species geneB in cell = 1;
  species geneC in cell = 1;
  species geneD in cell = 1;
  species geneE in cell = 1;
  species geneF in cell = 1;
  species geneG in cell = 1;
  species geneH in cell = 1;
  species geneI in cell = 1;
  species geneJ in cell = 1;
  species geneK in cell = 1;
  species geneL in cell = 1;

  // Parameters:
  Rec_act = 0.005983431;
  S2tot = 142.7772;
  S3tot = 16.25858;
  S4tot = 67.05082;
  fix_init_S2 = 0;
  fix_init_S3 = 0;
  fix_init_S4 = 0;
  init_TGFb = 0;
  init_S2 = 0;
  init_S3 = 0;
  init_S4 = 0;
  S_dephos = 0.2863973;
  S_dephosphos = 0.04899491;
  S_phos = 0.3797201;
  geneA_act1 = 0.01413897;
  geneA_act2 = 0.0007972809;
  geneA_act3 = 0;
  geneA_inh1 = 0;
  geneA_inh2 = 0.0462524;
  geneA_inh3 = 0.02638106;
  geneA_turn = 0.00455789;
  geneB_act1 = 0.4616992;
  geneB_act2 = 0.07385278;
  geneB_act3 = 0.03042555;
  geneB_inh1 = 0;
  geneB_inh2 = 0.7472007;
  geneB_inh3 = 0.4073299;
  geneB_turn = 0.01124594;
  geneC_act1 = 0.007146366;
  geneC_act2 = 0;
  geneC_act3 = 0;
  geneC_inh1 = 0;
  geneC_inh2 = 0.01844158;
  geneC_inh3 = 0.03537969;
  geneC_turn = 0.003786304;
  geneD_act1 = 0.01116737;
  geneD_act2 = 0.0002689421;
  geneD_act3 = 0;
  geneD_inh1 = 0;
  geneD_inh2 = 0.08688034;
  geneD_inh3 = 0.1014191;
  geneD_turn = 0.0008021608;
  geneE_act1 = 0;
  geneE_act2 = 1.036611;
  geneE_act3 = 6.102247;
  geneE_inh1 = 8.20036;
  geneE_inh2 = 1.439255;
  geneE_inh3 = 9.67035;
  geneE_turn = 0.1243805;
  geneF_act1 = 998.2999;
  geneF_act2 = 0.135655;
  geneF_act3 = 20.64422;
  geneF_inh1 = 3.631571;
  geneF_inh2 = 0;
  geneF_inh3 = 0;
  geneF_turn = 36.67241;
  geneG_act1 = 626.7685;
  geneG_act2 = 55.95345;
  geneG_act3 = 0;
  geneG_inh1 = 0;
  geneG_inh2 = 0.01758545;
  geneG_inh3 = 0.000815622;
  geneG_turn = 295.9714;
  geneH_act1 = 0;
  geneH_act2 = 89.98664;
  geneH_act3 = 999.922;
  geneH_inh1 = 999.999;
  geneH_inh2 = 19.03179;
  geneH_inh3 = 218.3567;
  geneH_turn = 0.9928274;
  geneI_act1 = 9.301528;
  geneI_act2 = 0;
  geneI_act3 = 0;
  geneI_inh1 = 0;
  geneI_inh2 = 320.7635;
  geneI_inh3 = 999.9816;
  geneI_turn = 0.003281978;
  geneJ_act1 = 0;
  geneJ_act2 = 0;
  geneJ_act3 = 0;
  geneJ_inh1 = 0.4773915;
  geneJ_inh2 = 0.009853053;
  geneJ_inh3 = 0.008513719;
  geneJ_turn = 0.01401907;
  geneK_act1 = 0.01251338;
  geneK_act2 = 0.0002842245;
  geneK_act3 = 0;
  geneK_inh1 = 0;
  geneK_inh2 = 1.366036;
  geneK_inh3 = 2.435946;
  geneK_turn = 0.003599156;
  geneL_act1 = 0;
  geneL_act2 = 0.0004748495;
  geneL_act3 = 0;
  geneL_inh1 = 1.299765;
  geneL_inh2 = 0.06232357;
  geneL_inh3 = 0.1341486;
  geneL_turn = 0.01495045;
  init_Rec = 1.836148;
  k_223 = 0;
  k_224 = 0;
  k_233 = 0.1486556;
  k_234 = 0.0004031009;
  k_244 = 8.563075e-6;
  k_334 = 0;
  k_344 = 0;
  k_on_u = 0;
  kdiss_SS = 0;
  khomo2 = 0;
  khomo3 = 0;
  khomo4 = 0;
  pRec_degind = 0.04044984;
  noiseParameter1_S2IP_tS2 = 1;
  noiseParameter1_S2IP_tS3 = 1;
  noiseParameter1_S2IP_tS4 = 1;
  noiseParameter1_S3IP_tS2 = 1;
  noiseParameter1_S3IP_tS3 = 1;
  noiseParameter1_S3IP_tS4 = 1;
  noiseParameter1_S4IP_tS2 = 1;
  noiseParameter1_S4IP_tS3 = 1;
  noiseParameter1_S4IP_tS4 = 1;
  noiseParameter1_S23IP_tS2 = 1;
  noiseParameter1_S23IP_tS3 = 1;
  noiseParameter1_S23IP_tS4 = 1;
  noiseParameter1_S2IP_S2 = 1;
  noiseParameter1_S2IP_pS2 = 1;
  noiseParameter1_S2IP_ppS2 = 1;
  noiseParameter1_S3IP_S2 = 1;
  noiseParameter1_S3IP_pS2 = 1;
  noiseParameter1_S3IP_ppS2 = 1;
  noiseParameter1_S23IP_S2 = 1;
  noiseParameter1_S23IP_pS2 = 1;
  noiseParameter1_S23IP_ppS2 = 1;
  noiseParameter1_S2IP_S3 = 1;
  noiseParameter1_S2IP_pS3 = 1;
  noiseParameter1_S2IP_ppS3 = 1;
  noiseParameter1_S3IP_S3 = 1;
  noiseParameter1_S3IP_pS3 = 1;
  noiseParameter1_S3IP_ppS3 = 1;
  noiseParameter1_S23IP_S3 = 1;
  noiseParameter1_S23IP_pS3 = 1;
  noiseParameter1_S23IP_ppS3 = 1;
  noiseParameter1_Ski = 1;
  noiseParameter1_Skil = 1;
  noiseParameter1_Dnmt3a = 1;
  noiseParameter1_Sox4 = 1;
  noiseParameter1_Jun = 1;
  noiseParameter1_Smad7 = 1;
  noiseParameter1_Klf10 = 1;
  noiseParameter1_Bmp4 = 1;
  noiseParameter1_Cxcl15 = 1;
  noiseParameter1_Dusp5 = 1;
  noiseParameter1_Tgfa = 1;
  noiseParameter1_Pdk4 = 1;
  noiseParameter1_TGFbR = 1;

  // Assignment rules:
  observable_S2IP_tS2 := 100*(S2 + S2_S4_S4 + pS2 + ppS2 + ppS2_S4_S4 + 2*ppS2_ppS2_S4 + ppS2_ppS3_S4 + 3*ppS2_ppS2_ppS2 + 2*ppS2_ppS2_ppS3 + ppS2_ppS3_ppS3)/(S2 + 3*S2_S4_S4 + pS2 + ppS2 + 3*ppS2_S4_S4 + 3*ppS2_ppS2_S4 + 3*ppS2_ppS3_S4 + 3*ppS2_ppS2_ppS2 + 3*ppS2_ppS2_ppS3 + 3*ppS2_ppS3_ppS3);
  observable_S2IP_tS3 := 100*(ppS2_ppS3_S4 + ppS2_ppS2_ppS3 + 2*ppS2_ppS3_ppS3)/(S2 + 3*S2_S4_S4 + pS2 + ppS2 + 3*ppS2_S4_S4 + 3*ppS2_ppS2_S4 + 3*ppS2_ppS3_S4 + 3*ppS2_ppS2_ppS2 + 3*ppS2_ppS2_ppS3 + 3*ppS2_ppS3_ppS3);
  observable_S2IP_tS4 := 100*(2*ppS2_S4_S4 + ppS2_ppS2_S4 + ppS2_ppS3_S4)/(S2 + 3*S2_S4_S4 + pS2 + ppS2 + 3*ppS2_S4_S4 + 3*ppS2_ppS2_S4 + 3*ppS2_ppS3_S4 + 3*ppS2_ppS2_ppS2 + 3*ppS2_ppS2_ppS3 + 3*ppS2_ppS3_ppS3);
  observable_S3IP_tS2 := 100*(ppS2_ppS3_S4 + 2*ppS2_ppS2_ppS3 + ppS2_ppS3_ppS3)/(S3 + pS3 + ppS3 + 3*ppS3_S4_S4 + 3*ppS2_ppS3_S4 + 3*ppS3_ppS3_S4 + 3*ppS2_ppS2_ppS3 + 3*ppS2_ppS3_ppS3 + 3*ppS3_ppS3_ppS3);
  observable_S3IP_tS3 := 100*(S3 + pS3 + ppS3 + ppS3_S4_S4 + ppS2_ppS3_S4 + 2*ppS3_ppS3_S4 + ppS2_ppS2_ppS3 + 2*ppS2_ppS3_ppS3 + 3*ppS3_ppS3_ppS3)/(S3 + pS3 + ppS3 + 3*ppS3_S4_S4 + 3*ppS2_ppS3_S4 + 3*ppS3_ppS3_S4 + 3*ppS2_ppS2_ppS3 + 3*ppS2_ppS3_ppS3 + 3*ppS3_ppS3_ppS3);
  observable_S3IP_tS4 := 100*(2*ppS3_S4_S4 + ppS2_ppS3_S4 + ppS3_ppS3_S4)/(S3 + pS3 + ppS3 + 3*ppS3_S4_S4 + 3*ppS2_ppS3_S4 + 3*ppS3_ppS3_S4 + 3*ppS2_ppS2_ppS3 + 3*ppS2_ppS3_ppS3 + 3*ppS3_ppS3_ppS3);
  observable_S4IP_tS2 := 100*(S2_S4_S4 + ppS2_S4_S4 + 2*ppS2_ppS2_S4 + ppS2_ppS3_S4)/(S4 + 3*S2_S4_S4 + 3*S4_S4_S4 + 3*ppS2_S4_S4 + 3*ppS3_S4_S4 + 3*ppS2_ppS2_S4 + 3*ppS2_ppS3_S4 + 3*ppS3_ppS3_S4);
  observable_S4IP_tS3 := 100*(ppS3_S4_S4 + ppS2_ppS3_S4 + 2*ppS3_ppS3_S4)/(S4 + 3*S2_S4_S4 + 3*S4_S4_S4 + 3*ppS2_S4_S4 + 3*ppS3_S4_S4 + 3*ppS2_ppS2_S4 + 3*ppS2_ppS3_S4 + 3*ppS3_ppS3_S4);
  observable_S4IP_tS4 := 100*(S4 + 2*S2_S4_S4 + 3*S4_S4_S4 + 2*ppS2_S4_S4 + 2*ppS3_S4_S4 + ppS2_ppS2_S4 + ppS2_ppS3_S4 + ppS3_ppS3_S4)/(S4 + 3*S2_S4_S4 + 3*S4_S4_S4 + 3*ppS2_S4_S4 + 3*ppS3_S4_S4 + 3*ppS2_ppS2_S4 + 3*ppS2_ppS3_S4 + 3*ppS3_ppS3_S4);
  observable_S23IP_tS2 := 100*(S2 + S2_S4_S4 + pS2 + ppS2 + ppS2_S4_S4 + 2*ppS2_ppS2_S4 + ppS2_ppS3_S4 + 3*ppS2_ppS2_ppS2 + 2*ppS2_ppS2_ppS3 + ppS2_ppS3_ppS3)/(S2 + S3 + 3*S2_S4_S4 + pS2 + pS3 + ppS2 + ppS3 + 3*ppS2_S4_S4 + 3*ppS3_S4_S4 + 3*ppS2_ppS2_S4 + 4*ppS2_ppS3_S4 + 3*ppS3_ppS3_S4 + 3*ppS2_ppS2_ppS2 + 3*ppS2_ppS2_ppS3 + 3*ppS2_ppS3_ppS3 + 3*ppS3_ppS3_ppS3);
  observable_S23IP_tS3 := 100*(S3 + pS3 + ppS3 + ppS3_S4_S4 + ppS2_ppS3_S4 + 2*ppS3_ppS3_S4 + ppS2_ppS2_ppS3 + 2*ppS2_ppS3_ppS3 + 3*ppS3_ppS3_ppS3)/(S2 + S3 + 3*S2_S4_S4 + pS2 + pS3 + ppS2 + ppS3 + 3*ppS2_S4_S4 + 3*ppS3_S4_S4 + 3*ppS2_ppS2_S4 + 4*ppS2_ppS3_S4 + 3*ppS3_ppS3_S4 + 3*ppS2_ppS2_ppS2 + 3*ppS2_ppS2_ppS3 + 3*ppS2_ppS3_ppS3 + 3*ppS3_ppS3_ppS3);
  observable_S23IP_tS4 := 100*(2*S2_S4_S4 + 2*ppS2_S4_S4 + 2*ppS3_S4_S4 + ppS2_ppS2_S4 + 2*ppS2_ppS3_S4 + ppS3_ppS3_S4)/(S2 + S3 + 3*S2_S4_S4 + pS2 + pS3 + ppS2 + ppS3 + 3*ppS2_S4_S4 + 3*ppS3_S4_S4 + 3*ppS2_ppS2_S4 + 4*ppS2_ppS3_S4 + 3*ppS3_ppS3_S4 + 3*ppS2_ppS2_ppS2 + 3*ppS2_ppS2_ppS3 + 3*ppS2_ppS3_ppS3 + 3*ppS3_ppS3_ppS3);
  observable_S2IP_S2 := 100*(S2 + S2_S4_S4)/(S2 + S2_S4_S4 + pS2 + ppS2 + ppS2_S4_S4 + 2*ppS2_ppS2_S4 + ppS2_ppS3_S4 + 3*ppS2_ppS2_ppS2 + 2*ppS2_ppS2_ppS3 + ppS2_ppS3_ppS3);
  observable_S2IP_pS2 := 100*pS2/(S2 + S2_S4_S4 + pS2 + ppS2 + ppS2_S4_S4 + 2*ppS2_ppS2_S4 + ppS2_ppS3_S4 + 3*ppS2_ppS2_ppS2 + 2*ppS2_ppS2_ppS3 + ppS2_ppS3_ppS3);
  observable_S2IP_ppS2 := 100*(ppS2 + ppS2_S4_S4 + 2*ppS2_ppS2_S4 + ppS2_ppS3_S4 + 3*ppS2_ppS2_ppS2 + 2*ppS2_ppS2_ppS3 + ppS2_ppS3_ppS3)/(S2 + S2_S4_S4 + pS2 + ppS2 + ppS2_S4_S4 + 2*ppS2_ppS2_S4 + ppS2_ppS3_S4 + 3*ppS2_ppS2_ppS2 + 2*ppS2_ppS2_ppS3 + ppS2_ppS3_ppS3);
  observable_S3IP_S2 := 0;
  observable_S3IP_pS2 := 0;
  observable_S3IP_ppS2 := 100;
  observable_S23IP_S2 := 100*(S2 + S2_S4_S4)/(S2 + S2_S4_S4 + pS2 + ppS2 + ppS2_S4_S4 + 2*ppS2_ppS2_S4 + ppS2_ppS3_S4 + 3*ppS2_ppS2_ppS2 + 2*ppS2_ppS2_ppS3 + ppS2_ppS3_ppS3);
  observable_S23IP_pS2 := 100*pS2/(S2 + S2_S4_S4 + pS2 + ppS2 + ppS2_S4_S4 + 2*ppS2_ppS2_S4 + ppS2_ppS3_S4 + 3*ppS2_ppS2_ppS2 + 2*ppS2_ppS2_ppS3 + ppS2_ppS3_ppS3);
  observable_S23IP_ppS2 := 100*(ppS2 + ppS2_S4_S4 + 2*ppS2_ppS2_S4 + ppS2_ppS3_S4 + 3*ppS2_ppS2_ppS2 + 2*ppS2_ppS2_ppS3 + ppS2_ppS3_ppS3)/(S2 + S2_S4_S4 + pS2 + ppS2 + ppS2_S4_S4 + 2*ppS2_ppS2_S4 + ppS2_ppS3_S4 + 3*ppS2_ppS2_ppS2 + 2*ppS2_ppS2_ppS3 + ppS2_ppS3_ppS3);
  observable_S2IP_S3 := 0;
  observable_S2IP_pS3 := 0;
  observable_S2IP_ppS3 := 100;
  observable_S3IP_S3 := 100*S3/(S3 + pS3 + ppS3 + ppS3_S4_S4 + ppS2_ppS3_S4 + 2*ppS3_ppS3_S4 + ppS2_ppS2_ppS3 + 2*ppS2_ppS3_ppS3 + 3*ppS3_ppS3_ppS3);
  observable_S3IP_pS3 := 100*pS3/(S3 + pS3 + ppS3 + ppS3_S4_S4 + ppS2_ppS3_S4 + 2*ppS3_ppS3_S4 + ppS2_ppS2_ppS3 + 2*ppS2_ppS3_ppS3 + 3*ppS3_ppS3_ppS3);
  observable_S3IP_ppS3 := 100*(ppS3 + ppS3_S4_S4 + ppS2_ppS3_S4 + 2*ppS3_ppS3_S4 + ppS2_ppS2_ppS3 + 2*ppS2_ppS3_ppS3 + 3*ppS3_ppS3_ppS3)/(S3 + pS3 + ppS3 + ppS3_S4_S4 + ppS2_ppS3_S4 + 2*ppS3_ppS3_S4 + ppS2_ppS2_ppS3 + 2*ppS2_ppS3_ppS3 + 3*ppS3_ppS3_ppS3);
  observable_S23IP_S3 := 100*S3/(S3 + pS3 + ppS3 + ppS3_S4_S4 + ppS2_ppS3_S4 + 2*ppS3_ppS3_S4 + ppS2_ppS2_ppS3 + 2*ppS2_ppS3_ppS3 + 3*ppS3_ppS3_ppS3);
  observable_S23IP_pS3 := 100*pS3/(S3 + pS3 + ppS3 + ppS3_S4_S4 + ppS2_ppS3_S4 + 2*ppS3_ppS3_S4 + ppS2_ppS2_ppS3 + 2*ppS2_ppS3_ppS3 + 3*ppS3_ppS3_ppS3);
  observable_S23IP_ppS3 := 100*(ppS3 + ppS3_S4_S4 + ppS2_ppS3_S4 + 2*ppS3_ppS3_S4 + ppS2_ppS2_ppS3 + 2*ppS2_ppS3_ppS3 + 3*ppS3_ppS3_ppS3)/(S3 + pS3 + ppS3 + ppS3_S4_S4 + ppS2_ppS3_S4 + 2*ppS3_ppS3_S4 + ppS2_ppS2_ppS3 + 2*ppS2_ppS3_ppS3 + 3*ppS3_ppS3_ppS3);
  observable_Ski := geneA + 1e-6;
  observable_Skil := geneB + 1e-6;
  observable_Dnmt3a := geneC + 1e-6;
  observable_Sox4 := geneD + 1e-6;
  observable_Jun := geneE + 1e-6;
  observable_Smad7 := geneF + 1e-6;
  observable_Klf10 := geneG + 1e-6;
  observable_Bmp4 := geneH + 1e-6;
  observable_Cxcl15 := geneI + 1e-6;
  observable_Dusp5 := geneJ + 1e-6;
  observable_Tgfa := geneK + 1e-6;
  observable_Pdk4 := geneL + 1e-6;
  observable_TGFbR := Rec + TGFb_pRec;
  sigma_S2IP_tS2 := noiseParameter1_S2IP_tS2;
  sigma_S2IP_tS3 := noiseParameter1_S2IP_tS3;
  sigma_S2IP_tS4 := noiseParameter1_S2IP_tS4;
  sigma_S3IP_tS2 := noiseParameter1_S3IP_tS2;
  sigma_S3IP_tS3 := noiseParameter1_S3IP_tS3;
  sigma_S3IP_tS4 := noiseParameter1_S3IP_tS4;
  sigma_S4IP_tS2 := noiseParameter1_S4IP_tS2;
  sigma_S4IP_tS3 := noiseParameter1_S4IP_tS3;
  sigma_S4IP_tS4 := noiseParameter1_S4IP_tS4;
  sigma_S23IP_tS2 := noiseParameter1_S23IP_tS2;
  sigma_S23IP_tS3 := noiseParameter1_S23IP_tS3;
  sigma_S23IP_tS4 := noiseParameter1_S23IP_tS4;
  sigma_S2IP_S2 := noiseParameter1_S2IP_S2;
  sigma_S2IP_pS2 := noiseParameter1_S2IP_pS2;
  sigma_S2IP_ppS2 := noiseParameter1_S2IP_ppS2;
  sigma_S3IP_S2 := noiseParameter1_S3IP_S2;
  sigma_S3IP_pS2 := noiseParameter1_S3IP_pS2;
  sigma_S3IP_ppS2 := noiseParameter1_S3IP_ppS2;
  sigma_S23IP_S2 := noiseParameter1_S23IP_S2;
  sigma_S23IP_pS2 := noiseParameter1_S23IP_pS2;
  sigma_S23IP_ppS2 := noiseParameter1_S23IP_ppS2;
  sigma_S2IP_S3 := noiseParameter1_S2IP_S3;
  sigma_S2IP_pS3 := noiseParameter1_S2IP_pS3;
  sigma_S2IP_ppS3 := noiseParameter1_S2IP_ppS3;
  sigma_S3IP_S3 := noiseParameter1_S3IP_S3;
  sigma_S3IP_pS3 := noiseParameter1_S3IP_pS3;
  sigma_S3IP_ppS3 := noiseParameter1_S3IP_ppS3;
  sigma_S23IP_S3 := noiseParameter1_S23IP_S3;
  sigma_S23IP_pS3 := noiseParameter1_S23IP_pS3;
  sigma_S23IP_ppS3 := noiseParameter1_S23IP_ppS3;
  sigma_Ski := noiseParameter1_Ski;
  sigma_Skil := noiseParameter1_Skil;
  sigma_Dnmt3a := noiseParameter1_Dnmt3a;
  sigma_Sox4 := noiseParameter1_Sox4;
  sigma_Jun := noiseParameter1_Jun;
  sigma_Smad7 := noiseParameter1_Smad7;
  sigma_Klf10 := noiseParameter1_Klf10;
  sigma_Bmp4 := noiseParameter1_Bmp4;
  sigma_Cxcl15 := noiseParameter1_Cxcl15;
  sigma_Dusp5 := noiseParameter1_Dusp5;
  sigma_Tgfa := noiseParameter1_Tgfa;
  sigma_Pdk4 := noiseParameter1_Pdk4;
  sigma_TGFbR := noiseParameter1_TGFbR;

  // Reactions:
  v1_v_0: TGFb + Rec => TGFb_pRec; cell*Rec*Rec_act*TGFb;
  v2_v_1: TGFb_pRec => ; cell*TGFb_pRec*pRec_degind;
  v3_v_2: S2 + 2 S4 => S2_S4_S4; cell*S2*S4^2*k_on_u;
  v4_v_3: S2_S4_S4 => S2 + 2 S4; cell*S2_S4_S4*kdiss_SS;
  v5_v_4: 3 ppS2 => ppS2_ppS2_ppS2; cell*khomo2*ppS2^3;
  v6_v_5: ppS2_ppS2_ppS2 => pS2 + 2 ppS2; cell*3*S_dephosphos*ppS2_ppS2_ppS2;
  v7_v_6: 3 ppS3 => ppS3_ppS3_ppS3; cell*khomo3*ppS3^3;
  v8_v_7: ppS3_ppS3_ppS3 => pS3 + 2 ppS3; cell*3*S_dephosphos*ppS3_ppS3_ppS3;
  v9_v_8: 3 S4 => S4_S4_S4; cell*S4^3*khomo4;
  v10_v_9: S4_S4_S4 => 3 S4; cell*S4_S4_S4*kdiss_SS;
  v11_v_10: S2 => ppS2; cell*S2*S_phos*TGFb_pRec;  // modifiers: TGFb_pRec
  v12_v_11: ppS2 => pS2; cell*S_dephosphos*ppS2;
  v13_v_12: pS2 => S2; cell*S_dephos*pS2;
  v14_v_13: S3 => ppS3; cell*S3*S_phos*TGFb_pRec;  // modifiers: TGFb_pRec
  v15_v_14: ppS3 => pS3; cell*S_dephosphos*ppS3;
  v16_v_15: pS3 => S3; cell*S_dephos*pS3;
  v17_v_16: 2 ppS2 + ppS3 => ppS2_ppS2_ppS3; cell*k_223*ppS2^2*ppS3;
  v18_v_17: ppS2_ppS2_ppS3 => pS2 + ppS2 + ppS3; cell*2*S_dephosphos*ppS2_ppS2_ppS3;
  v19_v_18: ppS2_ppS2_ppS3 => pS3 + 2 ppS2; cell*S_dephosphos*ppS2_ppS2_ppS3;
  v20_v_19: S4 + 2 ppS2 => ppS2_ppS2_S4; cell*S4*k_224*ppS2^2;
  v21_v_20: ppS2_ppS2_S4 => S4 + pS2 + ppS2; cell*2*S_dephosphos*ppS2_ppS2_S4;
  v22_v_21: ppS2 + 2 ppS3 => ppS2_ppS3_ppS3; cell*k_233*ppS2*ppS3^2;
  v23_v_22: ppS2_ppS3_ppS3 => pS2 + 2 ppS3; cell*S_dephosphos*ppS2_ppS3_ppS3;
  v24_v_23: ppS2_ppS3_ppS3 => pS3 + ppS2 + ppS3; cell*2*S_dephosphos*ppS2_ppS3_ppS3;
  v25_v_24: S4 + 2 ppS3 => ppS3_ppS3_S4; cell*S4*k_334*ppS3^2;
  v26_v_25: ppS3_ppS3_S4 => S4 + pS3 + ppS3; cell*2*S_dephosphos*ppS3_ppS3_S4;
  v27_v_26: 2 S4 + ppS2 => ppS2_S4_S4; cell*S4^2*k_244*ppS2;
  v28_v_27: ppS2_S4_S4 => 2 S4 + pS2; cell*S_dephosphos*ppS2_S4_S4;
  v29_v_28: 2 S4 + ppS3 => ppS3_S4_S4; cell*S4^2*k_344*ppS3;
  v30_v_29: ppS3_S4_S4 => 2 S4 + pS3; cell*S_dephosphos*ppS3_S4_S4;
  v31_v_30: S4 + ppS2 + ppS3 => ppS2_ppS3_S4; cell*S4*k_234*ppS2*ppS3;
  v32_v_31: ppS2_ppS3_S4 => S4 + pS2 + ppS3; cell*S_dephosphos*ppS2_ppS3_S4;
  v33_v_32: ppS2_ppS3_S4 => S4 + pS3 + ppS2; cell*S_dephosphos*ppS2_ppS3_S4;
  v34_v_33: => geneA; cell*((geneA_turn + geneA_act2*ppS2_S4_S4 + geneA_act1*ppS2_ppS3_S4 + geneA_act3*ppS2_ppS3_ppS3)/(geneA_inh2*ppS2_S4_S4 + geneA_inh1*ppS2_ppS3_S4 + geneA_inh3*ppS2_ppS3_ppS3 + 1));  // modifiers: ppS2_S4_S4, ppS2_ppS3_S4, ppS2_ppS3_ppS3
  v35_v_34: geneA => ; cell*geneA*geneA_turn;
  v36_v_35: => geneB; cell*((geneB_turn + geneB_act2*ppS2_S4_S4 + geneB_act1*ppS2_ppS3_S4 + geneB_act3*ppS2_ppS3_ppS3)/(geneB_inh2*ppS2_S4_S4 + geneB_inh1*ppS2_ppS3_S4 + geneB_inh3*ppS2_ppS3_ppS3 + 1));  // modifiers: ppS2_S4_S4, ppS2_ppS3_S4, ppS2_ppS3_ppS3
  v37_v_36: geneB => ; cell*geneB*geneB_turn;
  v38_v_37: => geneC; cell*((geneC_turn + geneC_act2*ppS2_S4_S4 + geneC_act1*ppS2_ppS3_S4 + geneC_act3*ppS2_ppS3_ppS3)/(geneC_inh2*ppS2_S4_S4 + geneC_inh1*ppS2_ppS3_S4 + geneC_inh3*ppS2_ppS3_ppS3 + 1));  // modifiers: ppS2_S4_S4, ppS2_ppS3_S4, ppS2_ppS3_ppS3
  v39_v_38: geneC => ; cell*geneC*geneC_turn;
  v40_v_39: => geneD; cell*((geneD_turn + geneD_act2*ppS2_S4_S4 + geneD_act1*ppS2_ppS3_S4 + geneD_act3*ppS2_ppS3_ppS3)/(geneD_inh2*ppS2_S4_S4 + geneD_inh1*ppS2_ppS3_S4 + geneD_inh3*ppS2_ppS3_ppS3 + 1));  // modifiers: ppS2_S4_S4, ppS2_ppS3_S4, ppS2_ppS3_ppS3
  v41_v_40: geneD => ; cell*geneD*geneD_turn;
  v42_v_41: => geneE; cell*((geneE_turn + geneE_act2*ppS2_S4_S4 + geneE_act1*ppS2_ppS3_S4 + geneE_act3*ppS2_ppS3_ppS3)/(geneE_inh2*ppS2_S4_S4 + geneE_inh1*ppS2_ppS3_S4 + geneE_inh3*ppS2_ppS3_ppS3 + 1));  // modifiers: ppS2_S4_S4, ppS2_ppS3_S4, ppS2_ppS3_ppS3
  v43_v_42: geneE => ; cell*geneE*geneE_turn;
  v44_v_43: => geneF; cell*((geneF_turn + geneF_act2*ppS2_S4_S4 + geneF_act1*ppS2_ppS3_S4 + geneF_act3*ppS2_ppS3_ppS3)/(geneF_inh2*ppS2_S4_S4 + geneF_inh1*ppS2_ppS3_S4 + geneF_inh3*ppS2_ppS3_ppS3 + 1));  // modifiers: ppS2_S4_S4, ppS2_ppS3_S4, ppS2_ppS3_ppS3
  v45_v_44: geneF => ; cell*geneF*geneF_turn;
  v46_v_45: => geneG; cell*((geneG_turn + geneG_act2*ppS2_S4_S4 + geneG_act1*ppS2_ppS3_S4 + geneG_act3*ppS2_ppS3_ppS3)/(geneG_inh2*ppS2_S4_S4 + geneG_inh1*ppS2_ppS3_S4 + geneG_inh3*ppS2_ppS3_ppS3 + 1));  // modifiers: ppS2_S4_S4, ppS2_ppS3_S4, ppS2_ppS3_ppS3
  v47_v_46: geneG => ; cell*geneG*geneG_turn;
  v48_v_47: => geneH; cell*((geneH_turn + geneH_act2*ppS2_S4_S4 + geneH_act1*ppS2_ppS3_S4 + geneH_act3*ppS2_ppS3_ppS3)/(geneH_inh2*ppS2_S4_S4 + geneH_inh1*ppS2_ppS3_S4 + geneH_inh3*ppS2_ppS3_ppS3 + 1));  // modifiers: ppS2_S4_S4, ppS2_ppS3_S4, ppS2_ppS3_ppS3
  v49_v_48: geneH => ; cell*geneH*geneH_turn;
  v50_v_49: => geneI; cell*((geneI_turn + geneI_act2*ppS2_S4_S4 + geneI_act1*ppS2_ppS3_S4 + geneI_act3*ppS2_ppS3_ppS3)/(geneI_inh2*ppS2_S4_S4 + geneI_inh1*ppS2_ppS3_S4 + geneI_inh3*ppS2_ppS3_ppS3 + 1));  // modifiers: ppS2_S4_S4, ppS2_ppS3_S4, ppS2_ppS3_ppS3
  v51_v_50: geneI => ; cell*geneI*geneI_turn;
  v52_v_51: => geneJ; cell*((geneJ_turn + geneJ_act2*ppS2_S4_S4 + geneJ_act1*ppS2_ppS3_S4 + geneJ_act3*ppS2_ppS3_ppS3)/(geneJ_inh2*ppS2_S4_S4 + geneJ_inh1*ppS2_ppS3_S4 + geneJ_inh3*ppS2_ppS3_ppS3 + 1));  // modifiers: ppS2_S4_S4, ppS2_ppS3_S4, ppS2_ppS3_ppS3
  v53_v_52: geneJ => ; cell*geneJ*geneJ_turn;
  v54_v_53: => geneK; cell*((geneK_turn + geneK_act2*ppS2_S4_S4 + geneK_act1*ppS2_ppS3_S4 + geneK_act3*ppS2_ppS3_ppS3)/(geneK_inh2*ppS2_S4_S4 + geneK_inh1*ppS2_ppS3_S4 + geneK_inh3*ppS2_ppS3_ppS3 + 1));  // modifiers: ppS2_S4_S4, ppS2_ppS3_S4, ppS2_ppS3_ppS3
  v55_v_54: geneK => ; cell*geneK*geneK_turn;
  v56_v_55: => geneL; cell*((geneL_turn + geneL_act2*ppS2_S4_S4 + geneL_act1*ppS2_ppS3_S4 + geneL_act3*ppS2_ppS3_ppS3)/(geneL_inh2*ppS2_S4_S4 + geneL_inh1*ppS2_ppS3_S4 + geneL_inh3*ppS2_ppS3_ppS3 + 1));  // modifiers: ppS2_S4_S4, ppS2_ppS3_S4, ppS2_ppS3_ppS3
  v57_v_56: geneL => ; cell*geneL*geneL_turn;

  // Unit definitions:
  unit time = 60 second;
end
