// SBML level 2 version 4

model Raia_CancerResearch2011()
  // il13_jak2_stat5
  // PEtab implementation of the model from Raia et al. (2011), Cancer Res February 1 2011 (71) (3) 693-704
  // isDescribedBy doi:10.1158/0008-5472.CAN-10-2987

  // Compartments:
  compartment cyt = 100;
  compartment nuc = 10;

  // Species:
  species Rec in cyt = 1.3;
  species Rec_i in cyt = init_Rec_i;
  species IL13_Rec in cyt = 0;
  species p_IL13_Rec in cyt = 0;
  species p_IL13_Rec_i in cyt = 0;
  species JAK2 in cyt = 2.8;
  species pJAK2 in cyt = 0;
  species STAT5 in cyt = 165;
  species pSTAT5 in cyt = 0;
  species SOCS3mRNA in nuc = 0;
  species DecoyR in cyt = 0.34;
  species IL13_DecoyR in cyt = 0;
  species SOCS3 in cyt = 0;
  species CD274mRNA in nuc = 0;

  // Parameters:
  CD274mRNA_production = 0.02121477;
  DecoyR_binding = 0.003851316;
  JAK2_p_inhibition = 0.07815251;
  JAK2_phosphorylation = 1.017465;
  Kon_IL13Rec = 0.002277861;
  Rec_intern = 0.3440644;
  Rec_phosphorylation = 999.9994;
  Rec_recycle = 0.002098163;
  SOCS3_accumulation = 451.5968;
  SOCS3_degradation = 0.04338875;
  SOCS3_translation = 15.72443;
  SOCS3mRNA_production = 0.1432781;
  STAT5_phosphorylation = 0.01947683;
  init_Rec_i = 234.9595;
  pJAK2_dephosphorylation = 0.0001758212;
  pRec_degradation = 0.2095321;
  pRec_intern = 0.5850963;
  pSTAT5_dephosphorylation = 0.0002747903;
  observableParameter1_CD274mRNA = 0.008153812;
  observableParameter1_IL13_cell = 5.500764;
  observableParameter1_SOCS3mRNA = 0.5817613;
  observableParameter1_pIL4Ra = 2.975466;
  observableParameter1_pJAK2 = 0.8570475;
  noiseParameter1_CD274mRNA = 0.02447611;
  noiseParameter1_IL13_cell = 0.2751506;
  noiseParameter1_RecSurf = 1.012156e-5;
  noiseParameter1_SOCS3 = 15.16941;
  noiseParameter1_SOCS3mRNA = 9.18855;
  noiseParameter1_pIL4Ra = 0.6158832;
  noiseParameter1_pJAK2 = 0.3243949;
  noiseParameter1_pSTAT5 = 1.40183;
  noiseParameter2_CD274mRNA = 0.02447611;
  noiseParameter2_IL13_cell = 0.2751506;
  noiseParameter2_RecSurf = 1.012156e-5;
  noiseParameter2_SOCS3 = 15.16941;
  noiseParameter2_SOCS3mRNA = 9.18855;
  noiseParameter2_pIL4Ra = 0.6158832;
  noiseParameter2_pJAK2 = 0.3243949;
  noiseParameter2_pSTAT5 = 1.40183;
  il13_level = 0;

  // Assignment rules:
  sigma_CD274mRNA := noiseParameter1_CD274mRNA + noiseParameter2_CD274mRNA*observable_CD274mRNA;
  sigma_IL13_cell := noiseParameter1_IL13_cell + noiseParameter2_IL13_cell*observable_IL13_cell;
  sigma_RecSurf := noiseParameter1_RecSurf + noiseParameter2_RecSurf*observable_RecSurf;
  sigma_SOCS3 := noiseParameter1_SOCS3 + noiseParameter2_SOCS3*observable_SOCS3;
  sigma_SOCS3mRNA := noiseParameter1_SOCS3mRNA + noiseParameter2_SOCS3mRNA*observable_SOCS3mRNA;
  sigma_pIL4Ra := noiseParameter1_pIL4Ra + noiseParameter2_pIL4Ra*observable_pIL4Ra;
  sigma_pJAK2 := noiseParameter1_pJAK2 + noiseParameter2_pJAK2*observable_pJAK2;
  sigma_pSTAT5 := noiseParameter1_pSTAT5 + noiseParameter2_pSTAT5*observable_pSTAT5;
  observable_RecSurf := IL13_Rec + Rec + p_IL13_Rec;
  observable_IL13_cell := observableParameter1_IL13_cell*(IL13_Rec + IL13_DecoyR + p_IL13_Rec + p_IL13_Rec_i);
  observable_pIL4Ra := observableParameter1_pIL4Ra*(p_IL13_Rec + p_IL13_Rec_i);
  observable_pJAK2 := pJAK2*observableParameter1_pJAK2;
  observable_SOCS3mRNA := SOCS3mRNA*observableParameter1_SOCS3mRNA;
  observable_CD274mRNA := CD274mRNA*observableParameter1_CD274mRNA;
  observable_SOCS3 := SOCS3;
  observable_pSTAT5 := pSTAT5;

  // Reactions:
  v1_v_0: Rec => IL13_Rec; cyt*2.265*il13_level*Kon_IL13Rec*Rec;
  v2_v_1: Rec => Rec_i; cyt*Rec*Rec_intern;
  v3_v_2: Rec_i => Rec; cyt*Rec_i*Rec_recycle;
  v4_v_3: IL13_Rec => p_IL13_Rec; cyt*IL13_Rec*Rec_phosphorylation*pJAK2;  // modifiers: pJAK2
  v5_v_4: JAK2 => pJAK2; cyt*(IL13_Rec*JAK2*JAK2_phosphorylation/(JAK2_p_inhibition*SOCS3 + 1));  // modifiers: IL13_Rec, SOCS3
  v6_v_5: JAK2 => pJAK2; cyt*(JAK2*JAK2_phosphorylation*p_IL13_Rec/(JAK2_p_inhibition*SOCS3 + 1));  // modifiers: SOCS3, p_IL13_Rec
  v7_v_6: p_IL13_Rec => p_IL13_Rec_i; cyt*pRec_intern*p_IL13_Rec;
  v8_v_7: p_IL13_Rec_i => ; cyt*pRec_degradation*p_IL13_Rec_i;
  v9_v_8: pJAK2 => JAK2; cyt*91*pJAK2*pJAK2_dephosphorylation;
  v10_v_9: STAT5 => pSTAT5; cyt*STAT5*STAT5_phosphorylation*pJAK2;  // modifiers: pJAK2
  v11_v_10: pSTAT5 => STAT5; cyt*91*pSTAT5*pSTAT5_dephosphorylation;
  v12_v_11: DecoyR => IL13_DecoyR; cyt*2.265*il13_level*DecoyR*DecoyR_binding;
  v13_v_12: => SOCS3mRNA; nuc*SOCS3mRNA_production*pSTAT5;  // modifiers: pSTAT5
  v14_v_13: => SOCS3; cyt*(SOCS3mRNA*SOCS3_translation/(SOCS3mRNA + SOCS3_accumulation));  // modifiers: SOCS3mRNA
  v15_v_14: SOCS3 => ; cyt*SOCS3*SOCS3_degradation;
  v16_v_15: => CD274mRNA; nuc*CD274mRNA_production*pSTAT5;  // modifiers: pSTAT5

  // Unit definitions:
  unit time = 60 second;
end
