// SBML level 2 version 4

model Sneyd_PNAS2002()
  // model_Sneyd_PNAS2002
  // PEtab implementation of the model from Sneyd et al. (2002), PNAS February 19, 2002 99 (4) 2398-2403
  // isDescribedBy doi:10.1073/pnas.032281999

  // Compartments:
  compartment default = 1 volume;
  compartment membrane in default = 1 volume;

  // Species:
  species IPR_O in membrane = 0;
  species IPR_R in membrane = 1;
  species IPR_I1 in membrane = 0; IPR_I1 is "I_1";
  species IPR_S in membrane = 0;
  species IPR_A in membrane = 0;
  species IPR_I2 in membrane = 0; IPR_I2 is "I_2";

  // Parameters:
  k1 = 3.727211;
  k2 = 100000;
  k3 = 15.74534;
  k4 = 99938.26;
  k_1 = 0.9239247;
  k_2 = 0.001002495;
  k_3 = 1.91463;
  k_4 = 3079.207;
  l2 = 0.940077;
  l4 = 2.858377;
  l6 = 100000;
  l_2 = 0.3476645;
  l_4 = 0.0138802;
  l_6 = 0.001 time;
  noiseParameter1_open_probability = 0.02266568 substance;
  observable_open_probability has substance;
  L1 has substance;
  L3 has substance;
  L5 has substance;
  sigma_open_probability has substance;
  Ca = 10 time;
  IP3 = 0 time;

  // Assignment rules:
  observable_open_probability := (0.9*IPR_A + 0.1*IPR_O)^4;
  L1 := k_1/k1/(l_2/l2);
  L3 := k_2/k2/(l_4/l4);
  L5 := k_4/k4/(l_6/l6);
  sigma_open_probability := noiseParameter1_open_probability;

  // Reactions:
  v_0: IPR_O => IPR_R; (k_2 + l_4*Ca)/(1 + Ca/L5)*IPR_O;
  v_1: IPR_R => IPR_O; (k2*L3 + l4*Ca)/(L3 + Ca*(1 + L3/L1))*IP3*IPR_R;
  v_2: IPR_R => IPR_I1; (k1*L1 + l2)*Ca/(L1 + Ca*(1 + L1/L3))*IPR_R;
  v_3: IPR_I1 => IPR_R; (k_1 + l_2)*IPR_I1;
  v_4: IPR_O => IPR_A; (k4*L5 + l6)*Ca/(L5 + Ca)*IPR_O;
  v_5: IPR_A => IPR_O; L1*(k_4 + l_6)/(L1 + Ca)*IPR_A;
  v_6: IPR_A => IPR_I2; (k1*L1 + l2)*Ca/(L1 + Ca)*IPR_A;
  v_7: IPR_I2 => IPR_A; (k_1 + l_2)*IPR_I2;
  v_8: IPR_O => IPR_S; k3*L5/(L5 + Ca)*IPR_O;
  v_9: IPR_S => IPR_O; k_3*IPR_S;

  // Unit definitions:
  unit time = second;
  unit substance = mole;
  unit volume = litre;
  unit area = metre^2;
  unit length = metre;
end
