// SBML level 2 version 4

model Sobotta_Frontiers2017()
  // il6_core
  // PEtab implementation of the model from Sobotta et al. (2017), Front. Physiol., 8, 775
  // isDescribedBy doi:10.3389/fphys.2017.00775

  // Compartments:
  compartment cyt = 12.67;
  compartment nuc = 0.5;

  // Species:
  species JAK1_gp130 in cyt = 0.5552126; JAK1_gp130 is "Unphosphorylated receptor";
  species pJAK1_gp130 in cyt = 0.0004880905; pJAK1_gp130 is "Phosphorylated JAK1 receptor";
  species pJAK1_pgp130 in cyt = 0.003178217; pJAK1_pgp130 is "Active receptor";
  species STAT3 in cyt = 28.92594; STAT3 is "Inactive cytoplasmic STAT3";
  species tpSTAT3 in cyt = 0.8321796; tpSTAT3 is "Active STAT3";
  species nSTAT3 in nuc = 25.86988; nSTAT3 is "Inactive nuclear STAT3";
  species nSOCS3RNA1 in nuc = 0.002829032; nSOCS3RNA1 is "SOCS3 transcriptional delay";
  species nSOCS3RNA2 in nuc = 0.002829032; nSOCS3RNA2 is "SOCS3 transcriptional delay";
  species nSOCS3RNA3 in nuc = 0.002829032; nSOCS3RNA3 is "SOCS3 transcriptional delay";
  species nSOCS3RNA4 in nuc = 0.002829032; nSOCS3RNA4 is "SOCS3 transcriptional delay";
  species nSOCS3RNA5 in nuc = 0.002829032; nSOCS3RNA5 is "SOCS3 transcriptional delay";
  species SOCS3RNA in cyt = 0.0001116527; SOCS3RNA is "SOCS3 mRNA";
  species SOCS3 in cyt = 0.02560214; SOCS3 is "SOCS3 protein";

  // Parameters:
  f_pstat3_imp = 4.971185;
  gp130_act_jak1 = 0.5370037;
  gp130_deg = 0.003807752;
  gp130_pro = 0.002404846;
  jak1_act_basal = 0.004312995;
  jak1_act_il6 = 0.009075828;
  jak1_gp130_dea = 0.07816668;
  jak1_inh_ruxolitinib = 0.00602318;
  socs3_assoc = 0.01934333;
  socs3_des = 0.4486812;
  socs3_pro = 1.697932;
  socs3rna_delay = 0.3039418;
  socs3rna_des = 0.3039153;
  socs3rna_hill = 1.713296;
  socs3rna_pro = 0.001700054;
  stat3_act_gp130 = 0.4115579;
  stat3_exp = 1.970885;
  stat3_imp = 0.05936259;
  stat3_inh_socs3 = 0.6188303;
  stat3_inh_stattic = 0.1003474;
  rux_degrade = 0.0009706481;
  total_STAT3 = 779.9407;
  input_il6 = 0;
  input_actd = 0;
  input_stattic = 0;
  input_ruxolitinib = 0;
  scale_pgp130_wb_bohl_hep_2005_07_26_Pulse5min = 7.91982;
  scale_socs3_qpcr_braun_hep_2013_07_08_qPCR_Socs3_Stat3 = 62.05325;
  observableParameter1_pSTAT3_lumi = 1;
  observableParameter2_pSTAT3_lumi = 1;
  observableParameter1_npSTAT3_wb = 1;
  observableParameter2_npSTAT3_wb = 1;
  observableParameter1_pSTAT3_wb = 1;
  observableParameter2_pSTAT3_wb = 1;
  observableParameter1_pJAK1_wb = 1;
  observableParameter2_pJAK1_wb = 1;
  observableParameter1_pgp130_wb = 1;
  observableParameter2_pgp130_wb = 1;
  observableParameter1_SOCS3_qpcr = 1;
  observableParameter2_SOCS3_qpcr = 1;
  observableParameter1_SOCS3_wb = 1;
  observableParameter2_SOCS3_wb = 1;
  noiseParameter1_pJAK1_wb = 1;
  noiseParameter1_pSTAT3_ms = 1;
  noiseParameter1_ntSTAT3_ratio = 1;
  noiseParameter1_pSTAT3_lumi = 1;
  noiseParameter1_pgp130_wb = 1;
  noiseParameter1_pSTAT3_wb = 1;
  noiseParameter1_SOCS3_wb = 1;
  noiseParameter1_npSTAT3_wb = 1;
  noiseParameter1_SOCS3_abs = 1;
  noiseParameter1_SOCS3_qpcr = 1;
  noiseParameter1_JAK1_gp130_abs = 1;
  noiseParameter1_ctSTAT3_abs = 1;

  // Assignment rules:
  IL6 := input_il6*piecewise(0, time < 0, 1);
  ActD := piecewise(0, time + 10 < 0, input_actd);
  Stattic := input_stattic*piecewise(0, time + 60 < 0, 1);
  Ruxolitinib := input_ruxolitinib*exp(-rux_degrade*(time + 60))*piecewise(0, time + 60 < 0, 1);
  observable_npSTAT3_wb := observableParameter1_npSTAT3_wb + 25.34*stat3_imp*tpSTAT3*observableParameter2_npSTAT3_wb*(f_pstat3_imp + 1)/total_STAT3;
  sigma_npSTAT3_wb := noiseParameter1_npSTAT3_wb;
  observable_JAK1_gp130_abs := JAK1_gp130 + pJAK1_gp130 + pJAK1_pgp130;
  sigma_JAK1_gp130_abs := noiseParameter1_JAK1_gp130_abs;
  observable_ctSTAT3_abs := STAT3 + tpSTAT3;
  sigma_ctSTAT3_abs := noiseParameter1_ctSTAT3_abs;
  observable_SOCS3_wb := observableParameter1_SOCS3_wb + SOCS3*observableParameter2_SOCS3_wb;
  sigma_SOCS3_wb := noiseParameter1_SOCS3_wb;
  observable_pJAK1_wb := observableParameter1_pJAK1_wb + observableParameter2_pJAK1_wb*(pJAK1_gp130 + pJAK1_pgp130);
  sigma_pJAK1_wb := noiseParameter1_pJAK1_wb;
  observable_pSTAT3_ms := 100*tpSTAT3/(STAT3 + tpSTAT3);
  sigma_pSTAT3_ms := noiseParameter1_pSTAT3_ms;
  observable_ntSTAT3_ratio := nSTAT3/(STAT3 + tpSTAT3);
  sigma_ntSTAT3_ratio := noiseParameter1_ntSTAT3_ratio;
  observable_SOCS3_abs := SOCS3;
  sigma_SOCS3_abs := noiseParameter1_SOCS3_abs;
  observable_pSTAT3_lumi := observableParameter1_pSTAT3_lumi + tpSTAT3*observableParameter2_pSTAT3_lumi/total_STAT3;
  sigma_pSTAT3_lumi := noiseParameter1_pSTAT3_lumi;
  observable_pgp130_wb := observableParameter1_pgp130_wb + observableParameter2_pgp130_wb*pJAK1_pgp130;
  sigma_pgp130_wb := noiseParameter1_pgp130_wb;
  observable_pSTAT3_wb := observableParameter1_pSTAT3_wb + tpSTAT3*observableParameter2_pSTAT3_wb/total_STAT3;
  sigma_pSTAT3_wb := noiseParameter1_pSTAT3_wb;
  observable_SOCS3_qpcr := observableParameter1_SOCS3_qpcr + SOCS3RNA*observableParameter2_SOCS3_qpcr;
  sigma_SOCS3_qpcr := noiseParameter1_SOCS3_qpcr;

  // Reactions:
  v1_Receptor_production: => JAK1_gp130; cyt*(-gp130_pro)*(ActD - 1);
  v2_Receptor_degradation: JAK1_gp130 => ; cyt*JAK1_gp130*gp130_deg;
  v3_Receptor_degradation: pJAK1_pgp130 => ; cyt*gp130_deg*pJAK1_pgp130;
  v4_Receptor_degradation: pJAK1_gp130 => ; cyt*gp130_deg*pJAK1_gp130;
  v5_Activation_of_the_JAK1_receptor: JAK1_gp130 => pJAK1_gp130; cyt*(JAK1_gp130*(jak1_act_basal/scale_pgp130_wb_bohl_hep_2005_07_26_Pulse5min + IL6*jak1_act_il6/scale_pgp130_wb_bohl_hep_2005_07_26_Pulse5min)/(Ruxolitinib*jak1_inh_ruxolitinib + 1));
  v6_Activation_of_the_gp130_subunit: pJAK1_gp130 => pJAK1_pgp130; cyt*(gp130_act_jak1*pJAK1_gp130/(Ruxolitinib*jak1_inh_ruxolitinib + 1));
  v7_Receptor_dephosphorylation: pJAK1_gp130 => JAK1_gp130; cyt*jak1_gp130_dea*pJAK1_gp130;
  v8_Receptor_dephosphorylation: pJAK1_pgp130 => JAK1_gp130; cyt*jak1_gp130_dea*pJAK1_pgp130;
  v9_SOCS3_mediated_degradation: JAK1_gp130 + SOCS3 => ; cyt*JAK1_gp130*SOCS3*socs3_assoc;
  v10_SOCS3_mediated_degradation: pJAK1_gp130 + SOCS3 => ; cyt*SOCS3*pJAK1_gp130*socs3_assoc;
  v11_SOCS3_mediated_degradation: pJAK1_pgp130 + SOCS3 => ; cyt*SOCS3*pJAK1_pgp130*socs3_assoc;
  v12_Import_of_unphosphorylated_STAT3: STAT3 => nSTAT3; cyt*STAT3*stat3_imp;
  v13_Export_of_unphosphorylated_STAT3: nSTAT3 => STAT3; nuc*nSTAT3*stat3_exp;
  v14_STAT3_phosphorylation_and_dimerization: STAT3 => tpSTAT3; cyt*(STAT3*pJAK1_pgp130*stat3_act_gp130*scale_pgp130_wb_bohl_hep_2005_07_26_Pulse5min/((SOCS3*stat3_inh_socs3 + 1)*(Stattic*stat3_inh_stattic + 1)));  // modifiers: SOCS3, pJAK1_pgp130
  v15_STAT3_import_and_deactivation: tpSTAT3 => nSTAT3; cyt*stat3_imp*tpSTAT3*(f_pstat3_imp + 1);
  v16_Initiation_of_SOCS3_mRNA_transcription: => nSOCS3RNA1; nuc*(-(socs3rna_pro*(ActD - 1)*(25.34*stat3_imp*tpSTAT3*(f_pstat3_imp + 1))^socs3rna_hill)/scale_socs3_qpcr_braun_hep_2013_07_08_qPCR_Socs3_Stat3);  // modifiers: tpSTAT3
  v17_Transcriptional_delay: nSOCS3RNA1 => nSOCS3RNA2; nuc*nSOCS3RNA1*socs3rna_delay;
  v18_Transcriptional_delay: nSOCS3RNA2 => nSOCS3RNA3; nuc*nSOCS3RNA2*socs3rna_delay;
  v19_Transcriptional_delay: nSOCS3RNA3 => nSOCS3RNA4; nuc*nSOCS3RNA3*socs3rna_delay;
  v20_Transcriptional_delay: nSOCS3RNA4 => nSOCS3RNA5; nuc*nSOCS3RNA4*socs3rna_delay;
  v21_Transcriptional_delay: nSOCS3RNA5 => SOCS3RNA; nuc*nSOCS3RNA5*socs3rna_delay;
  v22_SOCS3_mRNA_degradation: SOCS3RNA => ; cyt*SOCS3RNA*socs3rna_des;
  v23_SOCS3_mRNA_translation: => SOCS3; cyt*SOCS3RNA*socs3_pro*scale_socs3_qpcr_braun_hep_2013_07_08_qPCR_Socs3_Stat3;  // modifiers: SOCS3RNA
  v24_SOCS3_degradation: SOCS3 => ; cyt*SOCS3*socs3_des;

  // Unit definitions:
  unit time = 60 second;
end
