// SBML level 2 version 4

model Swameye_PNAS2003()
  // pnas_jak_stat
  // PEtab implementation of the model from Swameye et al. (2003), PNAS February 4, 2003 100 (3) 1028-1033
  // isDescribedBy doi:10.1073/pnas.0237333100

  // Compartments:
  compartment cyt = 1.4;
  compartment nuc = 0.45;

  // Species:
  species STAT in cyt = init_STAT;
  species pSTAT in cyt = 0;
  species pSTAT_pSTAT in cyt = 0;
  species npSTAT_npSTAT in nuc = 0;
  species nSTAT1 in nuc = 0;
  species nSTAT2 in nuc = 0;
  species nSTAT3 in nuc = 0;
  species nSTAT4 in nuc = 0;
  species nSTAT5 in nuc = 0;
  species EventTrigger_dummy in cyt = 0;

  // Parameters:
  init_STAT = 1;
  observableParameter1_pSTAT_au = 0.2396031;
  observableParameter1_tSTAT_au = 0.2719639;
  p1 = 3.555099;
  p2 = 1000;
  p3 = 0.1238568;
  p4 = 0.970723;
  observableParameter2_pSTAT_au = 1.099431;
  observableParameter2_tSTAT_au = 0.6674412;
  noiseParameter1_pEpoR_au = 0.06811712;
  noiseParameter1_pSTAT_au = 0.04634892;
  noiseParameter1_tSTAT_au = 0.05323087;
  sp1 = 0.001871366;
  sp2 = 0.5552973;
  sp3 = 0.8499808;
  sp4 = 0.3721673;
  sp5 = 3.451931e-5;
  spline_t_0 = 0;
  A = 0;
  B = 0;
  C = 0;
  D = 0;

  // Assignment rules:
  sigma_pSTAT_au := noiseParameter1_pSTAT_au;
  sigma_tSTAT_au := noiseParameter1_tSTAT_au;
  sigma_pEpoR_au := noiseParameter1_pEpoR_au;
  pEpoR := exp(A*(time - spline_t_0)^3 + B*(time - spline_t_0)^2 + C*(time - spline_t_0) + D);
  observable_tSTAT_au := observableParameter1_tSTAT_au + observableParameter2_tSTAT_au*(STAT + pSTAT + 2*pSTAT_pSTAT)/init_STAT;
  observable_pSTAT_au := observableParameter1_pSTAT_au + observableParameter2_pSTAT_au*(pSTAT + 2*pSTAT_pSTAT)/init_STAT;
  observable_pEpoR_au := pEpoR;

  // Reactions:
  v1_v_0: STAT => pSTAT; cyt*STAT*p1*pEpoR;
  v2_v_1: 2 pSTAT => pSTAT_pSTAT; cyt*(p2*pSTAT^2/init_STAT);
  v3_v_2: pSTAT_pSTAT => npSTAT_npSTAT; cyt*p3*pSTAT_pSTAT;
  v4_v_3: npSTAT_npSTAT => 2 nSTAT1; nuc*npSTAT_npSTAT*p4;
  v5_v_4: nSTAT1 => nSTAT2; nuc*nSTAT1*p4;
  v6_v_5: nSTAT2 => nSTAT3; nuc*nSTAT2*p4;
  v7_v_6: nSTAT3 => nSTAT4; nuc*nSTAT3*p4;
  v8_v_7: nSTAT4 => nSTAT5; nuc*nSTAT4*p4;
  v9_v_8: nSTAT5 => STAT; nuc*nSTAT5*p4;

  // Events:
  t_0_event: at (time > 0): spline_t_0 = 0, A = 0.004708, B = -0.183907, C = 1.9404, D = -6.281087;
  t_5_event: at (time > 5): spline_t_0 = 5, A = 0.007886, B = -0.113286, C = 0.454434, D = -0.5882516;
  t_10_event: at (time > 10): spline_t_0 = 10, A = -0.000456, B = 0.004997, C = -0.087011, D = -0.1625416;
  t_20_event: at (time > 20): spline_t_0 = 20, A = 0.000149, B = -0.008668, C = -0.123713, D = -0.9884117;

  // Unit definitions:
  unit time = 60 second;
end
