// SBML level 2 version 4

model Weber_BMC2015()
  // model_A
  // PEtab implementation of the model from Weber et al. (2015), BMC Syst. Biol., 9, 9
  // isDescribedBy doi:10.1186/s12918-015-0147-1

  // Compartments:
  compartment cyt = 1;

  // Species:
  species PKD in cyt = 466431.8;
  species PKDDAGa in cyt = 126.6888; PKDDAGa is "PKD_p:DAG";
  species PI4K3B in cyt = 1580543; PI4K3B is "PI4KIII\beta";
  species PI4K3Ba in cyt = 324972.5; PI4K3Ba is "PI4KIII\beta_p";
  species CERTERa in cyt = 3.092008e7; CERTERa is "CERT_{a,ER}";
  species CERT in cyt = 142522.8; CERT is "CERT_{p,ER}";
  species CERTTGNa in cyt = 3.622017e7; CERTTGNa is "CERT_{a,TGN}";

  // Parameters:
  a11 = 0.1835169;
  a12 = 25.94223;
  a21 = 1.869213;
  a22 = 0.0001;
  a31 = 0.1404273;
  a32 = 0.0001;
  a33 = 0.0001;
  m11 = 1e10;
  m22 = 2174.184;
  m31 = 9.98784e9;
  m33 = 7.560197e7;
  p11 = 4.235786;
  p12 = 0.006012355;
  p13 = 0.001831829;
  p21 = 5.730486;
  p22 = 21.39899;
  p31 = 2428.019;
  p32 = 17.11284;
  p33 = 40184.08;
  pu2 = 1;
  pu3 = 1e8;
  pu4 = 3.576376e7;
  pu5 = 33.7869;
  pu6 = 147.5405;
  s12 = 88884.69;
  s21 = 2954405;
  s31 = 4345661;
  observableParameter1_yCERTpRN24 = 124.2192;
  observableParameter1_yPI4K3BpRN24 = 3.42048;
  observableParameter1_yPKDpN0 = 0.007013136;
  observableParameter1_yPKDpN24 = 0.003256097;
  observableParameter1_yPKDpN25 = 0.0002296591;
  noiseParameter1_yCERTpRN24 = 0.07542298;
  noiseParameter1_yCERTt = 2.447272e8;
  noiseParameter1_yPI4K3BpRN24 = 0.472018;
  noiseParameter1_yPI4K3Bt = 887676.131;
  noiseParameter1_yPKDpN0 = 1.109739;
  noiseParameter1_yPKDpN24 = 1.230931;
  noiseParameter1_yPKDpN25 = 0.133925;
  noiseParameter1_yPKDt = 1910528;
  Ect_Expr_CERT_flag = 0;
  Ect_Expr_PI4K3beta_flag = 0;
  PdBu_dose = 0;
  PdBu_time = 0;
  kb_NB142_70_dose = 0;
  kb_NB142_70_time = 0;

  // Assignment rules:
  u2 := 0;
  u3 := 0;
  u4 := 0;
  u5 := 0;
  u6 := 0;
  observable_yPKDt := PKD + PKDDAGa;
  observable_yPI4K3Bt := PI4K3B + PI4K3Ba;
  observable_yCERTt := CERT + CERTERa + CERTTGNa;
  observable_yPKDpN0 := PKDDAGa*observableParameter1_yPKDpN0;
  observable_yPKDpN24 := PKDDAGa*observableParameter1_yPKDpN24;
  observable_yPKDpN25 := PKDDAGa*observableParameter1_yPKDpN25;
  observable_yPI4K3BpRN24 := PI4K3Ba*observableParameter1_yPI4K3BpRN24/(PI4K3B + PI4K3Ba);
  observable_yCERTpRN24 := CERT*observableParameter1_yCERTpRN24/(CERT + CERTERa + CERTTGNa);
  sigma_yPKDt := noiseParameter1_yPKDt;
  sigma_yPI4K3Bt := noiseParameter1_yPI4K3Bt;
  sigma_yCERTt := noiseParameter1_yCERTt;
  sigma_yPKDpN0 := noiseParameter1_yPKDpN0;
  sigma_yPKDpN24 := noiseParameter1_yPKDpN24;
  sigma_yPKDpN25 := noiseParameter1_yPKDpN25;
  sigma_yPI4K3BpRN24 := noiseParameter1_yPI4K3BpRN24;
  sigma_yCERTpRN24 := noiseParameter1_yCERTpRN24;

  // Reactions:
  v1_v_0: PKD => PKDDAGa; cyt*(CERTERa*PI4K3Ba*PKD*p11*p31/((PI4K3Ba + m31)*(m11 + CERTERa*PI4K3Ba*p31/(PI4K3Ba + m31))));  // modifiers: CERTERa, PI4K3Ba
  v2_v_1: PKD => PKDDAGa; cyt*PKD*p12*(pu5*u5 + 1);
  v3_v_2: PKDDAGa => PKD; cyt*PKDDAGa*p13*(pu6*u6 + 1);
  v4_v_3: => PKD; cyt*s12;
  v5_v_4: => PKD; cyt*pu2*u2;
  v6_v_5: PKD => ; cyt*PKD*a11;
  v7_v_6: PKDDAGa => ; cyt*PKDDAGa*a12;
  v8_v_7: PI4K3Ba => PI4K3B; cyt*PI4K3Ba*p21;
  v9_v_8: PI4K3B => PI4K3Ba; cyt*(PI4K3B*PKDDAGa*p22/(PKDDAGa + m22));  // modifiers: PKDDAGa
  v10_v_9: => PI4K3B; cyt*s21;
  v11_v_10: => PI4K3B; cyt*pu3*u3;
  v12_v_11: PI4K3B => ; cyt*PI4K3B*a21;
  v13_v_12: PI4K3Ba => ; cyt*PI4K3Ba*a22;
  v14_v_13: CERTERa => CERTTGNa; cyt*(CERTERa*PI4K3Ba*p31/(PI4K3Ba + m31));  // modifiers: PI4K3Ba
  v15_v_14: CERT => CERTERa; cyt*CERT*p32;
  v16_v_15: CERTTGNa => CERT; cyt*(CERTTGNa*PKDDAGa*p33/(PKDDAGa + m33));  // modifiers: PKDDAGa
  v17_v_16: => CERTERa; cyt*s31;
  v18_v_17: => CERTERa; cyt*pu4*u4;
  v19_v_18: CERTERa => ; cyt*CERTERa*a31;
  v20_v_19: CERT => ; cyt*CERT*a32;
  v21_v_20: CERTTGNa => ; cyt*CERTTGNa*a33;

  // Unit definitions:
  unit time = 3600 second;
end
