// SBML level 2 version 4

function Function_for_v_53(K27me2K36me1, default, inflow)
  K27me2K36me1*inflow/default;
end

function Function_for_v_23(K27me1K36me1, default, k11_21)
  K27me1K36me1*k11_21/default;
end

function Function_for_v_33(K27me3K36me0, default, k30_31)
  K27me3K36me0*k30_31/default;
end

function Function_for_v_5(K27me1K36me0, default, k10_11)
  K27me1K36me0*k10_11/default;
end

function Function_for_v_31(K27me2K36me2, default, k22_32)
  K27me2K36me2*k22_32/default;
end

function Function_for_v_42(K27me3K36me2, default, k32_31)
  K27me3K36me2*k32_31/default;
end

function Function_for_v_6(K27me1K36me1, default, k11_10)
  K27me1K36me1*k11_10/default;
end

function Function_for_v_34(K27me3K36me1, default, k31_30)
  K27me3K36me1*k31_30/default;
end

function Function_for_v_16(K27me2K36me1, default, k21_20)
  K27me2K36me1*k21_20/default;
end

function Function_for_v_1(K27me0K36me0, default, k00_01)
  K27me0K36me0*k00_01/default;
end

function Function_for_v_40(K27me3K36me1, default, k31_21)
  K27me3K36me1*k31_21/default;
end

function Function_for_v_3(K27me0K36me0, default, k00_10)
  K27me0K36me0*k00_10/default;
end

function Function_for_v_11(K27me1K36me0, default, k10_20)
  K27me1K36me0*k10_20/default;
end

function Function_for_v_8(K27me1K36me1, default, k11_01)
  K27me1K36me1*k11_01/default;
end

function Function_for_v_54(K27me3K36me0, default, inflow)
  K27me3K36me0*inflow/default;
end

function Function_for_v_9(K27me0K36me1, default, k01_02)
  K27me0K36me1*k01_02/default;
end

function Function_for_v_22(K27me1K36me2, default, k12_11)
  K27me1K36me2*k12_11/default;
end

function Function_for_v_7(K27me0K36me1, default, k01_11)
  K27me0K36me1*k01_11/default;
end

function Function_for_v_48(K27me0K36me2, default, inflow)
  K27me0K36me2*inflow/default;
end

function Function_for_v_12(K27me2K36me0, default, k20_10)
  K27me2K36me0*k20_10/default;
end

function Function_for_v_14(K27me1K36me2, default, k12_02)
  K27me1K36me2*k12_02/default;
end

function Function_for_v_49(K27me1K36me1, default, inflow)
  K27me1K36me1*inflow/default;
end

function Function_for_v_17(K27me0K36me2, default, k02_03)
  K27me0K36me2*k02_03/default;
end

function Function_for_v_18(K27me0K36me3, default, k03_02)
  K27me0K36me3*k03_02/default;
end

function Function_for_v_19(K27me2K36me0, default, k20_30)
  K27me2K36me0*k20_30/default;
end

function Function_for_v_36(K27me1K36me3, default, k13_03)
  K27me1K36me3*k13_03/default;
end

function Function_for_v_37(K27me1K36me2, default, k12_13)
  K27me1K36me2*k12_13/default;
end

function Function_for_v_46(K27me0K36me1, default, inflow)
  K27me0K36me1*inflow/default;
end

function Function_for_v_32(K27me3K36me2, default, k32_22)
  K27me3K36me2*k32_22/default;
end

function Function_for_v_21(K27me1K36me1, default, k11_12)
  K27me1K36me1*k11_12/default;
end

function Function_for_v_57(K27me3K36me1, default, inflow)
  K27me3K36me1*inflow/default;
end

function Function_for_v_15(K27me2K36me0, default, k20_21)
  K27me2K36me0*k20_21/default;
end

function Function_for_v_44(K27me2K36me3, default, k23_13)
  K27me2K36me3*k23_13/default;
end

function Function_for_v_45(K27me0K36me0, default, inflow)
  K27me0K36me0*inflow/default;
end

function Function_for_v_47(K27me1K36me0, default, inflow)
  K27me1K36me0*inflow/default;
end

function Function_for_v_51(K27me0K36me3, default, inflow)
  K27me0K36me3*inflow/default;
end

function Function_for_v_13(K27me0K36me2, default, k02_12)
  K27me0K36me2*k02_12/default;
end

function Function_for_v_26(K27me2K36me2, default, k22_12)
  K27me2K36me2*k22_12/default;
end

function Function_for_v_27(K27me2K36me1, default, k21_22)
  K27me2K36me1*k21_22/default;
end

function Function_for_v_24(K27me2K36me1, default, k21_11)
  K27me2K36me1*k21_11/default;
end

function Function_for_v_25(K27me1K36me2, default, k12_22)
  K27me1K36me2*k12_22/default;
end

function Function_for_v_2(K27me0K36me1, default, k01_00)
  K27me0K36me1*k01_00/default;
end

function Function_for_v_50(K27me2K36me0, default, inflow)
  K27me2K36me0*inflow/default;
end

function Function_for_v_4(K27me1K36me0, default, k10_00)
  K27me1K36me0*k10_00/default;
end

function Function_for_v_41(K27me3K36me1, default, k31_32)
  K27me3K36me1*k31_32/default;
end

function Function_for_v_10(K27me0K36me2, default, k02_01)
  K27me0K36me2*k02_01/default;
end

function Function_for_v_52(K27me1K36me2, default, inflow)
  K27me1K36me2*inflow/default;
end

function Function_for_v_58(K27me2K36me3, default, inflow)
  K27me2K36me3*inflow/default;
end

function Function_for_v_59(K27me3K36me2, default, inflow)
  K27me3K36me2*inflow/default;
end

function Function_for_v_0(default, inflow)
  inflow/default;
end

function Function_for_v_43(K27me1K36me3, default, k13_23)
  K27me1K36me3*k13_23/default;
end

function Function_for_v_30(K27me2K36me3, default, k23_22)
  K27me2K36me3*k23_22/default;
end

function Function_for_v_35(K27me0K36me3, default, k03_13)
  K27me0K36me3*k03_13/default;
end

function Function_for_v_38(K27me1K36me3, default, k13_12)
  K27me1K36me3*k13_12/default;
end

function Function_for_v_39(K27me2K36me1, default, k21_31)
  K27me2K36me1*k21_31/default;
end

function Function_for_v_56(K27me2K36me2, default, inflow)
  K27me2K36me2*inflow/default;
end

function Function_for_v_28(K27me2K36me2, default, k22_21)
  K27me2K36me2*k22_21/default;
end

function Function_for_v_29(K27me2K36me2, default, k22_23)
  K27me2K36me2*k22_23/default;
end

function Function_for_v_20(K27me3K36me0, default, k30_20)
  K27me3K36me0*k30_20/default;
end

function Function_for_v_55(K27me1K36me3, default, inflow)
  K27me1K36me3*inflow/default;
end

model Zheng_PNAS2012()
  // HistoneMethylation
  // PEtab implementation of the model from Zheng et al. (2012), Proc. Natl. Acad. Sci. USA, 109, 13549–13554
  // isDescribedBy doi:10.1073/pnas.1201240109

  // Compartments:
  compartment default = 1;

  // Species:
  species K27me0K36me0 in default = 0.00417725;
  species K27me0K36me1 in default = 0.01021047;
  species K27me1K36me0 in default = 0.001654128;
  species K27me0K36me2 in default = 0.1696903;
  species K27me1K36me1 in default = 0.007832819;
  species K27me2K36me0 in default = 0.006327448;
  species K27me0K36me3 in default = 0.05049352;
  species K27me1K36me2 in default = 0.5942498;
  species K27me2K36me1 in default = 0.01438963;
  species K27me3K36me0 in default = 0.003301684;
  species K27me1K36me3 in default = 0.1027487;
  species K27me2K36me2 in default = 0.02633726;
  species K27me3K36me1 in default = 0.00250831;
  species K27me2K36me3 in default = 0.004718314;
  species K27me3K36me2 in default = 0.001360416;

  // Parameters:
  inflowp = 0.03091608;
  k00_01 = 3.079775;
  k00_10 = 4.290397;
  k01_00 = 1e-5;
  k01_02 = 1.835973;
  k01_11 = 1e-5;
  k02_01 = 0.03651916;
  k02_03 = 0.01722192;
  k02_12 = 0.02585352;
  k03_02 = 1e-5;
  k03_13 = 0.02697085;
  k10_00 = 1e-5;
  k10_11 = 1000;
  k10_20 = 1e-5;
  k11_01 = 1e-5;
  k11_10 = 208.8976;
  k11_12 = 7.204773;
  k11_21 = 0.3338643;
  k12_02 = 1e-5;
  k12_11 = 0.06970103;
  k12_13 = 0.01897103;
  k12_22 = 0.003717186;
  k13_03 = 1e-5;
  k13_12 = 0.1034813;
  k13_23 = 1e-5;
  k20_10 = 1e-5;
  k20_21 = 1e-5;
  k20_30 = 0.3120454;
  k21_11 = 1e-5;
  k21_20 = 0.1508133;
  k21_22 = 1e-5;
  k21_31 = 1e-5;
  k22_12 = 0.06936023;
  k22_21 = 1e-5;
  k22_23 = 0.05014633;
  k22_32 = 1e-5;
  k23_13 = 0.2492046;
  k23_22 = 1e-5;
  k30_20 = 1e-5;
  k30_31 = 0.5670948;
  k31_21 = 1e-5;
  k31_30 = 1e-5;
  k31_32 = 0.7155925;
  k32_22 = 1.288664;
  k32_31 = 1e-5;
  dilution = 0;
  noiseParameter1_K27me0K36me0 = 0;
  noiseParameter1_K27me0K36me1 = 0;
  noiseParameter1_K27me0K36me2 = 0;
  noiseParameter1_K27me0K36me3 = 0;
  noiseParameter1_K27me1K36me0 = 0;
  noiseParameter1_K27me1K36me1 = 0;
  noiseParameter1_K27me1K36me2 = 0;
  noiseParameter1_K27me1K36me3 = 0;
  noiseParameter1_K27me2K36me0 = 0;
  noiseParameter1_K27me2K36me1 = 0;
  noiseParameter1_K27me2K36me2 = 0;
  noiseParameter1_K27me2K36me3 = 0;
  noiseParameter1_K27me3K36me0 = 0;
  noiseParameter1_K27me3K36me1 = 0;
  noiseParameter1_K27me3K36me2 = 0;

  // Assignment rules:
  sigma_K27me0K36me0 := noiseParameter1_K27me0K36me0;
  sigma_K27me0K36me1 := noiseParameter1_K27me0K36me1;
  sigma_K27me0K36me2 := noiseParameter1_K27me0K36me2;
  sigma_K27me0K36me3 := noiseParameter1_K27me0K36me3;
  sigma_K27me1K36me0 := noiseParameter1_K27me1K36me0;
  sigma_K27me1K36me1 := noiseParameter1_K27me1K36me1;
  sigma_K27me1K36me2 := noiseParameter1_K27me1K36me2;
  sigma_K27me1K36me3 := noiseParameter1_K27me1K36me3;
  sigma_K27me2K36me0 := noiseParameter1_K27me2K36me0;
  sigma_K27me2K36me1 := noiseParameter1_K27me2K36me1;
  sigma_K27me2K36me2 := noiseParameter1_K27me2K36me2;
  sigma_K27me2K36me3 := noiseParameter1_K27me2K36me3;
  sigma_K27me3K36me0 := noiseParameter1_K27me3K36me0;
  sigma_K27me3K36me1 := noiseParameter1_K27me3K36me1;
  sigma_K27me3K36me2 := noiseParameter1_K27me3K36me2;
  observable_K27me2K36me0 := K27me2K36me0/(K27me0K36me0 + K27me0K36me1 + K27me0K36me2 + K27me0K36me3 + K27me1K36me0 + K27me1K36me1 + K27me1K36me2 + K27me1K36me3 + K27me2K36me0 + K27me2K36me1 + K27me2K36me2 + K27me2K36me3 + K27me3K36me0 + K27me3K36me1 + K27me3K36me2);
  observable_K27me2K36me1 := K27me2K36me1/(K27me0K36me0 + K27me0K36me1 + K27me0K36me2 + K27me0K36me3 + K27me1K36me0 + K27me1K36me1 + K27me1K36me2 + K27me1K36me3 + K27me2K36me0 + K27me2K36me1 + K27me2K36me2 + K27me2K36me3 + K27me3K36me0 + K27me3K36me1 + K27me3K36me2);
  observable_K27me3K36me0 := K27me3K36me0/(K27me0K36me0 + K27me0K36me1 + K27me0K36me2 + K27me0K36me3 + K27me1K36me0 + K27me1K36me1 + K27me1K36me2 + K27me1K36me3 + K27me2K36me0 + K27me2K36me1 + K27me2K36me2 + K27me2K36me3 + K27me3K36me0 + K27me3K36me1 + K27me3K36me2);
  observable_K27me1K36me2 := K27me1K36me2/(K27me0K36me0 + K27me0K36me1 + K27me0K36me2 + K27me0K36me3 + K27me1K36me0 + K27me1K36me1 + K27me1K36me2 + K27me1K36me3 + K27me2K36me0 + K27me2K36me1 + K27me2K36me2 + K27me2K36me3 + K27me3K36me0 + K27me3K36me1 + K27me3K36me2);
  observable_K27me0K36me3 := K27me0K36me3/(K27me0K36me0 + K27me0K36me1 + K27me0K36me2 + K27me0K36me3 + K27me1K36me0 + K27me1K36me1 + K27me1K36me2 + K27me1K36me3 + K27me2K36me0 + K27me2K36me1 + K27me2K36me2 + K27me2K36me3 + K27me3K36me0 + K27me3K36me1 + K27me3K36me2);
  observable_K27me1K36me1 := K27me1K36me1/(K27me0K36me0 + K27me0K36me1 + K27me0K36me2 + K27me0K36me3 + K27me1K36me0 + K27me1K36me1 + K27me1K36me2 + K27me1K36me3 + K27me2K36me0 + K27me2K36me1 + K27me2K36me2 + K27me2K36me3 + K27me3K36me0 + K27me3K36me1 + K27me3K36me2);
  observable_K27me0K36me0 := K27me0K36me0/(K27me0K36me0 + K27me0K36me1 + K27me0K36me2 + K27me0K36me3 + K27me1K36me0 + K27me1K36me1 + K27me1K36me2 + K27me1K36me3 + K27me2K36me0 + K27me2K36me1 + K27me2K36me2 + K27me2K36me3 + K27me3K36me0 + K27me3K36me1 + K27me3K36me2);
  observable_K27me0K36me1 := K27me0K36me1/(K27me0K36me0 + K27me0K36me1 + K27me0K36me2 + K27me0K36me3 + K27me1K36me0 + K27me1K36me1 + K27me1K36me2 + K27me1K36me3 + K27me2K36me0 + K27me2K36me1 + K27me2K36me2 + K27me2K36me3 + K27me3K36me0 + K27me3K36me1 + K27me3K36me2);
  observable_K27me1K36me0 := K27me1K36me0/(K27me0K36me0 + K27me0K36me1 + K27me0K36me2 + K27me0K36me3 + K27me1K36me0 + K27me1K36me1 + K27me1K36me2 + K27me1K36me3 + K27me2K36me0 + K27me2K36me1 + K27me2K36me2 + K27me2K36me3 + K27me3K36me0 + K27me3K36me1 + K27me3K36me2);
  observable_K27me0K36me2 := K27me0K36me2/(K27me0K36me0 + K27me0K36me1 + K27me0K36me2 + K27me0K36me3 + K27me1K36me0 + K27me1K36me1 + K27me1K36me2 + K27me1K36me3 + K27me2K36me0 + K27me2K36me1 + K27me2K36me2 + K27me2K36me3 + K27me3K36me0 + K27me3K36me1 + K27me3K36me2);
  observable_K27me1K36me3 := K27me1K36me3/(K27me0K36me0 + K27me0K36me1 + K27me0K36me2 + K27me0K36me3 + K27me1K36me0 + K27me1K36me1 + K27me1K36me2 + K27me1K36me3 + K27me2K36me0 + K27me2K36me1 + K27me2K36me2 + K27me2K36me3 + K27me3K36me0 + K27me3K36me1 + K27me3K36me2);
  observable_K27me2K36me2 := K27me2K36me2/(K27me0K36me0 + K27me0K36me1 + K27me0K36me2 + K27me0K36me3 + K27me1K36me0 + K27me1K36me1 + K27me1K36me2 + K27me1K36me3 + K27me2K36me0 + K27me2K36me1 + K27me2K36me2 + K27me2K36me3 + K27me3K36me0 + K27me3K36me1 + K27me3K36me2);
  observable_K27me3K36me1 := K27me3K36me1/(K27me0K36me0 + K27me0K36me1 + K27me0K36me2 + K27me0K36me3 + K27me1K36me0 + K27me1K36me1 + K27me1K36me2 + K27me1K36me3 + K27me2K36me0 + K27me2K36me1 + K27me2K36me2 + K27me2K36me3 + K27me3K36me0 + K27me3K36me1 + K27me3K36me2);
  observable_K27me2K36me3 := K27me2K36me3/(K27me0K36me0 + K27me0K36me1 + K27me0K36me2 + K27me0K36me3 + K27me1K36me0 + K27me1K36me1 + K27me1K36me2 + K27me1K36me3 + K27me2K36me0 + K27me2K36me1 + K27me2K36me2 + K27me2K36me3 + K27me3K36me0 + K27me3K36me1 + K27me3K36me2);
  observable_K27me3K36me2 := K27me3K36me2/(K27me0K36me0 + K27me0K36me1 + K27me0K36me2 + K27me0K36me3 + K27me1K36me0 + K27me1K36me1 + K27me1K36me2 + K27me1K36me3 + K27me2K36me0 + K27me2K36me1 + K27me2K36me2 + K27me2K36me3 + K27me3K36me0 + K27me3K36me1 + K27me3K36me2);
  inflow := inflowp*dilution;

  // Reactions:
  v1_v_0: => K27me0K36me0; default*Function_for_v_0(default, inflow);
  v2_v_1: K27me0K36me0 => K27me0K36me1; default*Function_for_v_1(K27me0K36me0, default, k00_01);
  v3_v_2: K27me0K36me1 => K27me0K36me0; default*Function_for_v_2(K27me0K36me1, default, k01_00);
  v4_v_3: K27me0K36me0 => K27me1K36me0; default*Function_for_v_3(K27me0K36me0, default, k00_10);
  v5_v_4: K27me1K36me0 => K27me0K36me0; default*Function_for_v_4(K27me1K36me0, default, k10_00);
  v6_v_5: K27me1K36me0 => K27me1K36me1; default*Function_for_v_5(K27me1K36me0, default, k10_11);
  v7_v_6: K27me1K36me1 => K27me1K36me0; default*Function_for_v_6(K27me1K36me1, default, k11_10);
  v8_v_7: K27me0K36me1 => K27me1K36me1; default*Function_for_v_7(K27me0K36me1, default, k01_11);
  v9_v_8: K27me1K36me1 => K27me0K36me1; default*Function_for_v_8(K27me1K36me1, default, k11_01);
  v10_v_9: K27me0K36me1 => K27me0K36me2; default*Function_for_v_9(K27me0K36me1, default, k01_02);
  v11_v_10: K27me0K36me2 => K27me0K36me1; default*Function_for_v_10(K27me0K36me2, default, k02_01);
  v12_v_11: K27me1K36me0 => K27me2K36me0; default*Function_for_v_11(K27me1K36me0, default, k10_20);
  v13_v_12: K27me2K36me0 => K27me1K36me0; default*Function_for_v_12(K27me2K36me0, default, k20_10);
  v14_v_13: K27me0K36me2 => K27me1K36me2; default*Function_for_v_13(K27me0K36me2, default, k02_12);
  v15_v_14: K27me1K36me2 => K27me0K36me2; default*Function_for_v_14(K27me1K36me2, default, k12_02);
  v16_v_15: K27me2K36me0 => K27me2K36me1; default*Function_for_v_15(K27me2K36me0, default, k20_21);
  v17_v_16: K27me2K36me1 => K27me2K36me0; default*Function_for_v_16(K27me2K36me1, default, k21_20);
  v18_v_17: K27me0K36me2 => K27me0K36me3; default*Function_for_v_17(K27me0K36me2, default, k02_03);
  v19_v_18: K27me0K36me3 => K27me0K36me2; default*Function_for_v_18(K27me0K36me3, default, k03_02);
  v20_v_19: K27me2K36me0 => K27me3K36me0; default*Function_for_v_19(K27me2K36me0, default, k20_30);
  v21_v_20: K27me3K36me0 => K27me2K36me0; default*Function_for_v_20(K27me3K36me0, default, k30_20);
  v22_v_21: K27me1K36me1 => K27me1K36me2; default*Function_for_v_21(K27me1K36me1, default, k11_12);
  v23_v_22: K27me1K36me2 => K27me1K36me1; default*Function_for_v_22(K27me1K36me2, default, k12_11);
  v24_v_23: K27me1K36me1 => K27me2K36me1; default*Function_for_v_23(K27me1K36me1, default, k11_21);
  v25_v_24: K27me2K36me1 => K27me1K36me1; default*Function_for_v_24(K27me2K36me1, default, k21_11);
  v26_v_25: K27me1K36me2 => K27me2K36me2; default*Function_for_v_25(K27me1K36me2, default, k12_22);
  v27_v_26: K27me2K36me2 => K27me1K36me2; default*Function_for_v_26(K27me2K36me2, default, k22_12);
  v28_v_27: K27me2K36me1 => K27me2K36me2; default*Function_for_v_27(K27me2K36me1, default, k21_22);
  v29_v_28: K27me2K36me2 => K27me2K36me1; default*Function_for_v_28(K27me2K36me2, default, k22_21);
  v30_v_29: K27me2K36me2 => K27me2K36me3; default*Function_for_v_29(K27me2K36me2, default, k22_23);
  v31_v_30: K27me2K36me3 => K27me2K36me2; default*Function_for_v_30(K27me2K36me3, default, k23_22);
  v32_v_31: K27me2K36me2 => K27me3K36me2; default*Function_for_v_31(K27me2K36me2, default, k22_32);
  v33_v_32: K27me3K36me2 => K27me2K36me2; default*Function_for_v_32(K27me3K36me2, default, k32_22);
  v34_v_33: K27me3K36me0 => K27me3K36me1; default*Function_for_v_33(K27me3K36me0, default, k30_31);
  v35_v_34: K27me3K36me1 => K27me3K36me0; default*Function_for_v_34(K27me3K36me1, default, k31_30);
  v36_v_35: K27me0K36me3 => K27me1K36me3; default*Function_for_v_35(K27me0K36me3, default, k03_13);
  v37_v_36: K27me1K36me3 => K27me0K36me3; default*Function_for_v_36(K27me1K36me3, default, k13_03);
  v38_v_37: K27me1K36me2 => K27me1K36me3; default*Function_for_v_37(K27me1K36me2, default, k12_13);
  v39_v_38: K27me1K36me3 => K27me1K36me2; default*Function_for_v_38(K27me1K36me3, default, k13_12);
  v40_v_39: K27me2K36me1 => K27me3K36me1; default*Function_for_v_39(K27me2K36me1, default, k21_31);
  v41_v_40: K27me3K36me1 => K27me2K36me1; default*Function_for_v_40(K27me3K36me1, default, k31_21);
  v42_v_41: K27me3K36me1 => K27me3K36me2; default*Function_for_v_41(K27me3K36me1, default, k31_32);
  v43_v_42: K27me3K36me2 => K27me3K36me1; default*Function_for_v_42(K27me3K36me2, default, k32_31);
  v44_v_43: K27me1K36me3 => K27me2K36me3; default*Function_for_v_43(K27me1K36me3, default, k13_23);
  v45_v_44: K27me2K36me3 => K27me1K36me3; default*Function_for_v_44(K27me2K36me3, default, k23_13);
  v46_v_45: K27me0K36me0 => ; default*Function_for_v_45(K27me0K36me0, default, inflow);
  v47_v_46: K27me0K36me1 => ; default*Function_for_v_46(K27me0K36me1, default, inflow);
  v48_v_47: K27me1K36me0 => ; default*Function_for_v_47(K27me1K36me0, default, inflow);
  v49_v_48: K27me0K36me2 => ; default*Function_for_v_48(K27me0K36me2, default, inflow);
  v50_v_49: K27me1K36me1 => ; default*Function_for_v_49(K27me1K36me1, default, inflow);
  v51_v_50: K27me2K36me0 => ; default*Function_for_v_50(K27me2K36me0, default, inflow);
  v52_v_51: K27me0K36me3 => ; default*Function_for_v_51(K27me0K36me3, default, inflow);
  v53_v_52: K27me1K36me2 => ; default*Function_for_v_52(K27me1K36me2, default, inflow);
  v54_v_53: K27me2K36me1 => ; default*Function_for_v_53(K27me2K36me1, default, inflow);
  v55_v_54: K27me3K36me0 => ; default*Function_for_v_54(K27me3K36me0, default, inflow);
  v56_v_55: K27me1K36me3 => ; default*Function_for_v_55(K27me1K36me3, default, inflow);
  v57_v_56: K27me2K36me2 => ; default*Function_for_v_56(K27me2K36me2, default, inflow);
  v58_v_57: K27me3K36me1 => ; default*Function_for_v_57(K27me3K36me1, default, inflow);
  v59_v_58: K27me2K36me3 => ; default*Function_for_v_58(K27me2K36me3, default, inflow);
  v60_v_59: K27me3K36me2 => ; default*Function_for_v_59(K27me3K36me2, default, inflow);

  // Unit definitions:
  unit time = 3600 second;
end
