// SBML level 2 version 4

model TwoStepSynthesisWithGlu()

  // Compartments:
  compartment medium = 1;

  // Species:
  species Bac in medium = init_Bac;
  species Glu in medium = 10;
  species cGlu in medium = 0;
  species Ind in medium = 0;

  // Parameters:
  Bacmax_typeIDwt_ExpID4 = 0.6246795;
  beta_typeIDwt_ExpID4 = 0.007006855;
  init_Bac = 0.01470079;
  kdegi_typeIDwt = 0.01029326;
  kdim_typeIDwt = 6.855103e-5;
  ksyn_typeIDwt = 0.005533086;
  sd_Bacnorm = 0.03705789;
  sd_IndconcNormRange = 0.0203937;
  tau_typeIDwt_ExpID4 = 1126.307;
  switch_Bacmax_typeIDT1_ExpID1 = 1;
  switch_Bacmax_typeIDT1_ExpID2 = 1;
  switch_Bacmax_typeIDT1_ExpID3 = 1;
  switch_Bacmax_typeIDT1_ExpID4 = 1;
  switch_Bacmax_typeIDT1_ExpID5 = 1;
  switch_Bacmax_typeIDT1_ExpID6 = 1;
  switch_Bacmax_typeIDT3_ExpID1 = 1;
  switch_Bacmax_typeIDT3_ExpID2 = 1;
  switch_Bacmax_typeIDT3_ExpID3 = 1;
  switch_Bacmax_typeIDT3_ExpID4 = 1;
  switch_Bacmax_typeIDT3_ExpID5 = 1;
  switch_Bacmax_typeIDT3_ExpID6 = 1;
  switch_Bacmax_typeIDT5_ExpID1 = 1;
  switch_Bacmax_typeIDT5_ExpID2 = 1;
  switch_Bacmax_typeIDT5_ExpID3 = 1;
  switch_Bacmax_typeIDT5_ExpID4 = 1;
  switch_Bacmax_typeIDT5_ExpID5 = 1;
  switch_Bacmax_typeIDT5_ExpID6 = 1;
  switch_Bacmax_typeIDwt_ExpID4 = 1;
  switch_beta_typeIDT1_ExpID1 = 1;
  switch_beta_typeIDT1_ExpID2 = 1;
  switch_beta_typeIDT1_ExpID3 = 1;
  switch_beta_typeIDT1_ExpID4 = 1;
  switch_beta_typeIDT1_ExpID5 = 1;
  switch_beta_typeIDT1_ExpID6 = 1;
  switch_beta_typeIDT3_ExpID1 = 1;
  switch_beta_typeIDT3_ExpID2 = 1;
  switch_beta_typeIDT3_ExpID3 = 1;
  switch_beta_typeIDT3_ExpID4 = 1;
  switch_beta_typeIDT3_ExpID5 = 1;
  switch_beta_typeIDT3_ExpID6 = 1;
  switch_beta_typeIDT5_ExpID1 = 1;
  switch_beta_typeIDT5_ExpID2 = 1;
  switch_beta_typeIDT5_ExpID3 = 1;
  switch_beta_typeIDT5_ExpID4 = 1;
  switch_beta_typeIDT5_ExpID5 = 1;
  switch_beta_typeIDT5_ExpID6 = 1;
  switch_beta_typeIDwt_ExpID4 = 1;
  switch_kdegi_typeIDT1 = 1;
  switch_kdegi_typeIDT3 = 1;
  switch_kdegi_typeIDT5 = 1;
  switch_kdegi_typeIDwt = 1;
  switch_kdim_typeIDT1 = 1;
  switch_kdim_typeIDT3 = 1;
  switch_kdim_typeIDT5 = 1;
  switch_kdim_typeIDwt = 1;
  switch_ksyn_typeIDT1 = 1;
  switch_ksyn_typeIDT3 = 1;
  switch_ksyn_typeIDT5 = 1;
  switch_ksyn_typeIDwt = 1;
  switch_tau_typeIDT1_ExpID1 = 1;
  switch_tau_typeIDT1_ExpID2 = 1;
  switch_tau_typeIDT1_ExpID3 = 1;
  switch_tau_typeIDT1_ExpID4 = 1;
  switch_tau_typeIDT1_ExpID5 = 1;
  switch_tau_typeIDT1_ExpID6 = 1;
  switch_tau_typeIDT3_ExpID1 = 1;
  switch_tau_typeIDT3_ExpID2 = 1;
  switch_tau_typeIDT3_ExpID3 = 1;
  switch_tau_typeIDT3_ExpID4 = 1;
  switch_tau_typeIDT3_ExpID5 = 1;
  switch_tau_typeIDT3_ExpID6 = 1;
  switch_tau_typeIDT5_ExpID1 = 1;
  switch_tau_typeIDT5_ExpID2 = 1;
  switch_tau_typeIDT5_ExpID3 = 1;
  switch_tau_typeIDT5_ExpID4 = 1;
  switch_tau_typeIDT5_ExpID5 = 1;
  switch_tau_typeIDT5_ExpID6 = 1;
  switch_tau_typeIDwt_ExpID4 = 1;

  // Assignment rules:
  lag := piecewise(0, time - tau_typeIDwt_ExpID4 < 0, 1);
  observable_Bacnorm := Bac;
  observable_IndconcNormRange := Ind;

  // Reactions:
  reaction1: => Bac; medium*(-(Bac*beta_typeIDwt_ExpID4*lag*(Bac - Bacmax_typeIDwt_ExpID4))/Bacmax_typeIDwt_ExpID4);
  reaction2: => Glu; medium*(-Bac)*Glu*ksyn_typeIDwt;  // modifiers: Bac
  reaction3: => cGlu; medium*(Bac*Glu*ksyn_typeIDwt - cGlu^2*kdim_typeIDwt);  // modifiers: Bac, Glu
  reaction4: => Ind; medium*(cGlu^2*kdim_typeIDwt - Ind*kdegi_typeIDwt);  // modifiers: cGlu

  // Unit definitions:
  unit time = 60 second;
end
